<?xml version="1.0"?>
<?xml-stylesheet type="text/xsl" href="/JSBSim.xsl"?>
<fdm_config name="F-15" version="2.0" release="DEVELOPMENT"
   xmlns:xsi="http://www.w3.org/2001/XMLSchema-instance"
   xsi:noNamespaceSchemaLocation="http://jsbsim.sourceforge.net/JSBSim.xsd">

    <fileheader>
        <author>Richard Harrison</author>
        <filecreationdate>2019-11-07</filecreationdate>
        <version>1.0</version>
        <copyright>Copyright (C) 2019 Richard Harrison, All rights reserved</copyright>
        <description></description>
        <note>Built using VSPAERO.Aircraft origin for measurements is the noseF-15C in the critical aft c.g. configuration has a weight of 33,467
                pounds and a c.g. location at 563.1 inches (6:12). To
                convert c.g. location in inches to percent mean aerodynamic
                chord, the following equation is used for all A through D
                models of the F-15: (measurements in inches).
                % MAC = (xcg - 408.1 * 100) / 191.33VSPAERO notes:
                The aileron deflection is for left side down.
                Rudder deflection is LE right.
                Elevator is TE down.Controls Position Limits (deg.) Rate Limits (deg./sec.)
                Left/Right Stabilators -29,+15 ±45
                Left/Right Ailerons ±20 ±90
                Symmetric Rudder ±30 ±135
                Left/Right Canards -35,+15 ±75
                Axisymmetric Thrust Vectoring ±20* ±80
                * These limits may be reduced as a function of thrust
                Chapter 8-95</note>
        <note>Built with AeroTool 1.0.0.0: Options: AeroDetail=Full, WakeIterations=2</note>
        <limitation></limitation>
        <reference
            refID="ZDAT/AED/2016/01-29"
            author="Richard Harrison, rjh@zaretto.com"
            title="F 15 Aerodynamic data built from vspaero; CG (10, 0, 0.26)M"
            date="January, 2016"
            URL="http://www.zaretto.com/sites/zaretto.com/files/F-15-data/rjh-zaretto-F-15-aerodynamic-data-vspaero.pdf"
        />
        <reference
            refID="ZDAT/AED/2014/12-2"
            author="Richard Harrison, rjh@zaretto.com"
            title="F-15 Aerodynamic data from  (AFIT/GAE/ENY/90D-16); CG 25.65%"
            date="December, 2014"
            URL="http://www.zaretto.com/sites/zaretto.com/files/F-15-data/rjh-zaretto-f-15-aerodynamic-data.pdf"
        />
        <reference
            refID="AFIT/GAE/ENY/90D-16"
            author="Robert J. McDonnell, B.S., Captain, USAF"
            title="INVESTIGATION OF THE HIGH ANGLE OF ATTACK DYNAMICS OF THE F-15B USING BIFURCATION ANALYSIS"
            date="December 1990"
            URL="http://www.zaretto.com/sites/zaretto.com/files/F-15-data/ADA230462.pdf"
        />
        <reference
            refID="AFIT/GA/ENY/91D-1"
            author="Richard L. Bennet, Major, USAF"
            title="ANALYSIS OF THE EFFECTS OF REMOVING NOSE BALLAST FROM THE F-15 EAGLE"
            date="December 1991"
            URL="http://www.zaretto.com/sites/zaretto.com/files/F-15-data/ADA244044.pdf"
        />
        <reference
            refID="NASA CR-152391-VOL-1 Figure 3-2 p54"
            author="DR. J. R. LUMMUS, G. T. JOYCE, O C. D. O MALLEY"
            title="ANALYSIS OF WIND TUNNEL TEST RESULTS FOR A 9.39-PER CENT SCALE MODEL OF A VSTOL FIGHTER/ATTACK AIRCRAFT : VOLUME I - STUDY OVERVIEW"
            date="October 1980"
            URL="http://www.zaretto.com/sites/zaretto.com/files/F-15-data/19810014497.pdf"
        />
        <reference
            refID="NASA TP-3627"
            author="Frank W. Burcham, Jr., Trindel A. Maine, C. Gordon Fullerton, and Lannie Dean Webb"
            title="Development and Flight Evaluation of an Emergency Digital Flight Control System Using Only Engine Thrust on an F-15 Airplane"
            date="September 1996"
            URL="http://www.zaretto.com/sites/zaretto.com/files/F-15-data/88414main_H-2048.pdf"
        />
        <reference
            refID="NASA-TM-72861"
            author="Thomas R. Sisk and Neil W. Matheny"
            title="Precision Controllability of the F-15 Airplane"
            date="May 1979"
            URL="http://www.zaretto.com/sites/zaretto.com/files/F-15-data/88414main_H-2048.pdf"
        />
        <reference
            refID="95-fuel-dumping-system"
            author="Sabc"
            title="Fuel Dumping System"
            date="08 September 2010"
            URL="http://www.f-15e.info/joomla/technology/fuel-system/95-fuel-dumping-system"
        />
        <reference
            refID="VSPAERO"
            author="Brandon Litherland"
            title="Using VSPAERO"
            date=" 2015/07/01 06:56"
            URL="http://www.openvsp.org/wiki/doku.php?id=vspaerotutorial"
        />
    </fileheader>
<metrics>
  <wingarea unit="M2">56.485</wingarea>
  <wing_incidence>0</wing_incidence>
  <wingspan unit="M">13.04544</wingspan>
  <chord unit="M">4.85902</chord>
  <location unit="IN" name="EYEPOINT">
    <x>386</x>
    <y>0</y>
    <z>0</z>
  </location>
  <location unit="IN" name="VRP">
    <x>386</x>
    <y>0</y>
    <z>0</z>
  </location>
  <location unit="M" name="AERORP">
    <x>10.23</x>
    <y>0</y>
    <z>0.26</z>
  </location>
</metrics>

<mass_balance>
  <location unit="M" name="CG">
    <x>10</x>
    <y>0</y>
    <z>0.26</z>
  </location>
  <ixx unit="SLUG*FT2">28700</ixx>
  <iyy unit="SLUG*FT2">165100</iyy>
  <izz unit="SLUG*FT2">187900</izz>
  <ixz unit="SLUG*FT2">-520</ixz>
  <emptywt unit="LBS">28000</emptywt>
  <pointmass name="Station2-1">
    <location unit="M" name="Pointmass Station2-1">
      <x>10.593</x>
      <y>-3.721</y>
      <z>0.388</z>
    </location>
    <weight unit="LBS">0</weight>
  </pointmass>
  <pointmass name="Station2-2">
    <location unit="M" name="Pointmass Station2-2">
      <x>11.617</x>
      <y>-3.3034</y>
      <z>-0.091</z>
    </location>
    <weight unit="LBS">0</weight>
  </pointmass>
  <pointmass name="Station2-3">
    <location unit="M" name="Pointmass Station2-3">
      <x>10.95</x>
      <y>-2.891</y>
      <z>0.461</z>
    </location>
    <weight unit="LBS">0</weight>
  </pointmass>
  <pointmass name="Station3">
    <location unit="M" name="Pointmass Station3">
      <x>9.35</x>
      <y>-1.611</y>
      <z>0.567</z>
    </location>
    <weight unit="LBS">0</weight>
  </pointmass>
  <pointmass name="Station4">
    <location unit="M" name="Pointmass Station4">
      <x>13.27</x>
      <y>-1.611</y>
      <z>0.567</z>
    </location>
    <weight unit="LBS">0</weight>
  </pointmass>
  <pointmass name="Station5">
    <location unit="M" name="Pointmass Station5">
      <x>10.95</x>
      <y>0</y>
      <z>-1.231</z>
    </location>
    <weight unit="LBS">0</weight>
  </pointmass>
  <pointmass name="Station6">
    <location unit="M" name="Pointmass Station6">
      <x>13.27</x>
      <y>1.611</y>
      <z>0.567</z>
    </location>
    <weight unit="LBS">0</weight>
  </pointmass>
  <pointmass name="Station7">
    <location unit="M" name="Pointmass Station7">
      <x>9.35</x>
      <y>1.611</y>
      <z>0.567</z>
    </location>
    <weight unit="LBS">0</weight>
  </pointmass>
  <pointmass name="Station8">
    <location unit="M" name="Pointmass Station8">
      <x>10.95</x>
      <y>2.891</y>
      <z>0.461</z>
    </location>
    <weight unit="LBS">0</weight>
  </pointmass>
  <pointmass name="Station9">
    <location unit="M" name="Pointmass Station9">
      <x>11.617</x>
      <y>3.3034</y>
      <z>-0.091</z>
    </location>
    <weight unit="LBS">0</weight>
  </pointmass>
  <pointmass name="Station10">
    <location unit="M" name="Pointmass Station10">
      <x>10.593</x>
      <y>3.721</y>
      <z>0.388</z>
    </location>
    <weight unit="LBS">0</weight>
  </pointmass>
  <pointmass name="CFT11">
    <location unit="M" name="Pointmass CFT11">
      <x>11.396</x>
      <y>-1.76</y>
      <z>0.021</z>
    </location>
    <weight unit="LBS">0</weight>
  </pointmass>
  <pointmass name="CFT12">
    <location unit="M" name="Pointmass CFT12">
      <x>11.396</x>
      <y>1.76</y>
      <z>0.021</z>
    </location>
    <weight unit="LBS">0</weight>
  </pointmass>
  <pointmass name="PylonL">
    <location unit="M" name="Pointmass PylonL">
      <x>11.25</x>
      <y>-3.3034</y>
      <z>1.4077</z>
    </location>
    <weight unit="LBS">0</weight>
  </pointmass>
  <pointmass name="PylonR">
    <location unit="M" name="Pointmass PylonR">
      <x>11.25</x>
      <y>3.3034</y>
      <z>1.4077</z>
    </location>
    <weight unit="LBS">0</weight>
  </pointmass>
  <pointmass name="F-15D-extra">
    <location unit="M" name="Pointmass F-15D-extra">
      <x>6.642</x>
      <y>0</y>
      <z>-0.5</z>
    </location>
    <weight unit="LBS">0</weight>
  </pointmass>
</mass_balance>

<ground_reactions>
  <contact type="BOGEY" name="NOSE_LG">
    <location unit="IN">
      <x>197</x>
      <y>0</y>
      <z>-77.6496063</z>
    </location>
    <static_friction>1.0</static_friction>
    <dynamic_friction>0.5</dynamic_friction>
    <rolling_friction>0.02</rolling_friction>
    <spring_coeff unit="LBS/FT">25200</spring_coeff>
    <damping_coeff unit="LBS/FT/SEC">1400</damping_coeff>
    <max_steer unit="DEG">35</max_steer>
    <!--0: NOSE_LG-->
    <brake_group>NOSE</brake_group>
    <retractable>1</retractable>
  </contact>
  <contact type="BOGEY" name="LEFT_MLG">
    <location unit="IN">
      <x>451</x>
      <y>-98</y>
      <z>-84.3385827</z>
    </location>
    <static_friction>1.0</static_friction>
    <dynamic_friction>0.5</dynamic_friction>
    <rolling_friction>0.02</rolling_friction>
    <spring_coeff unit="LBS/FT">25200</spring_coeff>
    <damping_coeff unit="LBS/FT/SEC">1400</damping_coeff>
    <!--1: LEFT_MLG-->
    <brake_group>LEFT</brake_group>
    <retractable>1</retractable>
  </contact>
  <contact type="BOGEY" name="RIGHT_MLG">
    <location unit="IN">
      <x>451</x>
      <y>98</y>
      <z>-84.3385827</z>
    </location>
    <static_friction>1.0</static_friction>
    <dynamic_friction>0.5</dynamic_friction>
    <rolling_friction>0.02</rolling_friction>
    <spring_coeff unit="LBS/FT">25200</spring_coeff>
    <damping_coeff unit="LBS/FT/SEC">1400</damping_coeff>
    <!--2: RIGHT_MLG-->
    <brake_group>RIGHT</brake_group>
    <retractable>1</retractable>
  </contact>
  <contact type="STRUCTURE" name="LEFT_WING_TIP">
    <!--3: LEFT_WING_TIP-->
    <location unit="IN">
      <x>472</x>
      <y>-256.8</y>
      <z>13</z>
    </location>
    <static_friction>1.2</static_friction>
    <dynamic_friction>1.212</dynamic_friction>
    <rolling_friction>1.413</rolling_friction>
    <spring_coeff unit="LBS/FT">25200</spring_coeff>
    <damping_coeff unit="LBS/FT/SEC">5600</damping_coeff>
  </contact>
  <contact type="STRUCTURE" name="RIGHT_WING_TIP">
    <!--4: RIGHT_WING_TIP-->
    <location unit="IN">
      <x>472</x>
      <y>256.8</y>
      <z>13</z>
    </location>
    <static_friction>1.2</static_friction>
    <dynamic_friction>1.212</dynamic_friction>
    <rolling_friction>1.413</rolling_friction>
    <spring_coeff unit="LBS/FT">25200</spring_coeff>
    <damping_coeff unit="LBS/FT/SEC">5600</damping_coeff>
  </contact>
  <contact type="STRUCTURE" name="CANOPY">
    <!--5: CANOPY-->
    <location unit="IN">
      <x>214</x>
      <y>0</y>
      <z>10</z>
    </location>
    <static_friction>1.2</static_friction>
    <dynamic_friction>1.212</dynamic_friction>
    <rolling_friction>1.413</rolling_friction>
    <spring_coeff unit="LBS/FT">25200</spring_coeff>
    <damping_coeff unit="LBS/FT/SEC">5600</damping_coeff>
  </contact>
  <contact type="STRUCTURE" name="RADOME_FRONT">
    <!--6: RADOME_FRONT-->
    <location unit="IN">
      <x>20</x>
      <y>0</y>
      <z>-18</z>
    </location>
    <static_friction>1.2</static_friction>
    <dynamic_friction>1.212</dynamic_friction>
    <rolling_friction>1.413</rolling_friction>
    <spring_coeff unit="LBS/FT">25200</spring_coeff>
    <damping_coeff unit="LBS/FT/SEC">5600</damping_coeff>
  </contact>
  <contact type="STRUCTURE" name="LEFT_VERTICAL_TAIL">
    <!--7: LEFT_VERTICAL_TAIL-->
    <location unit="IN">
      <x>744</x>
      <y>-98</y>
      <z>60</z>
    </location>
    <static_friction>1.2</static_friction>
    <dynamic_friction>1.212</dynamic_friction>
    <rolling_friction>1.413</rolling_friction>
    <spring_coeff unit="LBS/FT">25200</spring_coeff>
    <damping_coeff unit="LBS/FT/SEC">5600</damping_coeff>
  </contact>
  <contact type="STRUCTURE" name="RIGHT_VERTICAL_TAIL">
    <!--8: RIGHT_VERTICAL_TAIL-->
    <location unit="IN">
      <x>744</x>
      <y>98</y>
      <z>60</z>
    </location>
    <static_friction>1.2</static_friction>
    <dynamic_friction>1.212</dynamic_friction>
    <rolling_friction>1.413</rolling_friction>
    <spring_coeff unit="LBS/FT">25200</spring_coeff>
    <damping_coeff unit="LBS/FT/SEC">5600</damping_coeff>
  </contact>
  <contact type="STRUCTURE" name="REAR_BODY_LEFT">
    <!--9: REAR_BODY_LEFT-->
    <location unit="IN">
      <x>669</x>
      <y>-58</y>
      <z>-12</z>
    </location>
    <static_friction>1.2</static_friction>
    <dynamic_friction>1.212</dynamic_friction>
    <rolling_friction>1.413</rolling_friction>
    <spring_coeff unit="LBS/FT">25200</spring_coeff>
    <damping_coeff unit="LBS/FT/SEC">5600</damping_coeff>
  </contact>
  <contact type="STRUCTURE" name="REAR_BODY_RIGHT">
    <!--10: REAR_BODY_RIGHT-->
    <location unit="IN">
      <x>669</x>
      <y>58</y>
      <z>-12</z>
    </location>
    <static_friction>1.2</static_friction>
    <dynamic_friction>1.212</dynamic_friction>
    <rolling_friction>1.413</rolling_friction>
    <spring_coeff unit="LBS/FT">25200</spring_coeff>
    <damping_coeff unit="LBS/FT/SEC">5600</damping_coeff>
  </contact>
  <contact type="STRUCTURE" name="NOSE_CONE">
    <!--11: NOSE_CONE-->
    <location unit="IN">
      <x>0</x>
      <y>0</y>
      <z>-15</z>
    </location>
    <static_friction>1.2</static_friction>
    <dynamic_friction>1.212</dynamic_friction>
    <rolling_friction>1.413</rolling_friction>
    <spring_coeff unit="LBS/FT">25200</spring_coeff>
    <damping_coeff unit="LBS/FT/SEC">5600</damping_coeff>
  </contact>
</ground_reactions>

<propulsion>
  <engine file="F100-PW-100">
    <location unit="IN">
      <x>682</x>
      <y>-12</y>
      <z>10</z>
    </location>
    <orient unit="DEG">
      <roll>0</roll>
      <pitch>0</pitch>
      <yaw>0</yaw>
    </orient>
    <feed>1</feed>
    <feed>2</feed>
    <feed>4</feed>
    <feed>7</feed>
    <feed>9</feed>
    <thruster file="direct">
      <location unit="IN">
        <x>682</x>
        <y>-12</y>
        <z>10</z>
      </location>
      <orient unit="DEG">
        <roll>0</roll>
        <pitch>0</pitch>
        <yaw>0</yaw>
      </orient>
    </thruster>
  </engine>
  <engine file="F100-PW-100">
    <location unit="IN">
      <x>682</x>
      <y>12</y>
      <z>10</z>
    </location>
    <orient unit="DEG">
      <roll>0</roll>
      <pitch>0</pitch>
      <yaw>0</yaw>
    </orient>
    <feed>0</feed>
    <feed>2</feed>
    <feed>3</feed>
    <feed>5</feed>
    <feed>6</feed>
    <feed>7</feed>
    <feed>8</feed>
    <thruster file="direct">
      <location unit="IN">
        <x>682</x>
        <y>12</y>
        <z>10</z>
      </location>
      <orient unit="DEG">
        <roll>0</roll>
        <pitch>0</pitch>
        <yaw>0</yaw>
      </orient>
    </thruster>
  </engine>
  <tank number="0" type="FUEL">
    <!--0: LeftEngineFeed-->
    <location unit="M">
      <x>9</x>
      <y>0</y>
      <z>0.179</z>
    </location>
    <capacity unit="LBS">1455</capacity>
    <contents unit="LBS">1455</contents>
    <priority>12</priority>
  </tank>
  <tank number="1" type="FUEL">
    <!--1: RightEngineFeed-->
    <location unit="M">
      <x>9</x>
      <y>0</y>
      <z>0.179</z>
    </location>
    <capacity unit="LBS">1610</capacity>
    <contents unit="LBS">1610</contents>
    <priority>11</priority>
  </tank>
  <tank number="2" type="FUEL">
    <!--2: Tank1-->
    <location unit="M">
      <x>11.2958118</x>
      <y>0</y>
      <z>0.0127</z>
    </location>
    <capacity unit="LBS">4420</capacity>
    <standpipe unit="LBS">100</standpipe>
    <contents unit="LBS">4420</contents>
    <priority>10</priority>
  </tank>
  <tank number="3" type="FUEL">
    <!--3: LeftWingTank-->
    <location unit="M">
      <x>11.204</x>
      <y>-2.595</y>
      <z>0.771</z>
    </location>
    <capacity unit="LBS">3470</capacity>
    <standpipe unit="LBS">100</standpipe>
    <contents unit="LBS">3470</contents>
    <priority>7</priority>
  </tank>
  <tank number="4" type="FUEL">
    <!--4: RightWingTank-->
    <location unit="M">
      <x>11.204</x>
      <y>2.595</y>
      <z>0.771</z>
    </location>
    <capacity unit="LBS">3470</capacity>
    <standpipe unit="LBS">100</standpipe>
    <contents unit="LBS">3470</contents>
    <priority>7</priority>
  </tank>
  <tank number="5" type="FUEL">
    <!--5: LeftExternalWingTank-->
    <location unit="M">
      <x>11.617</x>
      <y>-3.3034</y>
      <z>-0.091</z>
    </location>
    <capacity unit="LBS">4250</capacity>
    <standpipe unit="LBS">100</standpipe>
    <contents unit="LBS">4250</contents>
    <priority>4</priority>
  </tank>
  <tank number="6" type="FUEL">
    <!--6: RightExternalWingTank-->
    <location unit="M">
      <x>11.617</x>
      <y>3.3034</y>
      <z>-0.091</z>
    </location>
    <capacity unit="LBS">4250</capacity>
    <standpipe unit="LBS">100</standpipe>
    <contents unit="LBS">4250</contents>
    <priority>4</priority>
  </tank>
  <tank number="7" type="FUEL">
    <!--7: ExternalTank-->
    <location unit="M">
      <x>10.95</x>
      <y>0</y>
      <z>-1.231</z>
    </location>
    <capacity unit="LBS">4250</capacity>
    <standpipe unit="LBS">100</standpipe>
    <contents unit="LBS">4250</contents>
    <priority>3</priority>
  </tank>
  <tank number="8" type="FUEL">
    <!--8: LeftConformalTank-->
    <location unit="M">
      <x>11.396</x>
      <y>-1.76</y>
      <z>0.021</z>
    </location>
    <capacity unit="LBS">5200</capacity>
    <standpipe unit="LBS">100</standpipe>
    <contents unit="LBS">5200</contents>
    <priority>6</priority>
  </tank>
  <tank number="9" type="FUEL">
    <!--9: RightConformalTank-->
    <location unit="M">
      <x>11.396</x>
      <y>1.76</y>
      <z>0.021</z>
    </location>
    <capacity unit="LBS">5200</capacity>
    <standpipe unit="LBS">100</standpipe>
    <contents unit="LBS">5200</contents>
    <priority>6</priority>
  </tank>
</propulsion>

<external_reactions />

<flight_control name="F-15-FCS">
  <channel name="extra-aero">
        <!-- need %Cg in chord for moments [Xcg - Xref)/100] -->
        <summer name="cg-x-offset-chord-in">
            <input> inertia/cg-x-in</input>
            <input> -metrics/aero-rp-x-in</input>
            <output>inertia/cg-x-offset-chord-in</output>
        </summer>

        <!-- figure out the factor for the fuel tank aero -->
        <pure_gain name="cg-x-chord-percent">
            <description>Percent offset of the CoP from the CG</description>
            <input>inertia/cg-x-offset-chord-in</input>
            <gain> -0.01</gain>
            <clipto>
                <min> -1 </min>
                <max> 1 </max>
            </clipto>
            <output> inertia/cg-x-mac-percent </output>
        </pure_gain>

        <fcs_function name="pb">
            <description>PB Denormalization</description>
            <function>
                    <product>
                        <property>aero/bi2vel</property>
                        <property>velocities/p-aero-rad_sec</property>
                    </product>
            </function>
            <output>aero/pb</output>
        </fcs_function>

        <fcs_function name="cbarq-2vo">
            <description>For denormalization</description>
            <function>
                    <product>
                        <property>aero/ci2vel</property>
                        <property>velocities/q-aero-rad_sec</property>
                    </product>
            </function>
            <output>aero/qb</output>
        </fcs_function>

        <fcs_function name="rb-2vo">
            <description>For denormalization</description>
            <function>
                <product>
                        <property>aero/bi2vel</property>
                        <property>velocities/r-aero-rad_sec</property>
                    </product>
            </function>
            <output>aero/rb</output>
        </fcs_function>


        <fcs_function name="aero-cos-alpha">
            <function>
                <cos>
                    <property>aero/alpha-rad</property>
                </cos>
            </function>
            <output>aero/cos-alpha</output>
        </fcs_function>

        <fcs_function name="aero-sin-alpha">
            <function>
                <sin>
                    <property>aero/alpha-rad</property>
                </sin>
            </function>
            <output>aero/sin-alpha</output>
        </fcs_function>
        <fcs_function name="position/h-agl-m">
            <description>Height above ground (meters)</description>
            <function>
                    <product>
                        <property>position/h-agl-ft</property>
                        <v>0.3048</v>
                    </product>
            </function>
            <output>position/h-agl-m</output>
        </fcs_function>

       </channel>
</flight_control>
<system file="f-15-hydraulic"/>
<system file="f-15-electrics"/>
<system file="catapult"/>
<system file="autoflight"/>
<system file="f-15-cadc"/>
<system file="f-15-cas"/>
<system file="f-15-ecs"/>
<system file="f-15-engines"/>
<system file="hook"/>
<system file="flight-controls"/>
<aerodynamics>
    <function name="aero/c/CFXB">
    <description>BASE DRAG</description>
          <table>
            <independentVar lookup="row">aero/alpha-deg</independentVar>
            <independentVar lookup="column">aero/beta-deg</independentVar>
            <tableData>
                                -20	        -10	         -5	         -2	          0	          2	          5	         10	         20
                    -20	   0.76634	   0.76394	   0.76403	   0.76420	   0.76419	   0.76421	   0.76400	   0.76396	   0.76636
                    -10	   0.20710	   0.19066	   0.18639	   0.18484	   0.18461	   0.18484	   0.18639	   0.19067	   0.20708
                     -8	   0.14223	   0.12476	   0.11999	   0.11838	   0.11795	   0.11829	   0.11999	   0.12477	   0.14224
                     -6	   0.09261	   0.07401	   0.06859	   0.06729	   0.06693	   0.06730	   0.06860	   0.07402	   0.09262
                     -4	   0.05632	   0.03737	   0.03168	   0.03029	   0.02996	   0.03029	   0.03168	   0.03738	   0.05632
                     -2	   0.03263	   0.01325	   0.00776	   0.00630	   0.00606	   0.00630	   0.00776	   0.01325	   0.03263
                      0	   0.02086	   0.00129	  -0.00393	  -0.00555	  -0.00584	  -0.00555	  -0.00393	   0.00129	   0.02086
                      2	   0.02049	   0.00061	  -0.00484	  -0.00638	  -0.00660	  -0.00638	  -0.00484	   0.00061	   0.02049
                      4	   0.03038	   0.01037	   0.00470	   0.00420	   0.00315	   0.00338	   0.00471	   0.01037	   0.03038
                      6	   0.04964	   0.02989	   0.02396	   0.02310	   0.02297	   0.02310	   0.02396	   0.02989	   0.04964
                      8	   0.07754	   0.05877	   0.05319	   0.05207	   0.05201	   0.05207	   0.05319	   0.05877	   0.07759
                     10	   0.11432	   0.09611	   0.09155	   0.09076	   0.09060	   0.09076	   0.09154	   0.09610	   0.11433
                     12	   0.15947	   0.14296	   0.13762	   0.13749	   0.13704	   0.13750	   0.13761	   0.14296	   0.15947
                     14	   0.21195	   0.19815	   0.19145	   0.19116	   0.19132	   0.19117	   0.19144	   0.19815	   0.21195
                     16	   0.26712	   0.25368	   0.25136	   0.25299	   0.25211	   0.25299	   0.25133	   0.25368	   0.26711
                     18	   0.32464	   0.31369	   0.31422	   0.31724	   0.31622	   0.31723	   0.31419	   0.31368	   0.32463
                     20	   0.38595	   0.38324	   0.38209	   0.38870	   0.38807	   0.38870	   0.38204	   0.38319	   0.38594
                     22	   0.45093	   0.45732	   0.45700	   0.46153	   0.46239	   0.46152	   0.45694	   0.45728	   0.45091
                     24	   0.52134	   0.53369	   0.53085	   0.53584	   0.53826	   0.53579	   0.53076	   0.53366	   0.52132
                     26	   0.59782	   0.60998	   0.60951	   0.60792	   0.61125	   0.60788	   0.60941	   0.60997	   0.59777
                     28	   0.67534	   0.69315	   0.68511	   0.68598	   0.68752	   0.68596	   0.68487	   0.69313	   0.67532
                     30	   0.75238	   0.77455	   0.76356	   0.76232	   0.76589	   0.76227	   0.76347	   0.77456	   0.75243
                     35	   0.94916	   0.97608	   0.97366	   0.96293	   0.97037	   0.96288	   0.97346	   0.97606	   0.94915
                     45	   1.32475	   1.34676	   1.33618	   1.32209	   1.32435	   1.32209	   1.33619	   1.34675	   1.32475
                     50	   1.48455	   1.49512	   1.48122	   1.46944	   1.47476	   1.46944	   1.48200	   1.49517	   1.48422
                     55	   1.62085	   1.63221	   1.62877	   1.62485	   1.62634	   1.62486	   1.62903	   1.63236	   1.62085
                     60	   1.74812	   1.75538	   1.73731	   1.74374	   1.74420	   1.74367	   1.73737	   1.75546	   1.74814
            </tableData>
          </table>
    </function>
    <function name="aero/c/CFXFLAPS">
    <description>DRAG INCREMENT DUE TO FLAPS</description>
          <table>
            <independentVar lookup="row">aero/alpha-deg</independentVar>
            <independentVar lookup="column">fcs/flap-pos-deg</independentVar>
            <tableData>
                                  0	         35
                    -20	   0.00000	  -0.04321
                    -10	   0.00000	  -0.01152
                     -8	   0.00000	  -0.00463
                     -6	   0.00000	   0.00105
                     -4	   0.00000	   0.00098
                     -2	   0.00000	   0.00657
                      0	   0.00000	   0.01876
                      2	   0.00000	   0.02070
                      4	   0.00000	   0.02490
                      6	   0.00000	   0.03267
                      8	   0.00000	   0.04159
                     10	   0.00000	   0.04828
                     12	   0.00000	   0.05564
                     14	   0.00000	   0.05871
                     16	   0.00000	   0.06450
                     18	   0.00000	   0.07486
                     20	   0.00000	   0.07982
                     22	   0.00000	   0.08299
                     24	   0.00000	   0.08599
                     26	   0.00000	   0.08133
                     28	   0.00000	   0.08225
                     30	   0.00000	   0.07868
                     35	   0.00000	   0.07449
                     45	   0.00000	   0.06228
                     50	   0.00000	   0.04964
                     55	   0.00000	   0.04185
                     60	   0.00000	   0.02899
            </tableData>
          </table>
    </function>
    <function name="aero/c/CFZB">
    <description>BASE LIFT</description>
          <table>
            <independentVar lookup="row">aero/alpha-deg</independentVar>
            <independentVar lookup="column">fcs/elevator-pos-deg</independentVar>
            <tableData>
                                -30	        -25	        -20	        -15	        -10	         -5	          0	          5	         10	         15	         20	         25	         30
                    -20	  -0.88961	  -0.88240	  -0.87355	  -0.85401	  -0.83132	  -0.78252	  -0.72778	  -0.68079	  -0.64225	  -0.60318	  -0.55738	  -0.49530	  -0.43452
                    -10	  -0.56238	  -0.54463	  -0.52792	  -0.49715	  -0.43875	  -0.37951	  -0.32973	  -0.28783	  -0.24559	  -0.19413	  -0.13276	  -0.09245	  -0.08807
                     -8	  -0.48623	  -0.46493	  -0.44944	  -0.41112	  -0.35364	  -0.29615	  -0.24799	  -0.20766	  -0.16666	  -0.11353	  -0.06471	  -0.03275	  -0.02964
                     -6	  -0.41429	  -0.39243	  -0.37743	  -0.33586	  -0.27784	  -0.22067	  -0.17368	  -0.13589	  -0.09350	  -0.04923	  -0.00394	   0.03261	   0.04753
                     -4	  -0.34303	  -0.32157	  -0.30833	  -0.26202	  -0.20283	  -0.14916	  -0.10520	  -0.06803	  -0.02954	   0.01725	   0.06768	   0.10901	   0.12409
                     -2	  -0.27747	  -0.25771	  -0.24647	  -0.19276	  -0.13531	  -0.08418	  -0.04309	  -0.00811	   0.03395	   0.08586	   0.14016	   0.17593	   0.18984
                      0	  -0.21457	  -0.19995	  -0.18212	  -0.12353	  -0.06816	  -0.01955	   0.01760	   0.05379	   0.09895	   0.15348	   0.20790	   0.23793	   0.25156
                      2	  -0.15461	  -0.13969	  -0.11041	  -0.05618	  -0.00400	   0.04061	   0.07765	   0.11627	   0.16470	   0.22089	   0.27447	   0.29805	   0.31282
                      4	  -0.07351	  -0.06729	  -0.04164	   0.00912	   0.06199	   0.10758	   0.14495	   0.18635	   0.23707	   0.29624	   0.34400	   0.36226	   0.38171
                      6	  -0.00671	  -0.00911	   0.02645	   0.08226	   0.13847	   0.18150	   0.21950	   0.26387	   0.31777	   0.37398	   0.41805	   0.43453	   0.45625
                      8	   0.03801	   0.05035	   0.09983	   0.16307	   0.21684	   0.25795	   0.29741	   0.34524	   0.40179	   0.45894	   0.49300	   0.50944	   0.52967
                     10	   0.10083	   0.12781	   0.18506	   0.24937	   0.30034	   0.34146	   0.38418	   0.43602	   0.49406	   0.52593	   0.57364	   0.59478	   0.61382
                     12	   0.17627	   0.21392	   0.27596	   0.33885	   0.38578	   0.42816	   0.47337	   0.52858	   0.58805	   0.63665	   0.65627	   0.67960	   0.69493
                     14	   0.25921	   0.30616	   0.36935	   0.42777	   0.47431	   0.51552	   0.56342	   0.62159	   0.67975	   0.72111	   0.74160	   0.76330	   0.77805
                     16	   0.34461	   0.39620	   0.46114	   0.51508	   0.55719	   0.59931	   0.65068	   0.70980	   0.77148	   0.80213	   0.82443	   0.84775	   0.85862
                     18	   0.42215	   0.48716	   0.55315	   0.59936	   0.63980	   0.68235	   0.73554	   0.79426	   0.84621	   0.86545	   0.89228	   0.90519	   0.90980
                     20	   0.48505	   0.55402	   0.60501	   0.64496	   0.68144	   0.72422	   0.77867	   0.83807	   0.87705	   0.89617	   0.91719	   0.92995	   0.92603
                     22	   0.52718	   0.59297	   0.63469	   0.67019	   0.70639	   0.75204	   0.80858	   0.86602	   0.89406	   0.91386	   0.93349	   0.94111	   0.93551
                     24	   0.56044	   0.62087	   0.66020	   0.69494	   0.73442	   0.78414	   0.84137	   0.86536	   0.91118	   0.93464	   0.94968	   0.95288	   0.94698
                     26	   0.60121	   0.64987	   0.68656	   0.72163	   0.76221	   0.81576	   0.87229	   0.91522	   0.93198	   0.95278	   0.96628	   0.96106	   0.96103
                     28	   0.63764	   0.68186	   0.71901	   0.75623	   0.80189	   0.85836	   0.91488	   0.93875	   0.96192	   0.97713	   0.98222	   0.97982	   0.97804
                     30	   0.66073	   0.70658	   0.74277	   0.78112	   0.83278	   0.89052	   0.94404	   0.96292	   0.98294	   0.99682	   0.99812	   0.99901	   0.99307
                     35	   0.74830	   0.78314	   0.82088	   0.86963	   0.92775	   0.98299	   1.00068	   1.02343	   1.03853	   1.03820	   1.03131	   1.02721	   1.02055
                     45	   0.83141	   0.87449	   0.92764	   0.97994	   1.07253	   1.04232	   1.05331	   1.05803	   1.05601	   1.06019	   1.03967	   1.03851	   1.03431
                     50	   0.90328	   0.95485	   1.01071	   1.05623	   1.08049	   1.09135	   1.09662	   1.09431	   1.08846	   1.07837	   1.06890	   1.06498	   1.06204
                     55	   1.02372	   1.07835	   1.12557	   1.14595	   1.16363	   1.17068	   1.16769	   1.16352	   1.15625	   1.14400	   1.13177	   1.12530	   1.12352
                     60	   1.15850	   1.20436	   1.22537	   1.24596	   1.25501	   1.24954	   1.24096	   1.23256	   1.22181	   1.21001	   1.21189	   1.19279	   1.18756
            </tableData>
          </table>
    </function>
    <function name="aero/c/CFZFLAPS">
    <description>LIFT INCREMENT DUE TO FLAPS</description>
          <table>
            <independentVar lookup="row">aero/alpha-deg</independentVar>
            <independentVar lookup="column">fcs/flap-pos-deg</independentVar>
            <tableData>
                                  0	         35
                    -20	   0.00000	   0.15657
                    -10	   0.00000	   0.13011
                     -8	   0.00000	   0.12070
                     -6	   0.00000	   0.11957
                     -4	   0.00000	   0.12161
                     -2	   0.00000	   0.12093
                      0	   0.00000	   0.10161
                      2	   0.00000	   0.12531
                      4	   0.00000	   0.15844
                      6	   0.00000	   0.17897
                      8	   0.00000	   0.18491
                     10	   0.00000	   0.20978
                     12	   0.00000	   0.17417
                     14	   0.00000	   0.09885
                     16	   0.00000	   0.03948
                     18	   0.00000	  -0.02412
                     20	   0.00000	  -0.04692
                     22	   0.00000	  -0.03600
                     24	   0.00000	  -0.03472
                     26	   0.00000	  -0.01129
                     28	   0.00000	  -0.01470
                     30	   0.00000	   0.00061
                     35	   0.00000	   0.03699
                     45	   0.00000	   0.00851
                     50	   0.00000	   0.01910
                     55	   0.00000	   0.01372
                     60	   0.00000	   0.01731
            </tableData>
          </table>
    </function>
    <function name="aero/c/CMM1">
    <description>BASE PITCHING MOMENT</description>
          <table>
            <independentVar lookup="row">aero/alpha-deg</independentVar>
            <independentVar lookup="column">fcs/elevator-pos-deg</independentVar>
            <tableData>
                                -30	        -25	        -20	        -15	        -10	         -5	          0	          5	         10	         15	         20	         25	         30
                    -20	   0.42961	   0.40811	   0.38651	   0.34970	   0.31293	   0.23544	   0.15107	   0.08225	   0.02845	  -0.02413	  -0.08227	  -0.15839	  -0.22694
                    -10	   0.36502	   0.33936	   0.31571	   0.27399	   0.18967	   0.10586	   0.03839	  -0.01655	  -0.07007	  -0.13562	  -0.21896	  -0.27268	  -0.28370
                     -8	   0.34965	   0.31952	   0.29992	   0.24685	   0.16457	   0.08438	   0.01954	  -0.03306	  -0.08563	  -0.15818	  -0.22852	  -0.27973	  -0.29022
                     -6	   0.33609	   0.30636	   0.28872	   0.23081	   0.14863	   0.06956	   0.00668	  -0.04232	  -0.09955	  -0.16448	  -0.23445	  -0.28515	  -0.29673
                     -4	   0.32205	   0.29423	   0.27910	   0.21543	   0.13176	   0.05809	  -0.00011	  -0.04914	  -0.10390	  -0.17253	  -0.24294	  -0.29199	  -0.30412
                     -2	   0.31215	   0.28738	   0.27594	   0.20228	   0.12255	   0.05385	  -0.00027	  -0.04803	  -0.10749	  -0.17928	  -0.25309	  -0.29601	  -0.30857
                      0	   0.30473	   0.28847	   0.27023	   0.19141	   0.11745	   0.05192	   0.00072	  -0.04943	  -0.11226	  -0.18811	  -0.26333	  -0.30044	  -0.31456
                      2	   0.29593	   0.28781	   0.25938	   0.18412	   0.11035	   0.04784	  -0.00267	  -0.05568	  -0.12331	  -0.20252	  -0.27738	  -0.30589	  -0.32290
                      4	   0.29134	   0.28692	   0.24867	   0.17368	   0.10086	   0.03974	  -0.01058	  -0.06735	  -0.13858	  -0.22285	  -0.28941	  -0.31118	  -0.33590
                      6	   0.28586	   0.28212	   0.23078	   0.15687	   0.08235	   0.02527	  -0.02561	  -0.08664	  -0.16308	  -0.24355	  -0.30523	  -0.32536	  -0.35449
                      8	   0.28986	   0.27588	   0.21514	   0.13381	   0.06390	   0.00988	  -0.04280	  -0.10911	  -0.19001	  -0.27290	  -0.32044	  -0.34185	  -0.37007
                     10	   0.28452	   0.25836	   0.18995	   0.10796	   0.04271	  -0.01071	  -0.06772	  -0.13991	  -0.22376	  -0.28517	  -0.33842	  -0.36762	  -0.39516
                     12	   0.27164	   0.23396	   0.15901	   0.07971	   0.02040	  -0.03446	  -0.09485	  -0.17226	  -0.25941	  -0.33065	  -0.35822	  -0.39231	  -0.41592
                     14	   0.25318	   0.20234	   0.12579	   0.05359	  -0.00490	  -0.05782	  -0.12250	  -0.20515	  -0.29148	  -0.35233	  -0.38307	  -0.41610	  -0.44078
                     16	   0.23051	   0.17079	   0.09108	   0.02377	  -0.02953	  -0.08457	  -0.15550	  -0.24109	  -0.33435	  -0.37792	  -0.41388	  -0.45000	  -0.47158
                     18	   0.21104	   0.13318	   0.05096	  -0.00585	  -0.05783	  -0.11491	  -0.19148	  -0.27976	  -0.36051	  -0.39217	  -0.43762	  -0.46198	  -0.47621
                     20	   0.19848	   0.10931	   0.04476	  -0.00763	  -0.05786	  -0.11853	  -0.20093	  -0.29442	  -0.35813	  -0.39262	  -0.43382	  -0.46115	  -0.46483
                     22	   0.18353	   0.09735	   0.04355	  -0.00636	  -0.05833	  -0.12508	  -0.21190	  -0.30554	  -0.35523	  -0.39507	  -0.43347	  -0.45550	  -0.45753
                     24	   0.17253	   0.09271	   0.04205	  -0.00739	  -0.06275	  -0.13801	  -0.22972	  -0.27965	  -0.35057	  -0.39589	  -0.43083	  -0.44569	  -0.44959
                     26	   0.15477	   0.09209	   0.04429	  -0.00513	  -0.06591	  -0.14742	  -0.23947	  -0.31207	  -0.34844	  -0.39158	  -0.42628	  -0.43066	  -0.44284
                     28	   0.14192	   0.08446	   0.03554	  -0.01556	  -0.08353	  -0.17024	  -0.26922	  -0.31370	  -0.36080	  -0.39706	  -0.42209	  -0.43037	  -0.44429
                     30	   0.14230	   0.08347	   0.03515	  -0.01963	  -0.09550	  -0.18650	  -0.27584	  -0.31439	  -0.35997	  -0.39871	  -0.41664	  -0.43009	  -0.44167
                     35	   0.09319	   0.04377	  -0.00826	  -0.07938	  -0.16960	  -0.26193	  -0.30766	  -0.35895	  -0.40099	  -0.41987	  -0.42686	  -0.43830	  -0.44912
                     45	   0.08462	   0.02736	  -0.05024	  -0.13352	  -0.27119	  -0.26114	  -0.30399	  -0.33556	  -0.35575	  -0.37107	  -0.36983	  -0.38687	  -0.40345
                     50	   0.00793	  -0.06438	  -0.15179	  -0.23185	  -0.28810	  -0.32976	  -0.36631	  -0.39081	  -0.40682	  -0.41296	  -0.41346	  -0.42765	  -0.44594
                     55	  -0.16741	  -0.24867	  -0.32977	  -0.38158	  -0.43766	  -0.47820	  -0.50559	  -0.52804	  -0.54275	  -0.54374	  -0.53754	  -0.54972	  -0.56917
                     60	  -0.34389	  -0.42136	  -0.47617	  -0.53733	  -0.58657	  -0.61041	  -0.62893	  -0.64566	  -0.65611	  -0.65510	  -0.65804	  -0.65809	  -0.67394
            </tableData>
          </table>
    </function>
    <function name="aero/c/CMMFLAPS">
    <description>PITCHING MOMENT INCREMENT DUE TO FLAPS</description>
    <product>
          <property>fcs/flap-pos-deg</property>
          <table>
            <independentVar lookup="row">aero/alpha-deg</independentVar>
            <independentVar lookup="column">aero/beta-deg</independentVar>
            <tableData>
                                -20	        -10	         -5	         -2	          0	          2	          5	         10	         20
                    -20	  -0.00292	  -0.00148	  -0.00091	  -0.00056	  -0.00051	  -0.00058	  -0.00090	  -0.00150	  -0.00292
                    -10	  -0.00249	  -0.00055	   0.00038	   0.00063	   0.00074	   0.00063	   0.00038	  -0.00055	  -0.00250
                     -8	  -0.00241	  -0.00026	   0.00066	   0.00099	   0.00097	   0.00102	   0.00065	  -0.00026	  -0.00241
                     -6	  -0.00245	  -0.00007	   0.00075	   0.00063	   0.00088	   0.00064	   0.00075	  -0.00005	  -0.00245
                     -4	  -0.00273	  -0.00120	   0.00015	  -0.00001	   0.00064	   0.00000	   0.00016	  -0.00119	  -0.00272
                     -2	  -0.00259	  -0.00044	   0.00054	   0.00119	   0.00071	   0.00118	   0.00054	  -0.00045	  -0.00257
                      0	  -0.00293	  -0.00133	  -0.00050	   0.00021	   0.00054	   0.00023	  -0.00050	  -0.00133	  -0.00292
                      2	  -0.00344	  -0.00164	  -0.00087	  -0.00063	  -0.00036	  -0.00062	  -0.00088	  -0.00162	  -0.00343
                      4	  -0.00392	  -0.00206	  -0.00158	  -0.00131	  -0.00129	  -0.00132	  -0.00158	  -0.00207	  -0.00392
                      6	  -0.00422	  -0.00281	  -0.00208	  -0.00195	  -0.00185	  -0.00194	  -0.00208	  -0.00281	  -0.00422
                      8	  -0.00433	  -0.00331	  -0.00246	  -0.00229	  -0.00203	  -0.00229	  -0.00246	  -0.00331	  -0.00434
                     10	  -0.00440	  -0.00332	  -0.00301	  -0.00303	  -0.00262	  -0.00303	  -0.00301	  -0.00332	  -0.00440
                     12	  -0.00438	  -0.00332	  -0.00233	  -0.00232	  -0.00212	  -0.00232	  -0.00233	  -0.00332	  -0.00438
                     14	  -0.00419	  -0.00209	  -0.00154	  -0.00135	  -0.00085	  -0.00135	  -0.00154	  -0.00208	  -0.00418
                     16	  -0.00333	  -0.00088	  -0.00091	  -0.00067	  -0.00025	  -0.00067	  -0.00092	  -0.00088	  -0.00332
                     18	  -0.00237	  -0.00047	  -0.00013	   0.00086	   0.00039	   0.00013	  -0.00013	  -0.00047	  -0.00234
                     20	  -0.00179	   0.00013	  -0.00025	   0.00039	   0.00050	   0.00039	  -0.00025	   0.00013	  -0.00179
                     22	  -0.00136	   0.00013	  -0.00028	   0.00012	   0.00021	   0.00011	  -0.00028	   0.00013	  -0.00136
                     24	  -0.00136	  -0.00062	  -0.00018	  -0.00014	   0.00048	  -0.00015	  -0.00019	  -0.00063	  -0.00136
                     26	  -0.00139	  -0.00068	  -0.00062	   0.00002	  -0.00008	   0.00002	  -0.00063	  -0.00069	  -0.00139
                     28	  -0.00138	  -0.00204	  -0.00069	  -0.00030	   0.00034	  -0.00030	  -0.00070	  -0.00085	  -0.00138
                     30	  -0.00135	  -0.00151	  -0.00121	  -0.00048	  -0.00020	  -0.00049	  -0.00123	  -0.00151	  -0.00134
                     35	  -0.00116	  -0.00160	  -0.00172	  -0.00115	  -0.00117	  -0.00115	  -0.00177	  -0.00161	  -0.00116
                     45	  -0.00103	  -0.00110	  -0.00150	  -0.00097	   0.00006	  -0.00098	  -0.00149	  -0.00109	  -0.00103
                     50	  -0.00078	  -0.00119	  -0.00123	  -0.00097	  -0.00068	  -0.00097	  -0.00114	  -0.00119	  -0.00079
                     55	  -0.00071	  -0.00111	  -0.00112	  -0.00094	  -0.00097	  -0.00094	  -0.00113	  -0.00110	  -0.00071
                     60	  -0.00057	  -0.00070	  -0.00071	  -0.00066	  -0.00070	  -0.00065	  -0.00072	  -0.00070	  -0.00057
            </tableData>
          </table>
       </product>
    </function>
    <function name="aero/c/CMMQ">
    <description>PITCH DAMPING DERIVATIVE</description>
    <product>
          <property>aero/qb</property>
          <table>
            <independentVar lookup="row">aero/alpha-deg</independentVar>
            <tableData>
                    -20		  -3.28217
                    -10		  -2.84687
                     -8		  -2.70929
                     -6		  -2.53605
                     -4		  -2.33848
                     -2		  -2.27663
                      0		  -2.39373
                      2		  -2.50219
                      4		  -2.68005
                      6		  -2.99392
                      8		  -3.20088
                     10		  -3.43088
                     12		  -3.61355
                     14		  -3.77369
                     16		  -3.82870
                     18		  -3.04879
                     20		  -3.20191
                     22		  -3.06558
                     24		  -3.08576
                     26		  -2.80036
                     28		  -2.38418
                     30		  -1.93508
                     35		  -1.72152
                     45		  -1.82307
                     50		  -0.77226
                     55		  -0.85070
                     60		  -0.80734
            </tableData>
          </table>
       </product>
    </function>
    <function name="aero/c/CML1">
    <description>BASE ROLLING MOMENT</description>
          <table>
            <independentVar lookup="row">aero/alpha-deg</independentVar>
            <independentVar lookup="column">aero/beta-deg</independentVar>
            <tableData>
                                -20	        -10	         -5	         -2	          0	          2	          5	         10	         20
                    -20	  -0.02115	  -0.01015	  -0.00511	  -0.00212	   0.00000	   0.00211	   0.00509	   0.01014	   0.02111
                    -10	   0.00248	  -0.00114	  -0.00108	  -0.00066	   0.00000	   0.00066	   0.00109	   0.00114	  -0.00246
                     -8	   0.00748	   0.00104	  -0.00008	  -0.00030	   0.00000	   0.00026	   0.00008	  -0.00104	  -0.00748
                     -6	   0.01251	   0.00398	   0.00111	   0.00029	  -0.00001	  -0.00031	  -0.00112	  -0.00398	  -0.01252
                     -4	   0.01689	   0.00715	   0.00244	   0.00079	   0.00000	  -0.00080	  -0.00245	  -0.00716	  -0.01689
                     -2	   0.02151	   0.00935	   0.00390	   0.00145	   0.00000	  -0.00145	  -0.00391	  -0.00935	  -0.02150
                      0	   0.02557	   0.01133	   0.00513	   0.00195	   0.00000	  -0.00195	  -0.00513	  -0.01133	  -0.02557
                      2	   0.02910	   0.01319	   0.00585	   0.00218	   0.00000	  -0.00218	  -0.00585	  -0.01319	  -0.02910
                      4	   0.03169	   0.01478	   0.00677	   0.00325	   0.00000	  -0.00269	  -0.00676	  -0.01477	  -0.03169
                      6	   0.03462	   0.01657	   0.00791	   0.00324	   0.00000	  -0.00323	  -0.00790	  -0.01657	  -0.03462
                      8	   0.03696	   0.01881	   0.00902	   0.00364	   0.00000	  -0.00365	  -0.00902	  -0.01882	  -0.03706
                     10	   0.03874	   0.01995	   0.00969	   0.00388	   0.00000	  -0.00388	  -0.00969	  -0.01996	  -0.03874
                     12	   0.04035	   0.02013	   0.01024	   0.00384	  -0.00001	  -0.00383	  -0.01023	  -0.02012	  -0.04037
                     14	   0.04248	   0.02304	   0.01095	   0.00396	   0.00000	  -0.00395	  -0.01096	  -0.02304	  -0.04250
                     16	   0.04553	   0.02522	   0.01234	   0.00408	   0.00000	  -0.00404	  -0.01234	  -0.02524	  -0.04555
                     18	   0.04833	   0.02732	   0.01330	   0.00423	   0.00001	  -0.00421	  -0.01330	  -0.02733	  -0.04835
                     20	   0.05017	   0.03008	   0.01378	   0.00383	  -0.00002	  -0.00383	  -0.01385	  -0.03009	  -0.05018
                     22	   0.05110	   0.03035	   0.01396	   0.00523	   0.00000	  -0.00522	  -0.01397	  -0.03038	  -0.05111
                     24	   0.05292	   0.03032	   0.01547	   0.00614	   0.00000	  -0.00619	  -0.01549	  -0.03035	  -0.05293
                     26	   0.05385	   0.03258	   0.01569	   0.00627	  -0.00002	  -0.00630	  -0.01575	  -0.03261	  -0.05378
                     28	   0.05593	   0.03330	   0.01647	   0.00596	  -0.00002	  -0.00600	  -0.01647	  -0.03334	  -0.05594
                     30	   0.05880	   0.03652	   0.01743	   0.00681	  -0.00003	  -0.00683	  -0.01745	  -0.03657	  -0.05880
                     35	   0.05859	   0.03738	   0.01806	   0.00713	  -0.00002	  -0.00714	  -0.01813	  -0.03740	  -0.05858
                     45	   0.05942	   0.04228	   0.01103	  -0.00072	  -0.00001	   0.00069	  -0.01105	  -0.04227	  -0.05944
                     50	   0.06571	   0.04581	   0.02116	   0.00613	  -0.00001	  -0.00612	  -0.02120	  -0.04588	  -0.06560
                     55	   0.06856	   0.05839	   0.02564	   0.00972	   0.00001	  -0.00972	  -0.02573	  -0.05842	  -0.06858
                     60	   0.07404	   0.06098	   0.01796	   0.01025	   0.00000	  -0.01018	  -0.01796	  -0.06100	  -0.07405
            </tableData>
          </table>
    </function>
    <function name="aero/c/CMLDAD">
    <description>ROLLING MOMENT DUE TO AILERON DEFLECTION</description>
    <product>
          <property>fcs/aileron-pos-deg</property>
          <table>
            <independentVar lookup="row">aero/alpha-deg</independentVar>
            <independentVar lookup="column">aero/beta-deg</independentVar>
            <tableData>
                                -20	        -10	         -5	         -2	          0	          2	          5	         10	         20
                    -20	   0.00118	   0.00097	   0.00087	   0.00088	   0.00091	   0.00093	   0.00095	   0.00094	   0.00082
                    -10	   0.00108	   0.00134	   0.00145	   0.00149	   0.00150	   0.00150	   0.00147	   0.00134	   0.00111
                     -8	   0.00102	   0.00130	   0.00144	   0.00149	   0.00149	   0.00148	   0.00145	   0.00130	   0.00107
                     -6	   0.00097	   0.00126	   0.00141	   0.00147	   0.00144	   0.00145	   0.00144	   0.00125	   0.00102
                     -4	   0.00092	   0.00116	   0.00136	   0.00143	   0.00136	   0.00142	   0.00143	   0.00121	   0.00093
                     -2	   0.00081	   0.00118	   0.00139	   0.00140	   0.00137	   0.00142	   0.00132	   0.00116	   0.00092
                      0	   0.00087	   0.00116	   0.00134	   0.00135	   0.00134	   0.00137	   0.00132	   0.00119	   0.00094
                      2	   0.00092	   0.00118	   0.00132	   0.00136	   0.00136	   0.00135	   0.00132	   0.00121	   0.00098
                      4	   0.00101	   0.00124	   0.00136	   0.00136	   0.00139	   0.00139	   0.00136	   0.00126	   0.00106
                      6	   0.00112	   0.00131	   0.00140	   0.00142	   0.00143	   0.00142	   0.00140	   0.00131	   0.00114
                      8	   0.00118	   0.00135	   0.00143	   0.00145	   0.00145	   0.00145	   0.00143	   0.00136	   0.00120
                     10	   0.00125	   0.00138	   0.00144	   0.00146	   0.00147	   0.00147	   0.00145	   0.00139	   0.00125
                     12	   0.00127	   0.00139	   0.00145	   0.00147	   0.00147	   0.00147	   0.00145	   0.00139	   0.00127
                     14	   0.00126	   0.00136	   0.00142	   0.00144	   0.00144	   0.00144	   0.00142	   0.00137	   0.00125
                     16	   0.00123	   0.00133	   0.00135	   0.00136	   0.00135	   0.00137	   0.00136	   0.00137	   0.00126
                     18	   0.00111	   0.00110	   0.00105	   0.00104	   0.00104	   0.00105	   0.00105	   0.00109	   0.00127
                     20	   0.00094	   0.00077	   0.00069	   0.00069	   0.00063	   0.00064	   0.00065	   0.00069	   0.00100
                     22	   0.00075	   0.00045	   0.00043	   0.00043	   0.00041	   0.00042	   0.00044	   0.00046	   0.00062
                     24	   0.00048	   0.00031	   0.00035	   0.00037	   0.00038	   0.00039	   0.00041	   0.00042	   0.00034
                     26	   0.00032	   0.00032	   0.00038	   0.00040	   0.00040	   0.00042	   0.00045	   0.00039	   0.00028
                     28	   0.00027	   0.00032	   0.00037	   0.00039	   0.00038	   0.00038	   0.00037	   0.00037	   0.00030
                     30	   0.00024	   0.00034	   0.00035	   0.00032	   0.00033	   0.00036	   0.00034	   0.00030	   0.00030
                     35	   0.00033	   0.00030	   0.00029	   0.00027	   0.00026	   0.00026	   0.00028	   0.00027	   0.00028
                     45	   0.00028	   0.00025	   0.00028	   0.00026	   0.00025	   0.00028	   0.00029	   0.00027	   0.00024
                     50	   0.00025	   0.00026	   0.00026	   0.00025	   0.00024	   0.00032	   0.00026	   0.00024	   0.00024
                     55	   0.00027	   0.00023	   0.00025	   0.00023	   0.00021	   0.00022	   0.00024	   0.00025	   0.00027
                     60	   0.00026	   0.00017	   0.00020	   0.00022	   0.00021	   0.00021	   0.00020	   0.00021	   0.00024
            </tableData>
          </table>
       </product>
    </function>
    <function name="aero/c/CMLDRD">
    <description>ROLLING MOMENT DUE TO RUDDER DEFLECTION</description>
    <product>
          <property>fcs/rudder-pos-deg</property>
          <table>
            <independentVar lookup="row">aero/alpha-deg</independentVar>
            <independentVar lookup="column">aero/beta-deg</independentVar>
            <tableData>
                                -20	        -10	         -5	         -2	          0	          2	          5	         10	         20
                    -20	   0.00009	   0.00011	   0.00010	   0.00009	   0.00010	   0.00011	   0.00010	   0.00013	   0.00011
                    -10	   0.00013	   0.00016	   0.00013	   0.00012	   0.00011	   0.00011	   0.00011	   0.00013	   0.00011
                     -8	   0.00014	   0.00016	   0.00014	   0.00012	   0.00011	   0.00011	   0.00012	   0.00013	   0.00012
                     -6	   0.00014	   0.00016	   0.00015	   0.00012	   0.00012	   0.00012	   0.00012	   0.00014	   0.00013
                     -4	   0.00014	   0.00015	   0.00014	   0.00013	   0.00012	   0.00012	   0.00012	   0.00014	   0.00014
                     -2	   0.00014	   0.00016	   0.00014	   0.00013	   0.00012	   0.00012	   0.00012	   0.00014	   0.00014
                      0	   0.00014	   0.00016	   0.00014	   0.00014	   0.00012	   0.00012	   0.00012	   0.00014	   0.00015
                      2	   0.00013	   0.00016	   0.00014	   0.00012	   0.00011	   0.00011	   0.00011	   0.00013	   0.00015
                      4	   0.00010	   0.00015	   0.00014	   0.00009	   0.00011	   0.00011	   0.00011	   0.00013	   0.00014
                      6	   0.00007	   0.00015	   0.00014	   0.00012	   0.00012	   0.00011	   0.00011	   0.00012	   0.00014
                      8	   0.00006	   0.00014	   0.00013	   0.00012	   0.00011	   0.00010	   0.00010	   0.00011	   0.00014
                     10	   0.00004	   0.00012	   0.00010	   0.00010	   0.00009	   0.00009	   0.00009	   0.00010	   0.00014
                     12	   0.00003	   0.00010	   0.00009	   0.00008	   0.00007	   0.00006	   0.00007	   0.00009	   0.00014
                     14	   0.00002	   0.00008	   0.00008	   0.00007	   0.00006	   0.00005	   0.00005	   0.00007	   0.00012
                     16	  -0.00001	   0.00006	   0.00002	   0.00002	   0.00002	   0.00001	   0.00002	   0.00004	   0.00011
                     18	   0.00001	   0.00007	   0.00000	  -0.00003	  -0.00002	  -0.00002	  -0.00001	   0.00002	   0.00009
                     20	   0.00003	   0.00001	  -0.00005	  -0.00005	  -0.00006	  -0.00006	  -0.00004	   0.00000	   0.00009
                     22	   0.00001	   0.00001	  -0.00007	  -0.00009	  -0.00007	  -0.00008	  -0.00005	  -0.00001	   0.00007
                     24	   0.00002	   0.00003	  -0.00009	  -0.00010	  -0.00008	  -0.00008	  -0.00007	  -0.00003	   0.00008
                     26	  -0.00001	   0.00003	  -0.00007	  -0.00011	  -0.00010	  -0.00008	  -0.00004	   0.00000	   0.00006
                     28	  -0.00001	   0.00005	   0.00000	  -0.00003	  -0.00005	  -0.00007	  -0.00006	   0.00002	   0.00006
                     30	  -0.00002	   0.00006	   0.00003	  -0.00001	  -0.00002	  -0.00007	  -0.00002	   0.00001	   0.00006
                     35	  -0.00002	  -0.00001	   0.00008	   0.00002	   0.00000	   0.00003	   0.00002	   0.00002	   0.00007
                     45	  -0.00003	  -0.00006	   0.00001	   0.00006	   0.00005	   0.00006	   0.00010	   0.00011	   0.00008
                     50	  -0.00002	  -0.00005	   0.00000	   0.00002	   0.00006	   0.00016	   0.00010	   0.00009	   0.00010
                     55	  -0.00002	  -0.00002	   0.00003	   0.00003	   0.00004	   0.00008	   0.00006	   0.00008	   0.00009
                     60	  -0.00002	  -0.00001	   0.00001	   0.00001	   0.00002	   0.00002	   0.00002	   0.00004	   0.00007
            </tableData>
          </table>
       </product>
    </function>
    <function name="aero/c/CMLDTD">
    <description>ROLL MOMENT DUE TO DIFFERENTIAL TAIL DEFLECTION - CLDD</description>
    <product>
          <property>fcs/differential-elevator-pos-deg</property>
          <table>
            <independentVar lookup="row">aero/alpha-deg</independentVar>
            <independentVar lookup="column">fcs/elevator-pos-deg</independentVar>
            <tableData>
                                -30	        -25	        -20	        -15	        -10	         -5	          0	          5	         10	         15	         20	         25	         30
                    -20	  -0.00006	   0.00027	   0.00050	   0.00079	   0.00157	   0.00228	   0.00232	   0.00195	   0.00171	   0.00182	   0.00222	   0.00217	   0.00146
                    -10	   0.00017	   0.00038	   0.00092	   0.00176	   0.00250	   0.00236	   0.00198	   0.00177	   0.00191	   0.00218	   0.00181	   0.00058	  -0.00038
                     -8	   0.00016	   0.00042	   0.00095	   0.00187	   0.00245	   0.00225	   0.00186	   0.00170	   0.00190	   0.00196	   0.00140	   0.00036	  -0.00007
                     -6	   0.00018	   0.00039	   0.00100	   0.00198	   0.00240	   0.00214	   0.00175	   0.00164	   0.00172	   0.00176	   0.00141	   0.00072	   0.00039
                     -4	   0.00017	   0.00038	   0.00108	   0.00201	   0.00233	   0.00201	   0.00164	   0.00154	   0.00171	   0.00194	   0.00164	   0.00084	   0.00040
                     -2	   0.00011	   0.00036	   0.00114	   0.00209	   0.00223	   0.00185	   0.00155	   0.00158	   0.00192	   0.00213	   0.00164	   0.00082	   0.00041
                      0	   0.00012	   0.00044	   0.00126	   0.00214	   0.00212	   0.00172	   0.00151	   0.00169	   0.00206	   0.00223	   0.00158	   0.00074	   0.00040
                      2	   0.00015	   0.00055	   0.00137	   0.00204	   0.00197	   0.00166	   0.00158	   0.00182	   0.00222	   0.00222	   0.00143	   0.00065	   0.00041
                      4	   0.00002	   0.00036	   0.00123	   0.00196	   0.00196	   0.00171	   0.00166	   0.00197	   0.00232	   0.00216	   0.00130	   0.00063	   0.00045
                      6	  -0.00046	   0.00024	   0.00150	   0.00215	   0.00200	   0.00171	   0.00175	   0.00211	   0.00239	   0.00206	   0.00115	   0.00060	   0.00045
                      8	  -0.00040	   0.00072	   0.00193	   0.00224	   0.00197	   0.00171	   0.00188	   0.00225	   0.00250	   0.00189	   0.00105	   0.00059	   0.00046
                     10	   0.00005	   0.00119	   0.00216	   0.00227	   0.00192	   0.00177	   0.00203	   0.00245	   0.00246	   0.00165	   0.00093	   0.00063	   0.00046
                     12	   0.00050	   0.00155	   0.00228	   0.00220	   0.00187	   0.00185	   0.00219	   0.00252	   0.00230	   0.00146	   0.00085	   0.00068	   0.00037
                     14	   0.00082	   0.00179	   0.00231	   0.00210	   0.00182	   0.00190	   0.00232	   0.00262	   0.00215	   0.00140	   0.00086	   0.00071	   0.00030
                     16	   0.00089	   0.00194	   0.00226	   0.00201	   0.00181	   0.00203	   0.00248	   0.00266	   0.00191	   0.00134	   0.00089	   0.00064	   0.00020
                     18	   0.00123	   0.00221	   0.00222	   0.00183	   0.00176	   0.00208	   0.00254	   0.00247	   0.00166	   0.00100	   0.00088	   0.00044	   0.00010
                     20	   0.00140	   0.00210	   0.00183	   0.00159	   0.00171	   0.00217	   0.00261	   0.00228	   0.00146	   0.00096	   0.00084	   0.00035	  -0.00001
                     22	   0.00160	   0.00207	   0.00168	   0.00154	   0.00182	   0.00234	   0.00268	   0.00201	   0.00131	   0.00092	   0.00074	   0.00027	  -0.00012
                     24	   0.00179	   0.00195	   0.00155	   0.00159	   0.00197	   0.00252	   0.00258	   0.00178	   0.00109	   0.00156	   0.00062	   0.00021	  -0.00005
                     26	   0.00184	   0.00179	   0.00152	   0.00170	   0.00214	   0.00264	   0.00239	   0.00158	   0.00104	   0.00093	   0.00055	   0.00016	   0.00004
                     28	   0.00189	   0.00163	   0.00154	   0.00181	   0.00235	   0.00270	   0.00209	   0.00141	   0.00101	   0.00078	   0.00050	   0.00020	   0.00007
                     30	   0.00192	   0.00159	   0.00160	   0.00198	   0.00257	   0.00265	   0.00195	   0.00122	   0.00108	   0.00069	   0.00046	   0.00027	   0.00005
                     35	   0.00158	   0.00151	   0.00188	   0.00245	   0.00274	   0.00207	   0.00141	   0.00126	   0.00077	   0.00041	   0.00034	   0.00031	   0.00022
                     45	   0.00168	   0.00218	   0.00264	   0.00255	   0.00197	   0.00145	   0.00112	   0.00077	   0.00039	   0.00025	   0.00038	   0.00041	   0.00021
                     50	   0.00197	   0.00254	   0.00263	   0.00211	   0.00154	   0.00124	   0.00093	   0.00059	   0.00031	   0.00015	   0.00028	   0.00038	   0.00029
                     55	   0.00239	   0.00255	   0.00218	   0.00166	   0.00144	   0.00104	   0.00070	   0.00054	   0.00017	  -0.00004	   0.00012	   0.00031	   0.00028
                     60	   0.00252	   0.00219	   0.00183	   0.00171	   0.00114	   0.00068	   0.00050	   0.00036	   0.00011	  -0.00003	   0.00014	   0.00024	   0.00028
            </tableData>
          </table>
       </product>
    </function>
    <function name="aero/c/CMLP">
    <description>ROLL DAMPING DERIVATIVE</description>
    <product>
          <property>aero/pb</property>
          <table>
            <independentVar lookup="row">aero/alpha-deg</independentVar>
            <tableData>
                    -20		  -0.20655
                    -10		  -0.34314
                     -8		  -0.33012
                     -6		  -0.31475
                     -4		  -0.29312
                     -2		  -0.27879
                      0		  -0.26538
                      2		  -0.27695
                      4		  -0.29578
                      6		  -0.31541
                      8		  -0.32997
                     10		  -0.33804
                     12		  -0.34214
                     14		  -0.34089
                     16		  -0.33459
                     18		  -0.25330
                     20		  -0.14012
                     22		  -0.09941
                     24		  -0.09109
                     26		  -0.07547
                     28		  -0.07205
                     30		  -0.05300
                     35		  -0.01998
                     45		   0.00520
                     50		   0.01949
                     55		   0.05196
                     60		   0.04630
            </tableData>
          </table>
       </product>
    </function>
    <function name="aero/c/CMLR">
    <description>ROLLING MOMENT DUE TO YAW RATE</description>
    <product>
          <property>aero/rb</property>
          <table>
            <independentVar lookup="row">aero/alpha-deg</independentVar>
            <tableData>
                    -20		  -0.07669
                    -10		  -0.03059
                     -8		  -0.01018
                     -6		   0.01482
                     -4		   0.03732
                     -2		   0.05786
                      0		   0.07283
                      2		   0.08613
                      4		   0.10335
                      6		   0.12175
                      8		   0.13756
                     10		   0.15213
                     12		   0.16128
                     14		   0.17079
                     16		   0.17709
                     18		   0.16101
                     20		   0.13307
                     22		   0.13053
                     24		   0.13763
                     26		   0.12793
                     28		   0.12300
                     30		   0.11895
                     35		   0.11676
                     45		   0.10413
                     50		   0.15258
                     55		   0.13329
                     60		   0.16624
            </tableData>
          </table>
       </product>
    </function>
    <function name="aero/c/CFYB">
    <description>BASE SIDEFORCE</description>
          <table>
            <independentVar lookup="row">aero/alpha-deg</independentVar>
            <independentVar lookup="column">aero/beta-deg</independentVar>
            <independentVar lookup="table">fcs/elevator-pos-deg</independentVar>
              <tableData breakPoint="-30">
                              -20	       -10	        -5	        -2	         0	         2	         5	        10	        20
                    -20	   0.14044	   0.07521	   0.03756	   0.01586	  -0.00006	  -0.01596	  -0.03765	  -0.07533	  -0.14038
                    -10	   0.18896	   0.09164	   0.05094	   0.01945	  -0.00004	  -0.01993	  -0.05103	  -0.09174	  -0.18895
                     -8	   0.19572	   0.08994	   0.05054	   0.01834	  -0.00005	  -0.01841	  -0.05061	  -0.09004	  -0.19577
                     -6	   0.20251	   0.09208	   0.04953	   0.02041	  -0.00004	  -0.02048	  -0.04961	  -0.09217	  -0.20261
                     -4	   0.20774	   0.09169	   0.05135	   0.02017	  -0.00003	  -0.02027	  -0.05139	  -0.09179	  -0.20778
                     -2	   0.21087	   0.09489	   0.05261	   0.02028	  -0.00003	  -0.02034	  -0.05261	  -0.09489	  -0.21084
                      0	   0.20978	   0.10572	   0.05297	   0.02004	   0.00001	  -0.01997	  -0.05284	  -0.10576	  -0.20998
                      2	   0.21202	   0.11814	   0.05067	   0.01984	   0.00001	  -0.01983	  -0.05064	  -0.11813	  -0.21202
                      4	   0.22024	   0.12333	   0.04386	   0.01667	  -0.00002	  -0.01669	  -0.04385	  -0.12334	  -0.22026
                      6	   0.22990	   0.11871	   0.03846	   0.01593	  -0.00008	  -0.01605	  -0.03823	  -0.11882	  -0.22990
                      8	   0.23875	   0.11250	   0.03343	   0.01536	  -0.00007	  -0.01548	  -0.03360	  -0.11260	  -0.23876
                     10	   0.24065	   0.10502	   0.03268	   0.01570	  -0.00008	  -0.01588	  -0.03292	  -0.10515	  -0.24072
                     12	   0.24238	   0.09667	   0.03584	   0.01804	  -0.00011	  -0.01818	  -0.03604	  -0.09681	  -0.24235
                     14	   0.24536	   0.10364	   0.03728	   0.01925	  -0.00007	  -0.01943	  -0.03747	  -0.10391	  -0.24550
                     16	   0.23919	   0.09853	   0.04330	   0.02040	  -0.00004	  -0.02050	  -0.04343	  -0.09860	  -0.23927
                     18	   0.23417	   0.08910	   0.03734	   0.02158	  -0.00009	  -0.02165	  -0.03740	  -0.08915	  -0.23424
                     20	   0.22500	   0.09397	   0.02977	   0.01956	  -0.00001	  -0.01960	  -0.02980	  -0.09399	  -0.22506
                     22	   0.21586	   0.07673	   0.02555	   0.01785	  -0.00007	  -0.01791	  -0.02555	  -0.07673	  -0.21592
                     24	   0.20876	   0.06842	   0.01755	   0.02156	  -0.00001	  -0.02156	  -0.01755	  -0.06844	  -0.20889
                     26	   0.19025	   0.08039	   0.02293	   0.01709	  -0.00003	  -0.01709	  -0.02291	  -0.08040	  -0.19033
                     28	   0.17134	   0.06863	   0.02847	   0.01430	  -0.00003	  -0.01430	  -0.02837	  -0.06863	  -0.17094
                     30	   0.14519	   0.07073	   0.03041	   0.01533	  -0.00005	  -0.01533	  -0.03031	  -0.07077	  -0.14519
                     35	   0.10302	   0.07755	   0.05121	   0.01431	   0.00006	  -0.01409	  -0.05049	  -0.07752	  -0.10293
                     45	   0.06644	   0.08186	   0.03688	  -0.02197	  -0.00009	   0.02183	  -0.03666	  -0.08180	  -0.06646
                     50	   0.05704	   0.08357	   0.04993	  -0.01382	  -0.00009	   0.01415	  -0.05002	  -0.08380	  -0.05710
                     55	   0.04368	   0.10961	   0.02907	   0.00827	  -0.00001	  -0.00830	  -0.02881	  -0.10955	  -0.04370
                     60	   0.04135	   0.09734	  -0.00661	   0.01950	  -0.00030	  -0.02061	   0.00665	  -0.09737	  -0.04119
              </tableData>
              <tableData breakPoint="-25">
                              -20	       -10	        -5	        -2	         0	         2	         5	        10	        20
                    -20	   0.14960	   0.07743	   0.03783	   0.01591	  -0.00006	  -0.01603	  -0.03791	  -0.07748	  -0.14954
                    -10	   0.19351	   0.08824	   0.04902	   0.01830	  -0.00004	  -0.01838	  -0.04912	  -0.08833	  -0.19352
                     -8	   0.19910	   0.08898	   0.05071	   0.01923	  -0.00003	  -0.01930	  -0.05078	  -0.08909	  -0.19917
                     -6	   0.20667	   0.09407	   0.05086	   0.02028	  -0.00003	  -0.02034	  -0.05091	  -0.09418	  -0.20676
                     -4	   0.21365	   0.09545	   0.05314	   0.02098	  -0.00002	  -0.02100	  -0.05317	  -0.09557	  -0.21368
                     -2	   0.21874	   0.10062	   0.05357	   0.02117	  -0.00001	  -0.02118	  -0.05357	  -0.10060	  -0.21871
                      0	   0.21883	   0.10859	   0.05220	   0.02010	   0.00001	  -0.02002	  -0.05219	  -0.10862	  -0.21887
                      2	   0.22234	   0.11742	   0.04777	   0.01894	   0.00001	  -0.01892	  -0.04775	  -0.11741	  -0.22235
                      4	   0.22887	   0.11955	   0.04173	   0.01678	  -0.00001	  -0.01678	  -0.04171	  -0.11956	  -0.22888
                      6	   0.23671	   0.11359	   0.03911	   0.01839	  -0.00007	  -0.01845	  -0.03927	  -0.11368	  -0.23676
                      8	   0.24123	   0.10755	   0.03762	   0.01665	  -0.00007	  -0.01678	  -0.03778	  -0.10768	  -0.24123
                     10	   0.23757	   0.10553	   0.03926	   0.01798	  -0.00005	  -0.01807	  -0.03931	  -0.10559	  -0.23758
                     12	   0.23447	   0.09928	   0.04165	   0.02012	  -0.00008	  -0.02024	  -0.04171	  -0.09957	  -0.23449
                     14	   0.23584	   0.10394	   0.03969	   0.02070	  -0.00004	  -0.02082	  -0.03978	  -0.10397	  -0.23598
                     16	   0.22939	   0.09614	   0.04197	   0.02010	  -0.00002	  -0.02018	  -0.04205	  -0.09619	  -0.22948
                     18	   0.22390	   0.08579	   0.03573	   0.01893	  -0.00007	  -0.01897	  -0.03572	  -0.08581	  -0.22388
                     20	   0.21444	   0.09040	   0.02581	   0.01837	   0.00002	  -0.01836	  -0.02580	  -0.09040	  -0.21449
                     22	   0.20648	   0.07247	   0.02213	   0.01680	  -0.00002	  -0.01678	  -0.00388	  -0.07245	  -0.20653
                     24	   0.19898	   0.06410	   0.01511	   0.02045	   0.00002	  -0.02043	  -0.01507	  -0.06410	  -0.19903
                     26	   0.18094	   0.07629	   0.02250	   0.01679	   0.00000	  -0.01673	  -0.02244	  -0.07630	  -0.18101
                     28	   0.16323	   0.06462	   0.02859	   0.02334	   0.00000	  -0.01824	  -0.02845	  -0.06463	  -0.16290
                     30	   0.13738	   0.06596	   0.03080	   0.01734	  -0.00001	  -0.01724	  -0.03068	  -0.06583	  -0.13738
                     35	   0.09328	   0.07006	   0.05015	   0.01422	   0.00010	  -0.01398	  -0.04948	  -0.06998	  -0.09319
                     45	   0.06034	   0.07939	   0.03288	  -0.02425	  -0.00012	   0.02410	  -0.03268	  -0.07913	  -0.06034
                     50	   0.04895	   0.07963	   0.04594	  -0.01663	  -0.00008	   0.01700	  -0.03001	  -0.07985	  -0.04827
                     55	   0.04010	   0.10705	   0.02868	   0.00824	   0.00001	  -0.00813	  -0.02854	  -0.10697	  -0.04012
                     60	   0.04182	   0.09821	  -0.00551	   0.02021	   0.00002	  -0.02007	   0.00536	  -0.09823	  -0.04185
              </tableData>
              <tableData breakPoint="-20">
                              -20	       -10	        -5	        -2	         0	         2	         5	        10	        20
                    -20	   0.15482	   0.07756	   0.03778	   0.01395	  -0.00006	  -0.01405	  -0.03786	  -0.07763	  -0.15475
                    -10	   0.19852	   0.08838	   0.04924	   0.01907	  -0.00003	  -0.01914	  -0.04931	  -0.08848	  -0.19852
                     -8	   0.20368	   0.08954	   0.05104	   0.01904	  -0.00003	  -0.01910	  -0.05111	  -0.08964	  -0.20377
                     -6	   0.21258	   0.09481	   0.05193	   0.02026	  -0.00002	  -0.02033	  -0.05197	  -0.09490	  -0.21269
                     -4	   0.21873	   0.09757	   0.05349	   0.02114	  -0.00001	  -0.02115	  -0.05341	  -0.09760	  -0.21877
                     -2	   0.22010	   0.10411	   0.05258	   0.02127	   0.00000	  -0.02127	  -0.05258	  -0.10411	  -0.22011
                      0	   0.22173	   0.11042	   0.05172	   0.02005	  -0.00001	  -0.02006	  -0.05171	  -0.11044	  -0.22174
                      2	   0.22412	   0.11492	   0.04672	   0.01753	   0.00003	  -0.01750	  -0.04670	  -0.11493	  -0.22412
                      4	   0.23058	   0.11519	   0.04274	   0.01900	  -0.00002	  -0.01898	  -0.04272	  -0.11519	  -0.23057
                      6	   0.23563	   0.10962	   0.04046	   0.01877	  -0.00007	  -0.01888	  -0.04066	  -0.10970	  -0.23566
                      8	   0.23559	   0.10541	   0.04146	   0.01706	  -0.00004	  -0.01712	  -0.04153	  -0.10549	  -0.23560
                     10	   0.22912	   0.10384	   0.04225	   0.01775	  -0.00001	  -0.01780	  -0.04229	  -0.10389	  -0.22911
                     12	   0.22554	   0.09762	   0.04212	   0.02023	  -0.00002	  -0.02027	  -0.04214	  -0.09763	  -0.22557
                     14	   0.22743	   0.10418	   0.04004	   0.02074	   0.00000	  -0.02075	  -0.04007	  -0.10416	  -0.22746
                     16	   0.22042	   0.09567	   0.04139	   0.02008	   0.00001	  -0.02009	  -0.04139	  -0.09564	  -0.22051
                     18	   0.21587	   0.08269	   0.03463	   0.01893	   0.00000	  -0.01892	  -0.03461	  -0.08271	  -0.21582
                     20	   0.20811	   0.08712	   0.02443	   0.01766	   0.00004	  -0.01761	  -0.02442	  -0.08709	  -0.20816
                     22	   0.19979	   0.06921	   0.02083	   0.01671	   0.00001	  -0.01664	  -0.02078	  -0.06916	  -0.19984
                     24	   0.19107	   0.06000	   0.01338	   0.01982	   0.00004	  -0.01976	  -0.01333	  -0.05990	  -0.19112
                     26	   0.17391	   0.07307	   0.02295	   0.01823	   0.00004	  -0.01813	  -0.02290	  -0.07307	  -0.17397
                     28	   0.15630	   0.06169	   0.02986	   0.01792	   0.00001	  -0.01809	  -0.02972	  -0.06170	  -0.15633
                     30	   0.13104	   0.06373	   0.03224	   0.01682	   0.00002	  -0.01674	  -0.03212	  -0.06350	  -0.13104
                     35	   0.08847	   0.06766	   0.05013	   0.01459	   0.00045	  -0.01433	  -0.04953	  -0.06760	  -0.08841
                     45	   0.05309	   0.07411	   0.02981	  -0.02782	  -0.00011	   0.02768	  -0.02957	  -0.07404	  -0.05308
                     50	   0.04625	   0.07695	   0.04689	  -0.01433	   0.00010	   0.01474	  -0.04702	  -0.07717	  -0.04629
                     55	   0.04055	   0.10486	   0.03023	   0.00527	   0.00003	  -0.00787	  -0.03011	  -0.10475	  -0.03992
                     60	   0.04297	   0.10006	  -0.00543	   0.01727	   0.00003	  -0.01728	   0.00547	  -0.09928	  -0.04300
              </tableData>
              <tableData breakPoint="-15">
                              -20	       -10	        -5	        -2	         0	         2	         5	        10	        20
                    -20	   0.15761	   0.07364	   0.03663	   0.01340	  -0.00006	  -0.01350	  -0.03675	  -0.07368	  -0.15756
                    -10	   0.19157	   0.08991	   0.05005	   0.01901	  -0.00004	  -0.01908	  -0.05015	  -0.09001	  -0.19157
                     -8	   0.19932	   0.09130	   0.05142	   0.01963	  -0.00001	  -0.01969	  -0.05147	  -0.09140	  -0.19941
                     -6	   0.20969	   0.09583	   0.05242	   0.02095	  -0.00002	  -0.02099	  -0.05245	  -0.09592	  -0.20977
                     -4	   0.21558	   0.09939	   0.05373	   0.02183	  -0.00001	  -0.02190	  -0.05374	  -0.09946	  -0.21562
                     -2	   0.21789	   0.10486	   0.05249	   0.02137	   0.00000	  -0.02141	  -0.05259	  -0.10486	  -0.21777
                      0	   0.22139	   0.10917	   0.04947	   0.01932	   0.00000	  -0.01932	  -0.04946	  -0.10919	  -0.22140
                      2	   0.22459	   0.11167	   0.04465	   0.01727	  -0.00001	  -0.01726	  -0.04463	  -0.11167	  -0.22457
                      4	   0.23071	   0.11018	   0.04125	   0.01868	  -0.00002	  -0.01867	  -0.04125	  -0.11018	  -0.23073
                      6	   0.23381	   0.10408	   0.04320	   0.01840	  -0.00002	  -0.01842	  -0.04324	  -0.10413	  -0.23384
                      8	   0.23070	   0.10295	   0.04483	   0.01789	  -0.00001	  -0.01790	  -0.04485	  -0.10298	  -0.23070
                     10	   0.22366	   0.10483	   0.04449	   0.01907	   0.00000	  -0.01908	  -0.04450	  -0.10486	  -0.22366
                     12	   0.22072	   0.09789	   0.04326	   0.02058	  -0.00001	  -0.02120	  -0.04326	  -0.09789	  -0.22075
                     14	   0.22300	   0.10391	   0.04001	   0.02090	   0.00003	  -0.02092	  -0.04002	  -0.10390	  -0.22303
                     16	   0.21562	   0.09322	   0.04004	   0.01994	   0.00002	  -0.01993	  -0.04003	  -0.09319	  -0.21561
                     18	   0.21012	   0.07882	   0.03368	   0.01902	   0.00001	  -0.01898	  -0.03366	  -0.07884	  -0.21000
                     20	   0.20174	   0.08382	   0.02324	   0.01832	   0.00005	  -0.01822	  -0.02324	  -0.08379	  -0.20178
                     22	   0.19334	   0.06563	   0.01956	   0.01808	   0.00002	  -0.01801	  -0.01952	  -0.06557	  -0.19338
                     24	   0.18505	   0.05633	   0.01271	   0.01994	   0.00005	  -0.01987	  -0.01267	  -0.05631	  -0.18540
                     26	   0.16730	   0.06983	   0.02316	   0.01464	   0.00005	  -0.01456	  -0.02312	  -0.06980	  -0.16735
                     28	   0.14974	   0.05854	   0.02995	   0.01800	   0.00003	  -0.01794	  -0.02981	  -0.05857	  -0.14977
                     30	   0.12626	   0.06054	   0.03187	   0.01545	   0.00003	  -0.01537	  -0.03171	  -0.06047	  -0.12629
                     35	   0.08516	   0.06461	   0.04939	   0.01558	   0.00009	  -0.01531	  -0.04882	  -0.06457	  -0.08509
                     45	   0.05305	   0.07132	   0.02772	  -0.02910	  -0.00012	   0.02897	  -0.02737	  -0.07124	  -0.05301
                     50	   0.04558	   0.07719	   0.04600	  -0.01095	  -0.00008	   0.00809	  -0.04614	  -0.07749	  -0.04509
                     55	   0.04103	   0.10711	   0.02803	   0.00407	   0.00002	  -0.00407	  -0.02794	  -0.10695	  -0.04105
                     60	   0.04860	   0.09945	  -0.00955	   0.02057	   0.00002	  -0.01875	   0.00960	  -0.09869	  -0.04864
              </tableData>
              <tableData breakPoint="-10">
                              -20	       -10	        -5	        -2	         0	         2	         5	        10	        20
                    -20	   0.15136	   0.07234	   0.03629	   0.01413	  -0.00006	  -0.01424	  -0.03640	  -0.07238	  -0.15128
                    -10	   0.19283	   0.08955	   0.04863	   0.01924	  -0.00003	  -0.01931	  -0.04868	  -0.08963	  -0.19283
                     -8	   0.20105	   0.09205	   0.05105	   0.01946	  -0.00002	  -0.01950	  -0.05108	  -0.09213	  -0.20113
                     -6	   0.21069	   0.09767	   0.05268	   0.02096	  -0.00001	  -0.02098	  -0.05269	  -0.09772	  -0.21078
                     -4	   0.21531	   0.10148	   0.05245	   0.02180	  -0.00001	  -0.02187	  -0.05261	  -0.10121	  -0.21529
                     -2	   0.21975	   0.10647	   0.05120	   0.02130	   0.00000	  -0.02127	  -0.05120	  -0.10647	  -0.21976
                      0	   0.22389	   0.10949	   0.04849	   0.01860	  -0.00001	  -0.01860	  -0.04847	  -0.10949	  -0.22389
                      2	   0.22733	   0.11035	   0.04543	   0.01797	   0.00000	  -0.01796	  -0.04547	  -0.11036	  -0.22734
                      4	   0.23161	   0.10836	   0.04497	   0.01910	   0.00000	  -0.01910	  -0.04497	  -0.10837	  -0.23161
                      6	   0.23240	   0.10296	   0.04679	   0.01942	   0.00000	  -0.01937	  -0.04681	  -0.10298	  -0.23241
                      8	   0.22798	   0.10328	   0.04643	   0.01879	   0.00000	  -0.01879	  -0.04645	  -0.10330	  -0.22798
                     10	   0.22117	   0.10504	   0.04538	   0.01958	   0.00001	  -0.01958	  -0.04538	  -0.10506	  -0.22117
                     12	   0.21737	   0.09748	   0.04352	   0.02168	   0.00000	  -0.02168	  -0.04352	  -0.09747	  -0.21720
                     14	   0.21858	   0.10247	   0.03971	   0.02167	   0.00002	  -0.02168	  -0.03971	  -0.10244	  -0.21862
                     16	   0.21006	   0.09042	   0.03882	   0.01989	   0.00002	  -0.01987	  -0.03880	  -0.09038	  -0.21009
                     18	   0.20446	   0.07577	   0.03279	   0.01866	   0.00003	  -0.01860	  -0.03275	  -0.07579	  -0.20431
                     20	   0.19718	   0.08076	   0.02215	   0.01830	   0.00006	  -0.01822	  -0.02215	  -0.08073	  -0.19721
                     22	   0.18891	   0.06266	   0.01846	   0.01709	   0.00004	  -0.01699	  -0.01843	  -0.06260	  -0.18893
                     24	   0.18094	   0.05295	   0.01169	   0.01928	   0.00009	  -0.01919	  -0.01165	  -0.05292	  -0.18097
                     26	   0.16291	   0.06221	   0.02266	   0.01502	   0.00006	  -0.01478	  -0.02261	  -0.06220	  -0.16296
                     28	   0.14457	   0.05592	   0.02983	   0.01765	   0.00004	  -0.01756	  -0.02967	  -0.05594	  -0.14459
                     30	   0.12145	   0.05739	   0.03111	   0.01510	   0.00005	  -0.01502	  -0.03097	  -0.05726	  -0.12149
                     35	   0.08051	   0.06167	   0.05129	   0.01526	   0.00012	  -0.01497	  -0.05088	  -0.06163	  -0.08043
                     45	   0.05423	   0.07354	   0.02805	  -0.03042	  -0.00288	   0.03028	  -0.02773	  -0.07345	  -0.05420
                     50	   0.04750	   0.08018	   0.04484	  -0.01149	  -0.00007	   0.01136	  -0.04525	  -0.08043	  -0.04703
                     55	   0.04611	   0.10641	   0.02264	   0.00538	   0.00002	  -0.00540	  -0.02276	  -0.10623	  -0.04611
                     60	   0.04066	   0.10118	  -0.00895	   0.02016	   0.00002	  -0.01998	   0.00900	  -0.10127	  -0.04071
              </tableData>
              <tableData breakPoint="-5">
                              -20	       -10	        -5	        -2	         0	         2	         5	        10	        20
                    -20	   0.14681	   0.07336	   0.03588	   0.01445	  -0.00004	  -0.01454	  -0.03597	  -0.07341	  -0.14674
                     -2	   0.22331	   0.10760	   0.05070	   0.02057	   0.00000	  -0.02053	  -0.05073	  -0.10761	  -0.22332
                      8	   0.22433	   0.10210	   0.04680	   0.01952	   0.00000	  -0.01951	  -0.04681	  -0.10211	  -0.22480
                     18	   0.20008	   0.07431	   0.03177	   0.01817	   0.00004	  -0.01809	  -0.03172	  -0.07281	  -0.20011
                     28	   0.13936	   0.05206	   0.02834	   0.01338	   0.00008	  -0.01327	  -0.02819	  -0.05206	  -0.13938
                     55	   0.03857	   0.10399	   0.02313	   0.00517	   0.00002	  -0.00518	  -0.02300	  -0.10278	  -0.03859
                     60	   0.03544	   0.09689	  -0.01112	   0.01856	   0.00003	  -0.01837	   0.01118	  -0.09688	  -0.03547
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              </tableData>
              <tableData breakPoint="0">
                              -20	       -10	        -5	        -2	         0	         2	         5	        10	        20
                    -20	   0.15179	   0.07520	   0.03673	   0.01473	  -0.00004	  -0.01473	  -0.03687	  -0.07521	  -0.15173
                     -2	   0.22475	   0.10671	   0.04941	   0.01968	   0.00000	  -0.01967	  -0.04943	  -0.10671	  -0.22477
                      8	   0.22173	   0.10075	   0.04691	   0.01971	   0.00000	  -0.01970	  -0.04692	  -0.10076	  -0.22217
                     18	   0.19672	   0.07010	   0.03082	   0.01756	   0.00005	  -0.01747	  -0.03076	  -0.06928	  -0.19673
                     28	   0.14042	   0.04957	   0.02619	   0.01347	   0.00010	  -0.01328	  -0.02605	  -0.04939	  -0.14043
                     55	   0.03248	   0.10117	   0.02333	   0.00401	   0.00000	  -0.00425	  -0.02320	  -0.10020	  -0.03249
                     60	   0.03070	   0.09421	  -0.01334	   0.01791	   0.00003	  -0.01694	   0.01338	  -0.09420	  -0.03072
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              </tableData>
              <tableData breakPoint="5">
                              -20	       -10	        -5	        -2	         0	         2	         5	        10	        20
                    -20	   0.15900	   0.08016	   0.03867	   0.01538	  -0.00003	  -0.01545	  -0.03879	  -0.08016	  -0.15894
                     -2	   0.22571	   0.10578	   0.04909	   0.01843	   0.00000	  -0.01842	  -0.04909	  -0.10579	  -0.22572
                      8	   0.21960	   0.09911	   0.04636	   0.01958	   0.00001	  -0.01957	  -0.04636	  -0.09912	  -0.22002
                     18	   0.19387	   0.06733	   0.03002	   0.01685	   0.00006	  -0.01674	  -0.02997	  -0.06736	  -0.19387
                     28	   0.14052	   0.04986	   0.02766	   0.01344	   0.00010	  -0.01276	  -0.02749	  -0.04984	  -0.14053
                     55	   0.02776	   0.09868	   0.02317	   0.00327	   0.00001	  -0.00390	  -0.02306	  -0.09850	  -0.02775
                     60	   0.02572	   0.09373	  -0.01532	   0.01583	   0.00003	  -0.01565	   0.01538	  -0.09382	  -0.02574
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              </tableData>
              <tableData breakPoint="10">
                              -20	       -10	        -5	        -2	         0	         2	         5	        10	        20
                    -20	   0.16466	   0.08426	   0.04047	   0.01590	  -0.00003	  -0.01595	  -0.04053	  -0.08427	  -0.16460
                     -2	   0.22631	   0.10532	   0.05064	   0.01771	   0.00000	  -0.01770	  -0.05064	  -0.10532	  -0.22632
                      8	   0.21720	   0.09683	   0.04511	   0.01926	   0.00001	  -0.01924	  -0.04513	  -0.09685	  -0.21760
                     18	   0.19470	   0.06524	   0.02890	   0.01648	   0.00008	  -0.01712	  -0.02881	  -0.06525	  -0.19472
                     28	   0.14120	   0.05368	   0.02570	   0.01159	   0.00011	  -0.01125	  -0.02545	  -0.05361	  -0.14119
                     55	   0.02342	   0.09651	   0.01936	   0.00204	   0.00001	  -0.00206	  -0.01925	  -0.09633	  -0.02343
                     60	   0.02232	   0.09251	  -0.01675	   0.01629	   0.00004	  -0.01610	   0.01682	  -0.09266	  -0.02233
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              </tableData>
              <tableData breakPoint="15">
                              -20	       -10	        -5	        -2	         0	         2	         5	        10	        20
                    -20	   0.16959	   0.08748	   0.04204	   0.01625	  -0.00003	  -0.01631	  -0.04209	  -0.08749	  -0.16954
                     -2	   0.22636	   0.10506	   0.05317	   0.01731	   0.00000	  -0.01730	  -0.05317	  -0.10509	  -0.22636
                      8	   0.21664	   0.09509	   0.04378	   0.01877	   0.00001	  -0.01876	  -0.04381	  -0.09513	  -0.21662
                     18	   0.19597	   0.06537	   0.02830	   0.01556	   0.00008	  -0.01541	  -0.02822	  -0.06537	  -0.19599
                     28	   0.14872	   0.05843	   0.03284	   0.02000	   0.00012	  -0.01993	  -0.03269	  -0.05837	  -0.14872
                     55	   0.01918	   0.09264	   0.01825	   0.00134	   0.00001	  -0.00135	  -0.01807	  -0.09258	  -0.01857
                     60	   0.01807	   0.09102	  -0.01684	   0.01650	   0.00011	  -0.01632	   0.01695	  -0.09102	  -0.01810
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              </tableData>
              <tableData breakPoint="20">
                              -20	       -10	        -5	        -2	         0	         2	         5	        10	        20
                    -20	   0.17407	   0.08940	   0.04305	   0.01546	  -0.00002	  -0.01550	  -0.04309	  -0.08941	  -0.17405
                     -2	   0.22576	   0.10478	   0.05624	   0.01754	   0.00013	  -0.01726	  -0.05598	  -0.10445	  -0.22609
                      8	   0.21693	   0.09622	   0.04598	   0.01848	   0.00016	  -0.01813	  -0.04568	  -0.09590	  -0.21674
                     18	   0.19746	   0.07040	   0.03249	   0.01740	   0.00028	  -0.01688	  -0.03164	  -0.06993	  -0.19688
                     28	   0.14329	   0.05670	   0.03398	   0.02148	   0.00033	  -0.02080	  -0.03331	  -0.05614	  -0.14276
                     55	   0.01497	   0.08624	   0.01845	   0.00104	   0.00017	  -0.00085	  -0.01655	  -0.08935	  -0.01442
                     60	   0.01504	   0.08261	  -0.01935	   0.01690	   0.00209	  -0.01639	   0.01975	  -0.08168	  -0.01452
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              </tableData>
              <tableData breakPoint="25">
                              -20	       -10	        -5	        -2	         0	         2	         5	        10	        20
                    -20	   0.17884	   0.08934	   0.04253	   0.01610	  -0.00001	  -0.01613	  -0.04264	  -0.08932	  -0.17878
                     -2	   0.22091	   0.10456	   0.05893	   0.01878	   0.00001	  -0.01876	  -0.05893	  -0.10454	  -0.22090
                      8	   0.21672	   0.09624	   0.04360	   0.01868	   0.00000	  -0.01868	  -0.04362	  -0.09626	  -0.21669
                     18	   0.20188	   0.07186	   0.03925	   0.01821	   0.00009	  -0.01811	  -0.03915	  -0.07184	  -0.20190
                     28	   0.13258	   0.05463	   0.03192	   0.01832	   0.00011	  -0.01809	  -0.03171	  -0.05452	  -0.13258
                     55	   0.01065	   0.09080	   0.01552	  -0.00049	   0.00002	   0.00049	  -0.01537	  -0.09056	  -0.01063
                     60	   0.02002	   0.08051	  -0.01876	   0.01858	   0.00004	  -0.01836	   0.01883	  -0.08044	  -0.01999
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              </tableData>
              <tableData breakPoint="30">
                              -20	       -10	        -5	        -2	         0	         2	         5	        10	        20
                    -20	   0.18755	   0.08937	   0.04063	   0.01501	  -0.00001	  -0.01509	  -0.04076	  -0.08939	  -0.18749
                     -2	   0.21978	   0.10059	   0.06067	   0.01913	   0.00001	  -0.01909	  -0.06067	  -0.10058	  -0.21986
                      8	   0.22082	   0.09999	   0.04626	   0.01750	  -0.00001	  -0.01752	  -0.04627	  -0.10000	  -0.22079
                     18	   0.18831	   0.06930	   0.03424	   0.01755	   0.00009	  -0.01743	  -0.03414	  -0.06932	  -0.18834
                     28	   0.12413	   0.05023	   0.03066	   0.01611	   0.00013	  -0.01592	  -0.03046	  -0.05016	  -0.12414
                     55	   0.01664	   0.09087	   0.01552	   0.00173	   0.00002	  -0.00171	  -0.01533	  -0.09039	  -0.01662
                     60	   0.02281	   0.07821	  -0.01878	   0.01566	   0.00003	  -0.01545	   0.01885	  -0.07812	  -0.02277
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              </tableData>
          </table>
    </function>
    <function name="aero/c/CFYDTD">
    <description>SIDE FORCE DUE TO DIFFERENTIAL TAIL DEFLECTION - CYDTD</description>
    <product>
          <property>fcs/differential-elevator-pos-deg</property>
          <table>
            <independentVar lookup="row">aero/alpha-deg</independentVar>
            <independentVar lookup="column">fcs/elevator-pos-deg</independentVar>
            <tableData>
                                -30	        -25	        -20	        -15	        -10	         -5	          0	          5	         10	         15	         20	         25	         30
                    -20	  -0.00052	   0.00013	  -0.00080	  -0.00190	  -0.00186	  -0.00152	  -0.00113	  -0.00121	  -0.00095	  -0.00027	   0.00029	   0.00097	   0.00142
                     -2	  -0.00201	  -0.00160	  -0.00134	  -0.00082	  -0.00060	  -0.00086	  -0.00087	  -0.00070	  -0.00077	  -0.00088	  -0.00109	  -0.00115	  -0.00106
                      8	  -0.00162	  -0.00168	  -0.00148	  -0.00139	  -0.00142	  -0.00116	  -0.00088	  -0.00097	  -0.00109	  -0.00101	  -0.00089	  -0.00078	  -0.00118
                     18	  -0.00399	  -0.00285	  -0.00187	  -0.00143	  -0.00086	  -0.00071	  -0.00103	  -0.00105	  -0.00099	  -0.00108	  -0.00103	  -0.00145	  -0.00219
                     28	  -0.00295	  -0.00167	  -0.00088	  -0.00057	  -0.00088	  -0.00099	  -0.00107	  -0.00091	  -0.00093	  -0.00153	  -0.00222	  -0.00202	  -0.00173
                     55	  -0.00031	  -0.00052	  -0.00050	  -0.00147	  -0.00228	  -0.00242	  -0.00158	  -0.00131	  -0.00086	  -0.00067	  -0.00072	  -0.00089	  -0.00094
                     60	  -0.00059	  -0.00083	  -0.00161	  -0.00221	  -0.00215	  -0.00124	  -0.00081	  -0.00071	  -0.00047	  -0.00020	  -0.00019	  -0.00040	  -0.00061
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            </tableData>
          </table>
       </product>
    </function>
    <function name="aero/c/CFYP">
    <description>SIDE FORCE DUE TO ROLL RATE</description>
    <product>
          <property>aero/pb</property>
          <table>
            <independentVar lookup="row">aero/alpha-deg</independentVar>
            <tableData>
                    -20		  -0.44190
                    -10		  -0.18548
                      0		  -0.04814
                     10		   0.11351
                     20		   0.29012
                     30		   0.18034
                     60		   0.30907
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            </tableData>
          </table>
       </product>
    </function>
    <function name="aero/c/CFYR">
    <description>SIDE FORCE DUE TO YAW RATE</description>
    <product>
          <property>aero/rb</property>
          <table>
            <independentVar lookup="row">aero/alpha-deg</independentVar>
            <tableData>
                    -20		   0.67640
                    -10		   0.60714
                      0		   0.56626
                     10		   0.51787
                     20		   0.54644
                     30		   0.62306
                     60		   0.20999
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            </tableData>
          </table>
       </product>
    </function>
    <function name="aero/c/CYDAD">
    <description>SIDE FORCE DUE TO AILERON DEFLECTION</description>
    <product>
          <property>fcs/aileron-pos-deg</property>
          <table>
            <independentVar lookup="row">aero/alpha-deg</independentVar>
            <independentVar lookup="column">aero/beta-deg</independentVar>
            <tableData>
                                -20	        -10	         -5	         -2	          0	          2	          5	         10	         20
                    -20	  -0.00099	  -0.00121	  -0.00116	  -0.00112	  -0.00110	  -0.00110	  -0.00112	  -0.00117	  -0.00105
                     -2	  -0.00078	  -0.00083	  -0.00075	  -0.00064	  -0.00058	  -0.00053	  -0.00067	  -0.00066	  -0.00063
                      8	  -0.00028	  -0.00033	  -0.00027	  -0.00020	  -0.00018	  -0.00019	  -0.00021	  -0.00025	  -0.00017
                     18	  -0.00001	   0.00012	   0.00022	   0.00020	   0.00018	   0.00020	   0.00021	   0.00009	  -0.00001
                     28	   0.00060	   0.00071	   0.00075	   0.00085	   0.00069	   0.00081	   0.00073	   0.00063	   0.00055
                     55	   0.00096	   0.00074	   0.00093	   0.00069	   0.00072	   0.00082	   0.00081	   0.00077	   0.00076
                     60	   0.00076	   0.00048	   0.00059	   0.00053	   0.00046	   0.00054	   0.00059	   0.00056	   0.00081
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            </tableData>
          </table>
       </product>
    </function>
    <function name="aero/c/CYDRD">
    <description>SIDE FORCE DUE TO RUDDER DEFLECTION</description>
    <product>
          <property>fcs/rudder-pos-deg</property>
          <table>
            <independentVar lookup="row">aero/alpha-deg</independentVar>
            <independentVar lookup="column">aero/beta-deg</independentVar>
            <tableData>
                                -20	        -10	         -5	         -2	          0	          2	          5	         10	         20
                    -20	   0.00133	   0.00159	   0.00148	   0.00142	   0.00141	   0.00143	   0.00144	   0.00154	   0.00153
                     -2	   0.00155	   0.00174	   0.00162	   0.00152	   0.00149	   0.00150	   0.00155	   0.00167	   0.00174
                      8	   0.00139	   0.00156	   0.00136	   0.00137	   0.00133	   0.00137	   0.00141	   0.00155	   0.00171
                     18	   0.00106	   0.00122	   0.00110	   0.00118	   0.00125	   0.00120	   0.00121	   0.00129	   0.00151
                     28	   0.00048	   0.00066	   0.00114	   0.00160	   0.00132	   0.00124	   0.00119	   0.00110	   0.00133
                     55	   0.00010	   0.00003	   0.00031	   0.00038	   0.00034	   0.00055	   0.00054	   0.00061	   0.00058
                     60	   0.00008	   0.00005	   0.00019	   0.00016	   0.00021	   0.00024	   0.00027	   0.00034	   0.00042
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            </tableData>
          </table>
       </product>
    </function>
    <function name="aero/c/CMN1">
    <description>BASE YAWING MOMENT</description>
          <table>
            <independentVar lookup="row">aero/alpha-deg</independentVar>
            <independentVar lookup="column">aero/beta-deg</independentVar>
            <independentVar lookup="table">fcs/elevator-pos-deg</independentVar>
              <tableData breakPoint="-30">
                              -20	       -10	        -5	        -2	         0	         2	         5	        10	        20
                    -20	  -0.07898	  -0.04494	  -0.02243	  -0.00912	   0.00002	   0.00916	   0.02246	   0.04497	   0.07894
                     -2	  -0.08180	  -0.04248	  -0.01740	  -0.00621	   0.00001	   0.00623	   0.01742	   0.04249	   0.08178
                      8	  -0.09670	  -0.03453	  -0.01417	  -0.00596	   0.00002	   0.00599	   0.01423	   0.03451	   0.09667
                     18	  -0.09316	  -0.04731	  -0.01986	  -0.01034	   0.00003	   0.01036	   0.01988	   0.04732	   0.09319
                     28	  -0.08328	  -0.04121	  -0.01789	  -0.00773	   0.00001	   0.00772	   0.01781	   0.04120	   0.08308
                     55	  -0.06755	  -0.06838	  -0.02186	  -0.00570	   0.00002	   0.00577	   0.02174	   0.06831	   0.06756
                     60	  -0.06977	  -0.06560	  -0.00593	  -0.01433	   0.00016	   0.01451	   0.00595	   0.06563	   0.06971
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              </tableData>
              <tableData breakPoint="-25">
                              -20	       -10	        -5	        -2	         0	         2	         5	        10	        20
                    -20	  -0.07908	  -0.04371	  -0.02120	  -0.00866	   0.00002	   0.00869	   0.02122	   0.04372	   0.07903
                     -2	  -0.08167	  -0.04018	  -0.01626	  -0.00571	   0.00001	   0.00572	   0.01627	   0.04018	   0.08165
                      8	  -0.09158	  -0.03586	  -0.01563	  -0.00643	   0.00002	   0.00647	   0.01569	   0.03589	   0.09155
                     18	  -0.08599	  -0.04649	  -0.01974	  -0.00937	  -0.00002	   0.00937	   0.01972	   0.04648	   0.08598
                     28	  -0.07759	  -0.03951	  -0.01762	  -0.01372	  -0.00001	   0.00906	   0.01752	   0.03949	   0.07741
                     55	  -0.06881	  -0.07071	  -0.02365	  -0.00659	   0.00001	   0.00659	   0.02358	   0.07064	   0.06881
                     60	  -0.07349	  -0.06700	  -0.00786	  -0.01503	   0.00000	   0.01498	   0.00795	   0.06702	   0.07349
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              </tableData>
              <tableData breakPoint="-20">
                              -20	       -10	        -5	        -2	         0	         2	         5	        10	        20
                    -20	  -0.07670	  -0.04088	  -0.01946	  -0.00713	   0.00002	   0.00716	   0.01949	   0.04089	   0.07665
                     -2	  -0.07908	  -0.03793	  -0.01551	  -0.00545	   0.00000	   0.00546	   0.01552	   0.03795	   0.07908
                      8	  -0.08433	  -0.03556	  -0.01570	  -0.00626	   0.00001	   0.00627	   0.01571	   0.03557	   0.08434
                     18	  -0.08107	  -0.04508	  -0.01930	  -0.00945	  -0.00001	   0.00942	   0.01924	   0.04507	   0.08103
                     28	  -0.07398	  -0.03919	  -0.01849	  -0.00887	  -0.00001	   0.00882	   0.01839	   0.03917	   0.07397
                     55	  -0.07294	  -0.07119	  -0.02625	  -0.00593	   0.00000	   0.00721	   0.02618	   0.07109	   0.07275
                     60	  -0.07983	  -0.07124	  -0.00914	  -0.01460	   0.00000	   0.01464	   0.00916	   0.07096	   0.07983
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              </tableData>
              <tableData breakPoint="-15">
                              -20	       -10	        -5	        -2	         0	         2	         5	        10	        20
                    -20	  -0.07292	  -0.03564	  -0.01741	  -0.00647	   0.00002	   0.00650	   0.01745	   0.03565	   0.07288
                     -2	  -0.07356	  -0.03435	  -0.01488	  -0.00512	   0.00000	   0.00514	   0.01492	   0.03435	   0.07352
                      8	  -0.07924	  -0.03391	  -0.01583	  -0.00615	   0.00000	   0.00614	   0.01582	   0.03391	   0.07924
                     18	  -0.07707	  -0.04366	  -0.01930	  -0.00976	  -0.00001	   0.00972	   0.01924	   0.04365	   0.07700
                     28	  -0.07242	  -0.03884	  -0.01898	  -0.00872	  -0.00002	   0.00868	   0.01888	   0.03882	   0.07241
                     55	  -0.07887	  -0.07574	  -0.02604	  -0.00587	   0.00001	   0.00593	   0.02599	   0.07563	   0.07887
                     60	  -0.08935	  -0.07445	  -0.00870	  -0.01757	   0.00000	   0.01670	   0.00871	   0.07418	   0.08935
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              </tableData>
              <tableData breakPoint="-10">
                              -20	       -10	        -5	        -2	         0	         2	         5	        10	        20
                    -20	  -0.06497	  -0.03211	  -0.01585	  -0.00619	   0.00002	   0.00622	   0.01589	   0.03212	   0.06492
                     -2	  -0.07025	  -0.03225	  -0.01390	  -0.00476	   0.00000	   0.00477	   0.01391	   0.03226	   0.07026
                      8	  -0.07619	  -0.03360	  -0.01579	  -0.00628	  -0.00001	   0.00626	   0.01578	   0.03360	   0.07619
                     18	  -0.07472	  -0.04318	  -0.01962	  -0.00984	  -0.00002	   0.00978	   0.01957	   0.04317	   0.07464
                     28	  -0.07290	  -0.03920	  -0.01947	  -0.00870	  -0.00002	   0.00865	   0.01936	   0.03920	   0.07289
                     55	  -0.08825	  -0.07887	  -0.02518	  -0.00736	   0.00001	   0.00742	   0.02523	   0.07875	   0.08824
                     60	  -0.09152	  -0.07742	  -0.01051	  -0.01762	   0.00000	   0.01756	   0.01053	   0.07747	   0.09152
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              </tableData>
              <tableData breakPoint="-5">
                              -20	       -10	        -5	        -2	         0	         2	         5	        10	        20
                    -20	  -0.05720	  -0.02956	  -0.01398	  -0.00555	   0.00001	   0.00558	   0.01400	   0.02957	   0.05716
                     -2	  -0.06896	  -0.03122	  -0.01354	  -0.00460	   0.00000	   0.00457	   0.01356	   0.03122	   0.06897
                      8	  -0.07391	  -0.03329	  -0.01594	  -0.00658	  -0.00001	   0.00656	   0.01594	   0.03328	   0.07413
                     18	  -0.07421	  -0.04369	  -0.01994	  -0.00991	  -0.00002	   0.00984	   0.01990	   0.04302	   0.07421
                     28	  -0.07350	  -0.03980	  -0.01968	  -0.00692	  -0.00004	   0.00687	   0.01957	   0.03979	   0.07349
                     55	  -0.08990	  -0.08042	  -0.02691	  -0.00783	   0.00001	   0.00790	   0.02685	   0.07990	   0.08990
                     60	  -0.09319	  -0.07781	  -0.01046	  -0.01732	   0.00000	   0.01725	   0.01048	   0.07783	   0.09318
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              </tableData>
              <tableData breakPoint="0">
                              -20	       -10	        -5	        -2	         0	         2	         5	        10	        20
                    -20	  -0.05462	  -0.02771	  -0.01309	  -0.00525	   0.00001	   0.00525	   0.01313	   0.02771	   0.05458
                     -2	  -0.06823	  -0.03062	  -0.01297	  -0.00459	   0.00000	   0.00458	   0.01299	   0.03062	   0.06824
                      8	  -0.07338	  -0.03341	  -0.01634	  -0.00676	  -0.00001	   0.00675	   0.01633	   0.03341	   0.07360
                     18	  -0.07561	  -0.04355	  -0.02054	  -0.00999	  -0.00002	   0.00995	   0.02049	   0.04261	   0.07560
                     28	  -0.07780	  -0.04125	  -0.02065	  -0.00747	  -0.00005	   0.00738	   0.02038	   0.04115	   0.07779
                     55	  -0.09141	  -0.08101	  -0.02776	  -0.00762	   0.00002	   0.00779	   0.02770	   0.08031	   0.09140
                     60	  -0.09537	  -0.07862	  -0.01067	  -0.01754	   0.00000	   0.01710	   0.01069	   0.07864	   0.09536
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              </tableData>
              <tableData breakPoint="5">
                              -20	       -10	        -5	        -2	         0	         2	         5	        10	        20
                    -20	  -0.05528	  -0.02877	  -0.01333	  -0.00524	   0.00001	   0.00526	   0.01337	   0.02877	   0.05524
                     -2	  -0.06828	  -0.03105	  -0.01233	  -0.00469	   0.00000	   0.00468	   0.01233	   0.03105	   0.06829
                      8	  -0.07406	  -0.03381	  -0.01670	  -0.00692	  -0.00001	   0.00690	   0.01668	   0.03380	   0.07426
                     18	  -0.07735	  -0.04479	  -0.02161	  -0.01019	  -0.00002	   0.01014	   0.02157	   0.04478	   0.07733
                     28	  -0.08241	  -0.04368	  -0.02276	  -0.00813	  -0.00004	   0.00799	   0.02266	   0.04367	   0.08240
                     55	  -0.09280	  -0.08147	  -0.02816	  -0.00770	   0.00001	   0.00811	   0.02810	   0.08137	   0.09282
                     60	  -0.09670	  -0.07978	  -0.01073	  -0.01703	   0.00000	   0.01697	   0.01074	   0.07980	   0.09668
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              </tableData>
              <tableData breakPoint="10">
                              -20	       -10	        -5	        -2	         0	         2	         5	        10	        20
                    -20	  -0.05684	  -0.03007	  -0.01386	  -0.00535	   0.00001	   0.00537	   0.01388	   0.03007	   0.05680
                     -2	  -0.06941	  -0.03251	  -0.01178	  -0.00518	   0.00000	   0.00517	   0.01178	   0.03252	   0.06942
                      8	  -0.07615	  -0.03454	  -0.01703	  -0.00714	  -0.00001	   0.00711	   0.01702	   0.03453	   0.07634
                     18	  -0.08182	  -0.04623	  -0.02261	  -0.01074	  -0.00003	   0.01103	   0.02255	   0.04621	   0.08182
                     28	  -0.08767	  -0.04853	  -0.02297	  -0.00808	  -0.00004	   0.00798	   0.02282	   0.04848	   0.08766
                     55	  -0.09375	  -0.08156	  -0.02777	  -0.00772	   0.00001	   0.00779	   0.02771	   0.08146	   0.09374
                     60	  -0.09798	  -0.08022	  -0.01062	  -0.01718	  -0.00001	   0.01711	   0.01063	   0.08028	   0.09797
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              </tableData>
              <tableData breakPoint="15">
                              -20	       -10	        -5	        -2	         0	         2	         5	        10	        20
                    -20	  -0.05900	  -0.03124	  -0.01441	  -0.00547	   0.00001	   0.00549	   0.01443	   0.03123	   0.05896
                     -2	  -0.07186	  -0.03453	  -0.01119	  -0.00565	   0.00000	   0.00565	   0.01119	   0.03451	   0.07186
                      8	  -0.07974	  -0.03615	  -0.01748	  -0.00723	  -0.00001	   0.00721	   0.01747	   0.03615	   0.07973
                     18	  -0.08704	  -0.04940	  -0.02398	  -0.01100	  -0.00003	   0.01094	   0.02392	   0.04937	   0.08705
                     28	  -0.09668	  -0.05365	  -0.02796	  -0.01286	  -0.00004	   0.01277	   0.02787	   0.05361	   0.09667
                     55	  -0.09387	  -0.08038	  -0.02748	  -0.00726	   0.00001	   0.00732	   0.02740	   0.08031	   0.09364
                     60	  -0.09784	  -0.07968	  -0.01024	  -0.01722	  -0.00006	   0.01716	   0.01022	   0.07971	   0.09783
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              </tableData>
              <tableData breakPoint="20">
                              -20	       -10	        -5	        -2	         0	         2	         5	        10	        20
                    -20	  -0.06149	  -0.03199	  -0.01481	  -0.00514	   0.00001	   0.00516	   0.01482	   0.03199	   0.06146
                     -2	  -0.07598	  -0.03740	  -0.01094	  -0.00611	  -0.00009	   0.00592	   0.01073	   0.03705	   0.07582
                      8	  -0.08400	  -0.03943	  -0.02058	  -0.00800	  -0.00012	   0.00774	   0.02034	   0.03919	   0.08380
                     18	  -0.09244	  -0.05482	  -0.02677	  -0.01184	  -0.00016	   0.01152	   0.02625	   0.05448	   0.09204
                     28	  -0.09867	  -0.05508	  -0.02952	  -0.01389	  -0.00019	   0.01350	   0.02910	   0.05479	   0.09832
                     55	  -0.09373	  -0.07749	  -0.02844	  -0.00697	  -0.00010	   0.00687	   0.02760	   0.07876	   0.09344
                     60	  -0.09763	  -0.07667	  -0.00932	  -0.01722	   0.00008	   0.01693	   0.00912	   0.07620	   0.09736
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              </tableData>
              <tableData breakPoint="25">
                              -20	       -10	        -5	        -2	         0	         2	         5	        10	        20
                    -20	  -0.06447	  -0.03258	  -0.01513	  -0.00558	   0.00001	   0.00560	   0.01518	   0.03256	   0.06443
                     -2	  -0.07784	  -0.04124	  -0.01156	  -0.00677	   0.00000	   0.00676	   0.01155	   0.04124	   0.07783
                      8	  -0.08913	  -0.04214	  -0.02065	  -0.00857	  -0.00001	   0.00855	   0.02064	   0.04212	   0.08911
                     18	  -0.09963	  -0.05854	  -0.03181	  -0.01379	  -0.00004	   0.01375	   0.03174	   0.05851	   0.09963
                     28	  -0.09672	  -0.05533	  -0.02878	  -0.01279	  -0.00005	   0.01269	   0.02866	   0.05534	   0.09671
                     55	  -0.09451	  -0.08013	  -0.02804	  -0.00642	   0.00001	   0.00648	   0.02798	   0.08007	   0.09448
                     60	  -0.09778	  -0.07639	  -0.00950	  -0.01818	   0.00000	   0.01811	   0.00951	   0.07640	   0.09776
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              </tableData>
              <tableData breakPoint="30">
                              -20	       -10	        -5	        -2	         0	         2	         5	        10	        20
                    -20	  -0.06976	  -0.03270	  -0.01506	  -0.00543	   0.00001	   0.00546	   0.01512	   0.03270	   0.06973
                     -2	  -0.08193	  -0.04389	  -0.01200	  -0.00694	   0.00000	   0.00692	   0.01199	   0.04389	   0.08200
                      8	  -0.09565	  -0.04685	  -0.02300	  -0.00834	  -0.00001	   0.00831	   0.02297	   0.04683	   0.09564
                     18	  -0.09652	  -0.05996	  -0.03111	  -0.01407	  -0.00004	   0.01402	   0.03105	   0.05994	   0.09653
                     28	  -0.09583	  -0.05505	  -0.02887	  -0.01147	  -0.00006	   0.01137	   0.02874	   0.05507	   0.09582
                     55	  -0.09630	  -0.08147	  -0.02859	  -0.00752	   0.00001	   0.00758	   0.02851	   0.08126	   0.09628
                     60	  -0.09762	  -0.07708	  -0.01018	  -0.01705	   0.00000	   0.01698	   0.01020	   0.07709	   0.09759
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              </tableData>
          </table>
    </function>
    <function name="aero/c/CMNDAD">
    <description>YAWING MOMENT DUE TO AILERON DEFLECTION</description>
    <product>
          <property>fcs/aileron-pos-deg</property>
          <table>
            <independentVar lookup="row">aero/alpha-deg</independentVar>
            <independentVar lookup="column">aero/beta-deg</independentVar>
            <tableData>
                                -20	        -10	         -5	         -2	          0	          2	          5	         10	         20
                    -20	   0.00012	   0.00031	   0.00033	   0.00031	   0.00030	   0.00030	   0.00029	   0.00029	   0.00018
                     -2	   0.00026	   0.00032	   0.00024	   0.00028	   0.00025	   0.00025	   0.00022	   0.00024	   0.00020
                      8	   0.00021	   0.00027	   0.00021	   0.00018	   0.00017	   0.00018	   0.00020	   0.00025	   0.00020
                     18	   0.00016	   0.00015	   0.00007	   0.00005	   0.00003	   0.00004	   0.00006	   0.00014	   0.00020
                     28	  -0.00010	  -0.00010	  -0.00013	  -0.00021	  -0.00014	  -0.00017	  -0.00015	  -0.00009	  -0.00007
                     55	  -0.00020	  -0.00013	  -0.00024	  -0.00017	  -0.00013	  -0.00016	  -0.00018	  -0.00020	  -0.00021
                     60	  -0.00015	  -0.00003	  -0.00013	  -0.00012	  -0.00010	  -0.00012	  -0.00011	  -0.00012	  -0.00019
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            </tableData>
          </table>
       </product>
    </function>
    <function name="aero/c/CMNDRD">
    <description>YAWING MOMENT DUE TO RUDDER DEFLECTION</description>
    <product>
          <property>fcs/rudder-pos-deg</property>
          <table>
            <independentVar lookup="row">aero/alpha-deg</independentVar>
            <independentVar lookup="column">aero/beta-deg</independentVar>
            <tableData>
                                -20	        -10	         -5	         -2	          0	          2	          5	         10	         20
                    -20	  -0.00071	  -0.00080	  -0.00073	  -0.00069	  -0.00068	  -0.00068	  -0.00068	  -0.00073	  -0.00071
                     -2	  -0.00086	  -0.00091	  -0.00079	  -0.00076	  -0.00075	  -0.00075	  -0.00077	  -0.00082	  -0.00083
                      8	  -0.00070	  -0.00081	  -0.00078	  -0.00073	  -0.00068	  -0.00068	  -0.00069	  -0.00075	  -0.00082
                     18	  -0.00054	  -0.00093	  -0.00075	  -0.00065	  -0.00059	  -0.00058	  -0.00058	  -0.00060	  -0.00072
                     28	  -0.00032	  -0.00057	  -0.00057	  -0.00072	  -0.00061	  -0.00058	  -0.00057	  -0.00052	  -0.00061
                     55	  -0.00009	  -0.00001	  -0.00012	  -0.00018	  -0.00015	  -0.00026	  -0.00025	  -0.00028	  -0.00027
                     60	  -0.00007	  -0.00002	  -0.00009	  -0.00007	  -0.00010	  -0.00011	  -0.00013	  -0.00016	  -0.00019
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            </tableData>
          </table>
       </product>
    </function>
    <function name="aero/c/CMNDTD">
    <description>YAWING MOMENT DUE TO DIFFERENTIAL TAIL DEFLECTION</description>
    <product>
          <property>fcs/differential-elevator-pos-deg</property>
          <table>
            <independentVar lookup="row">aero/alpha-deg</independentVar>
            <independentVar lookup="column">fcs/elevator-pos-deg</independentVar>
            <tableData>
                                -30	        -25	        -20	        -15	        -10	         -5	          0	          5	         10	         15	         20	         25	         30
                    -20	   0.00141	   0.00111	   0.00160	   0.00208	   0.00175	   0.00114	   0.00053	   0.00035	   0.00008	  -0.00045	  -0.00107	  -0.00167	  -0.00177
                     -2	   0.00243	   0.00208	   0.00180	   0.00138	   0.00088	   0.00064	   0.00038	   0.00011	  -0.00008	  -0.00038	  -0.00058	  -0.00064	  -0.00075
                      8	   0.00216	   0.00208	   0.00190	   0.00149	   0.00115	   0.00077	   0.00043	   0.00022	  -0.00013	  -0.00051	  -0.00081	  -0.00099	  -0.00077
                     18	   0.00300	   0.00254	   0.00176	   0.00118	   0.00070	   0.00046	   0.00036	  -0.00006	  -0.00045	  -0.00073	  -0.00093	  -0.00056	   0.00004
                     28	   0.00278	   0.00167	   0.00102	   0.00077	   0.00076	   0.00052	   0.00005	  -0.00050	  -0.00072	  -0.00047	  -0.00004	  -0.00010	  -0.00016
                     55	   0.00135	   0.00094	   0.00025	   0.00022	   0.00040	   0.00037	  -0.00007	  -0.00017	  -0.00023	  -0.00020	  -0.00023	  -0.00018	  -0.00006
                     60	   0.00127	   0.00058	   0.00040	   0.00053	   0.00036	  -0.00015	  -0.00034	  -0.00036	  -0.00036	  -0.00038	  -0.00041	  -0.00036	  -0.00014
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            </tableData>
          </table>
       </product>
    </function>
    <function name="aero/c/CMNP">
    <description>YAW MOMENT DUE TO ROLL RATE</description>
    <product>
          <property>aero/pb</property>
          <table>
            <independentVar lookup="row">aero/alpha-deg</independentVar>
            <tableData>
                    -20		   0.20611
                    -10		   0.12174
                      0		   0.01879
                     10		  -0.07746
                     20		  -0.12397
                     30		  -0.05013
                     60		  -0.04663
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            </tableData>
          </table>
       </product>
    </function>
    <function name="aero/c/CMNR">
    <description>YAW DAMPING DERIVATIVE</description>
    <product>
          <property>aero/rb</property>
          <table>
            <independentVar lookup="row">aero/alpha-deg</independentVar>
            <tableData>
                    -20		  -0.33195
                    -10		  -0.33024
                      0		  -0.31265
                     10		  -0.30066
                     20		  -0.27754
                     30		  -0.32652
                     60		  -0.07239
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            </tableData>
          </table>
       </product>
    </function>
    <function name="aero/coefficients/CDRAG">
      <sum>
          <property>aero/c/CFXB</property>
          <property>aero/c/CFXFLAPS</property>
       </sum>
    </function>
  <axis name="DRAG">
    <function name="aero/force/DRAG">
    <product>
          <property>aero/qbar-psf</property>
          <property>metrics/Sw-sqft</property>
          <property>aero/coefficients/CDRAG</property>
       </product>
    </function>
  </axis>
    <function name="aero/coefficients/CROLL">
      <sum>
          <property>aero/c/CML1</property>
          <property>aero/c/CMLDAD</property>
          <property>aero/c/CMLDRD</property>
          <property>aero/c/CMLDTD</property>
          <property>aero/c/CMLP</property>
          <property>aero/c/CMLR</property>
       </sum>
    </function>
  <axis name="ROLL">
    <function name="aero/force/ROLL">
    <product>
          <property>aero/qbar-psf</property>
          <property>metrics/Sw-sqft</property>
          <property>metrics/bw-ft</property>
          <property>aero/coefficients/CROLL</property>
       </product>
    </function>
  </axis>
    <function name="aero/coefficients/CSIDE">
      <sum>
          <property>aero/c/CYDAD</property>
          <property>aero/c/CYDRD</property>
          <property>aero/c/CFYB</property>
          <property>aero/c/CFYDTD</property>
          <property>aero/c/CFYP</property>
          <property>aero/c/CFYR</property>
       </sum>
    </function>
  <axis name="SIDE">
    <function name="aero/force/SIDE">
    <product>
          <property>aero/qbar-psf</property>
          <property>metrics/Sw-sqft</property>
          <property>aero/coefficients/CSIDE</property>
       </product>
    </function>
  </axis>
    <function name="aero/coefficients/CYAW">
      <sum>
          <property>aero/c/CMNDAD</property>
          <property>aero/c/CMNDRD</property>
          <property>aero/c/CMN1</property>
          <property>aero/c/CMNDTD</property>
          <property>aero/c/CMNR</property>
          <property>aero/c/CMNP</property>
       </sum>
    </function>
  <axis name="YAW">
    <function name="aero/force/YAW">
    <product>
          <property>aero/qbar-psf</property>
          <property>metrics/Sw-sqft</property>
          <property>metrics/bw-ft</property>
          <property>aero/coefficients/CYAW</property>
       </product>
    </function>
  </axis>
    <function name="aero/coefficients/CLIFT">
      <sum>
          <property>aero/c/CFZFLAPS</property>
          <property>aero/c/CFZB</property>
       </sum>
    </function>
  <axis name="LIFT">
    <function name="aero/force/LIFT">
    <product>
          <property>aero/qbar-psf</property>
          <property>metrics/Sw-sqft</property>
          <property>aero/coefficients/CLIFT</property>
       </product>
    </function>
  </axis>
    <function name="aero/coefficients/CPITCH">
      <sum>
          <property>aero/c/CMMFLAPS</property>
          <property>aero/c/CMM1</property>
          <property>aero/c/CMMQ</property>
       </sum>
    </function>
  <axis name="PITCH">
    <function name="aero/force/PITCH">
    <product>
          <property>aero/qbar-psf</property>
          <property>metrics/Sw-sqft</property>
          <property>metrics/cbarw-ft</property>
          <property>aero/coefficients/CPITCH</property>
       </product>
    </function>
  </axis>
</aerodynamics>
    <output name="c:/temp/JSBOut.csv" type="CSV" rate="10">
        <property caption="alpha-deg">aero/alpha-deg</property>
        <property caption="beta-deg">aero/beta-deg</property>
        <property caption="CFXB">aero/c/CFXB</property>
        <property caption="CFXFLAPS">aero/c/CFXFLAPS</property>
        <property caption="CFYB">aero/c/CFYB</property>
        <property caption="CFYDTD">aero/c/CFYDTD</property>
        <property caption="CFYP">aero/c/CFYP</property>
        <property caption="CFYR">aero/c/CFYR</property>
        <property caption="CFZB">aero/c/CFZB</property>
        <property caption="CFZFLAPS">aero/c/CFZFLAPS</property>
        <property caption="CML1">aero/c/CML1</property>
        <property caption="CMLDAD">aero/c/CMLDAD</property>
        <property caption="CMLDRD">aero/c/CMLDRD</property>
        <property caption="CMLDTD">aero/c/CMLDTD</property>
        <property caption="CMLP">aero/c/CMLP</property>
        <property caption="CMLR">aero/c/CMLR</property>
        <property caption="CMM1">aero/c/CMM1</property>
        <property caption="CMMFLAPS">aero/c/CMMFLAPS</property>
        <property caption="CMMQ">aero/c/CMMQ</property>
        <property caption="CMN1">aero/c/CMN1</property>
        <property caption="CMNDAD">aero/c/CMNDAD</property>
        <property caption="CMNDRD">aero/c/CMNDRD</property>
        <property caption="CMNDTD">aero/c/CMNDTD</property>
        <property caption="CMNP">aero/c/CMNP</property>
        <property caption="CMNR">aero/c/CMNR</property>
        <property caption="CYDAD">aero/c/CYDAD</property>
        <property caption="CYDRD">aero/c/CYDRD</property>
        <property caption="CDRAG">aero/coefficients/CDRAG</property>
        <property caption="CLIFT">aero/coefficients/CLIFT</property>
        <property caption="CPITCH">aero/coefficients/CPITCH</property>
        <property caption="CROLL">aero/coefficients/CROLL</property>
        <property caption="CSIDE">aero/coefficients/CSIDE</property>
        <property caption="CYAW">aero/coefficients/CYAW</property>
        <property caption="pb">aero/pb</property>
        <property caption="qb">aero/qb</property>
        <property caption="qbar-psf">aero/qbar-psf</property>
        <property caption="rb">aero/rb</property>
        <property caption="phi-deg">attitude/phi-deg</property>
        <property caption="psi-deg">attitude/psi-deg</property>
        <property caption="theta-deg">attitude/theta-deg</property>
        <property caption="aileron-aero-deg">fcs/aileron-pos-deg</property>
        <property caption="elevon-aero-deg">fcs/elevator-pos-deg</property>
        <property caption="elevon-diff-aero-deg">fcs/differential-elevator-pos-deg</property>
        <property caption="flap-pos-deg">fcs/flap-pos-deg</property>
        <property caption="rudder-aero-deg">fcs/rudder-pos-deg</property>
        <property caption="fbx-total-lbs">forces/fbx-total-lbs</property>
        <property caption="fby-total-lbs">forces/fby-total-lbs</property>
        <property caption="fbz-total-lbs">forces/fbz-total-lbs</property>
        <property caption="l-total-lbsft">moments/l-total-lbsft</property>
        <property caption="m-total-lbsft">moments/m-total-lbsft</property>
        <property caption="n-total-lbsft">moments/n-total-lbsft</property>
        <property caption="p-aero-rad_sec">velocities/p-aero-rad_sec</property>
        <property caption="q-aero-rad_sec">velocities/q-aero-rad_sec</property>
        <property caption="r-aero-rad_sec">velocities/r-aero-rad_sec</property>
        <property caption="vt-fps">velocities/vt-fps</property>
    </output>
</fdm_config>
