<?xml version="1.0"?>
<?xml-stylesheet type="text/xsl" href="/JSBSim.xsl"?>
<fdm_config name="" version="2.0" release="DEVELOPMENT"
   xmlns:xsi="http://www.w3.org/2001/XMLSchema-instance"
   xsi:noNamespaceSchemaLocation="http://jsbsim.sourceforge.net/JSBSim.xsd">

    <fileheader>
        <author>Richard Harrison</author>
        <filecreationdate>2016-04-13</filecreationdate>
        <version>1.0</version>
        <description></description>
        <note>
            Built using VSPAERO. The basic form is built from a single wing with varying cambers to roughly match
            the shape of the aircraft. A set of degen geometry is required for the control surfaces, flaps and tanks, together with the elevator positions. These are all then processed and this data is built from the results (together with the -stab to get the derivatives)
        </note>
        <note>Aircraft origin for measurements is the nose</note>
        <note>
            F-15C in the critical aft c.g. configuration has a weight of 33,467
            pounds and a c.g. location at 563.1 inches (6:12). To
            convert c.g. location in inches to percent mean aerodynamic
            chord, the following equation is used for all A through D
            models of the F-15: (measurements in inches).
            % MAC = (xcg - 408.1 * 100) / 191.33
        </note>
        <limitation></limitation>
        <reference
            refID="ZDAT/AED/2016/01-29"
            author="Richard Harrison, rjh@zaretto.com"
            title="F-15 Aerodynamic data built from vspaero; CG (10.5, 0, 0) M"
            date="January, 2016"
            URL="http://www.zaretto.com/sites/zaretto.com/files/F-15-data/rjh-zaretto-f-15-aerodynamic-data-vspaero.pdf"
        />
        <reference
            refID="AFIT/GAE/ENY/90D-16"
            author="Robert J. McDonnell, B.S., Captain, USAF"
            title="INVESTIGATION OF THE HIGH ANGLE OF ATTACK DYNAMICS OF THE F-15B USING BIFURCATION ANALYSIS"
            date="December 1990"
            URL="http://www.zaretto.com/sites/zaretto.com/files/F-15-data/ADA230462.pdf"
        />
        <reference
            refID="AFIT/GA/ENY/91D-1"
            author="Richard L. Bennet, Major, USAF"
            title="ANALYSIS OF THE EFFECTS OF REMOVING NOSE BALLAST FROM THE F-15 EAGLE"
            date="December 1991"
            URL="http://www.zaretto.com/sites/zaretto.com/files/F-15-data/ADA244044.pdf"
        />
        <reference
            refID="NASA CR-152391-VOL-1 Figure 3-2 p54"
            author="DR. J. R. LUMMUS, G. T. JOYCE, O C. D. O MALLEY"
            title="ANALYSIS OF WIND TUNNEL TEST RESULTS FOR A 9.39-PER CENT SCALE MODEL OF A VSTOL FIGHTER/ATTACK AIRCRAFT : VOLUME I - STUDY OVERVIEW"
            date="October 1980"
            URL="http://www.zaretto.com/sites/zaretto.com/files/F-15-data/19810014497.pdf"
        />
        <reference
            refID="NASA TP-3627"
            author="Frank W. Burcham, Jr., Trindel A. Maine, C. Gordon Fullerton, and Lannie Dean Webb"
            title="Development and Flight Evaluation of an Emergency Digital Flight Control System Using Only Engine Thrust on an F-15 Airplane"
            date="September 1996"
            URL="http://www.zaretto.com/sites/zaretto.com/files/F-15-data/88414main_H-2048.pdf"
        />
        <reference
            refID="NASA-TM-72861"
            author="Thomas R. Sisk and Neil W. Matheny"
            title="Precision Controllability of the F-15 Airplane"
            date="May 1979"
            URL="http://www.zaretto.com/sites/zaretto.com/files/F-15-data/88414main_H-2048.pdf"
        />
        <reference
            refID="95-fuel-dumping-system"
            author="Sabc"
            title="Fuel Dumping System"
            date="08 September 2010"
            URL="http://www.f-15e.info/joomla/technology/fuel-system/95-fuel-dumping-system"
        />
        <reference
            refID="VSPAERO"
            author="Brandon Litherland"
            title="Using VSPAERO"
            date=" 2015/07/01 06:56"
            URL="http://www.openvsp.org/wiki/doku.php?id=vspaerotutorial"
        />
    </fileheader>
    <metrics>
        <wingarea unit="M2">56.485</wingarea>
        <wing_incidence unit="DEG">0</wing_incidence>
        <wingspan unit="M">13.04544</wingspan>
        <chord unit="M">4.85902</chord>
        <location unit="IN" name="EYEPOINT">
            <x>197</x>
            <y>0</y>
            <z>-3.94</z>
        </location>
        <location unit="IN" name="VRP">
            <x>386</x>
            <y>0</y>
            <z>0</z>
        </location>
        <location unit="M" name="AERORP">
            <x>11.74633863</x>
            <y>0</y>
            <z>0</z>
        </location>
    </metrics>

    <mass_balance>
        <location unit="M" name="CG">
            <x>10.5</x>
            <y>0</y>
            <z>0</z>
        </location>
        <ixx unit="SLUG*FT2">28700</ixx>
        <iyy unit="SLUG*FT2">165100</iyy>
        <izz unit="SLUG*FT2">187900</izz>
        <ixz unit="SLUG*FT2">-520</ixz>
        <emptywt unit="LBS">28000</emptywt>
        <pointmass name="Station2-1">
            <location unit="M" name="Pointmass Station2-1">
                <x>1.7844</x>
                <y>-3.8325</y>
                <z>0.288</z>
            </location>
            <weight unit="LBS">0</weight>
        </pointmass>
        <pointmass name="Station2-2">
            <location unit="M" name="Pointmass Station2-2">
                <x>1.4077</x>
                <y>-3.3034</y>
                <z>1.4077</z>
            </location>
            <weight unit="LBS">0</weight>
        </pointmass>
        <pointmass name="Station2-3">
            <location unit="M" name="Pointmass Station2-3">
                <x>1.7844</x>
                <y>-3.8325</y>
                <z>0.288</z>
            </location>
            <weight unit="LBS">0</weight>
        </pointmass>
        <pointmass name="Station3">
            <location unit="M" name="Pointmass Station3">
                <x>-0.3003</x>
                <y>-1.611</y>
                <z>0.567</z>
            </location>
            <weight unit="LBS">0</weight>
        </pointmass>
        <pointmass name="Station4">
            <location unit="M" name="Pointmass Station4">
                <x>3.5918</x>
                <y>-1.611</y>
                <z>0.567</z>
            </location>
            <weight unit="LBS">0</weight>
        </pointmass>
        <pointmass name="Station5">
            <location unit="M" name="Pointmass Station5">
                <x>0</x>
                <y>0</y>
                <z>0.33</z>
            </location>
            <weight unit="LBS">0</weight>
        </pointmass>
        <pointmass name="Station6">
            <location unit="M" name="Pointmass Station6">
                <x>-0.3003</x>
                <y>1.611</y>
                <z>0.567</z>
            </location>
            <weight unit="LBS">0</weight>
        </pointmass>
        <pointmass name="Station7">
            <location unit="M" name="Pointmass Station7">
                <x>3.5918</x>
                <y>1.611</y>
                <z>0.567</z>
            </location>
            <weight unit="LBS">0</weight>
        </pointmass>
        <pointmass name="Station8">
            <location unit="M" name="Pointmass Station8">
                <x>1.7844</x>
                <y>3.8325</y>
                <z>0.288</z>
            </location>
            <weight unit="LBS">0</weight>
        </pointmass>
        <pointmass name="Station9">
            <location unit="M" name="Pointmass Station9">
                <x>1.4077</x>
                <y>3.3034</y>
                <z>1.407</z>
            </location>
            <weight unit="LBS">0</weight>
        </pointmass>
        <pointmass name="Station10">
            <location unit="M" name="Pointmass Station10">
                <x>1.7844</x>
                <y>3.8325</y>
                <z>0.288</z>
            </location>
            <weight unit="LBS">0</weight>
        </pointmass>
    </mass_balance>

    <ground_reactions>
        <contact type="BOGEY" name="NOSE_LG">
            <location unit="IN">
                <x>197</x>
                <y>0</y>
                <z>-77.6496063</z>
            </location>
            <static_friction>1.0</static_friction>
            <dynamic_friction>0.5</dynamic_friction>
            <rolling_friction>0.02</rolling_friction>
            <spring_coeff unit="LBS/FT">25200</spring_coeff>
            <damping_coeff unit="LBS/FT/SEC">1400</damping_coeff>
            <max_steer unit="DEG">35</max_steer>
            <brake_group>NOSE</brake_group>
            <retractable>1</retractable>
        </contact>
        <contact type="BOGEY" name="LEFT_MLG">
            <location unit="IN">
                <x>451</x>
                <y>-98</y>
                <z>-84.3385827</z>
            </location>
            <static_friction>1.0</static_friction>
            <dynamic_friction>0.5</dynamic_friction>
            <rolling_friction>0.02</rolling_friction>
            <spring_coeff unit="LBS/FT">25200</spring_coeff>
            <damping_coeff unit="LBS/FT/SEC">1400</damping_coeff>
            <max_steer unit="DEG">0</max_steer>
            <brake_group>LEFT</brake_group>
            <retractable>1</retractable>
        </contact>
        <contact type="BOGEY" name="RIGHT_MLG">
            <location unit="IN">
                <x>451</x>
                <y>98</y>
                <z>-84.3385827</z>
            </location>
            <static_friction>1.0</static_friction>
            <dynamic_friction>0.5</dynamic_friction>
            <rolling_friction>0.02</rolling_friction>
            <spring_coeff unit="LBS/FT">25200</spring_coeff>
            <damping_coeff unit="LBS/FT/SEC">1400</damping_coeff>
            <max_steer unit="DEG">0</max_steer>
            <brake_group>RIGHT</brake_group>
            <retractable>1</retractable>
        </contact>
        <contact type="STRUCTURE" name="LEFT_WING_TIP">
            <location unit="IN">
                <x>472</x>
                <y>-256.8</y>
                <z>13</z>
            </location>
            <static_friction>1.2</static_friction>
            <dynamic_friction>1.212</dynamic_friction>
            <rolling_friction>1.413</rolling_friction>
            <spring_coeff unit="LBS/FT">25200</spring_coeff>
            <damping_coeff unit="LBS/FT/SEC">5600</damping_coeff>
        </contact>
        <contact type="STRUCTURE" name="RIGHT_WING_TIP">
            <location unit="IN">
                <x>472</x>
                <y>256.8</y>
                <z>13</z>
            </location>
            <static_friction>1.2</static_friction>
            <dynamic_friction>1.212</dynamic_friction>
            <rolling_friction>1.413</rolling_friction>
            <spring_coeff unit="LBS/FT">25200</spring_coeff>
            <damping_coeff unit="LBS/FT/SEC">5600</damping_coeff>
        </contact>
        <contact type="STRUCTURE" name="CANOPY">
            <location unit="IN">
                <x>214</x>
                <y>0</y>
                <z>10</z>
            </location>
            <static_friction>1.2</static_friction>
            <dynamic_friction>1.212</dynamic_friction>
            <rolling_friction>1.413</rolling_friction>
            <spring_coeff unit="LBS/FT">25200</spring_coeff>
            <damping_coeff unit="LBS/FT/SEC">5600</damping_coeff>
        </contact>
        <contact type="STRUCTURE" name="RADOME_FRONT">
            <location unit="IN">
                <x>20</x>
                <y>0</y>
                <z>-18</z>
            </location>
            <static_friction>1.2</static_friction>
            <dynamic_friction>1.212</dynamic_friction>
            <rolling_friction>1.413</rolling_friction>
            <spring_coeff unit="LBS/FT">25200</spring_coeff>
            <damping_coeff unit="LBS/FT/SEC">5600</damping_coeff>
        </contact>
        <contact type="STRUCTURE" name="LEFT_VERTICAL_TAIL">
            <location unit="IN">
                <x>744</x>
                <y>-98</y>
                <z>60</z>
            </location>
            <static_friction>1.2</static_friction>
            <dynamic_friction>1.212</dynamic_friction>
            <rolling_friction>1.413</rolling_friction>
            <spring_coeff unit="LBS/FT">25200</spring_coeff>
            <damping_coeff unit="LBS/FT/SEC">5600</damping_coeff>
        </contact>
        <contact type="STRUCTURE" name="RIGHT_VERTICAL_TAIL">
            <location unit="IN">
                <x>744</x>
                <y>98</y>
                <z>60</z>
            </location>
            <static_friction>1.2</static_friction>
            <dynamic_friction>1.212</dynamic_friction>
            <rolling_friction>1.413</rolling_friction>
            <spring_coeff unit="LBS/FT">25200</spring_coeff>
            <damping_coeff unit="LBS/FT/SEC">5600</damping_coeff>
        </contact>
        <contact type="STRUCTURE" name="REAR_BODY_LEFT">
            <location unit="IN">
                <x>669</x>
                <y>-58</y>
                <z>-12</z>
            </location>
            <static_friction>1.2</static_friction>
            <dynamic_friction>1.212</dynamic_friction>
            <rolling_friction>1.413</rolling_friction>
            <spring_coeff unit="LBS/FT">25200</spring_coeff>
            <damping_coeff unit="LBS/FT/SEC">5600</damping_coeff>
        </contact>
        <contact type="STRUCTURE" name="REAR_BODY_RIGHT">
            <location unit="IN">
                <x>669</x>
                <y>58</y>
                <z>-12</z>
            </location>
            <static_friction>1.2</static_friction>
            <dynamic_friction>1.212</dynamic_friction>
            <rolling_friction>1.413</rolling_friction>
            <spring_coeff unit="LBS/FT">25200</spring_coeff>
            <damping_coeff unit="LBS/FT/SEC">5600</damping_coeff>
        </contact>
        <contact type="STRUCTURE" name="NOSE_CONE">
            <location unit="IN">
                <x>0</x>
                <y>0</y>
                <z>-15</z>
            </location>
            <static_friction>1.2</static_friction>
            <dynamic_friction>1.212</dynamic_friction>
            <rolling_friction>1.413</rolling_friction>
            <spring_coeff unit="LBS/FT">25200</spring_coeff>
            <damping_coeff unit="LBS/FT/SEC">5600</damping_coeff>
        </contact>
    </ground_reactions>

    <propulsion>
        <engine file="F100-PW-100">
            <location unit="IN">
                <x>682</x>
                <y>-12</y>
                <z>0</z>
            </location>
            <orient unit="DEG">
                <roll>0</roll>
                <pitch>0</pitch>
                <yaw>0</yaw>
            </orient>
            <feed>1</feed>
            <feed>2</feed>
            <feed>4</feed>
            <feed>6</feed>
            <feed>7</feed>
            <feed>9</feed>
            <thruster file="direct">
                <location unit="IN">
                    <x>682</x>
                    <y>-12</y>
                    <z>0</z>
                </location>
                <orient unit="DEG">
                    <roll>0</roll>
                    <pitch>0</pitch>
                    <yaw>0</yaw>
                </orient>
            </thruster>
        </engine>
        <engine file="F100-PW-100">
            <location unit="IN">
                <x>682</x>
                <y>12</y>
                <z>0</z>
            </location>
            <orient unit="DEG">
                <roll>0</roll>
                <pitch>0</pitch>
                <yaw>0</yaw>
            </orient>
            <feed>0</feed>
            <feed>2</feed>
            <feed>3</feed>
            <feed>5</feed>
            <feed>7</feed>
            <feed>8</feed>
            <thruster file="direct">
                <location unit="IN">
                    <x>682</x>
                    <y>12</y>
                    <z>0</z>
                </location>
                <orient unit="DEG">
                    <roll>0</roll>
                    <pitch>0</pitch>
                    <yaw>0</yaw>
                </orient>
            </thruster>
        </engine>
        <tank type="FUEL">
            <!--0: Left Engine Feed-->
            <location unit="IN">
                <x>453.87</x>
                <y>7.83</y>
                <z>0.79</z>
            </location>
            <capacity unit="LBS">1200</capacity>
            <contents unit="LBS">1200</contents>
            <priority>10</priority>
        </tank>
        <tank type="FUEL">
            <!--1: Right Engine Feed-->
            <location unit="IN">
                <x>396.79</x>
                <y>7.95</y>
                <z>-5.51</z>
            </location>
            <capacity unit="LBS">1500</capacity>
            <contents unit="LBS">1500</contents>
            <priority>9</priority>
        </tank>
        <tank type="FUEL">
            <!--2: Tank 1-->
            <location unit="IN">
                <x>307.42</x>
                <y>7.48</y>
                <z>14.57</z>
            </location>
            <capacity unit="LBS">3300</capacity>
            <standpipe unit="LBS">100</standpipe>
            <contents unit="LBS">3300</contents>
            <priority>8</priority>
        </tank>
        <tank type="FUEL">
            <!--3: Left Wing Tank-->
            <location unit="IN">
                <x>457.02</x>
                <y>-130.32</y>
                <z>15.35</z>
            </location>
            <capacity unit="LBS">2750</capacity>
            <standpipe unit="LBS">100</standpipe>
            <contents unit="LBS">2750</contents>
            <priority>7</priority>
        </tank>
        <tank type="FUEL">
            <!--4: Right Wing Tank-->
            <location unit="IN">
                <x>457.02</x>
                <y>130.32</y>
                <z>15.35</z>
            </location>
            <capacity unit="LBS">2750</capacity>
            <standpipe unit="LBS">100</standpipe>
            <contents unit="LBS">2750</contents>
            <priority>6</priority>
        </tank>
        <tank type="FUEL">
            <!--5: Left External Wing Tank-->
            <location unit="IN">
                <x>420</x>
                <y>-108</y>
                <z>-7.83</z>
            </location>
            <capacity unit="LBS">3950</capacity>
            <standpipe unit="LBS">100</standpipe>
            <contents unit="LBS">3950</contents>
            <priority>5</priority>
        </tank>
        <tank type="FUEL">
            <!--6: Right External Wing Tank-->
            <location unit="IN">
                <x>420</x>
                <y>108</y>
                <z>-7.83</z>
            </location>
            <capacity unit="LBS">3950</capacity>
            <standpipe unit="LBS">100</standpipe>
            <contents unit="LBS">3950</contents>
            <priority>4</priority>
        </tank>
        <tank type="FUEL">
            <!--7: External Tank-->
            <location unit="IN">
                <x>386</x>
                <y>0</y>
                <z>-7.83</z>
            </location>
            <capacity unit="LBS">3950</capacity>
            <standpipe unit="LBS">100</standpipe>
            <contents unit="LBS">3950</contents>
            <priority>3</priority>
        </tank>
        <tank type="FUEL">
            <!--8: Left Feed line-->
            <location unit="IN">
                <x>489</x>
                <y>-38</y>
                <z>-47</z>
            </location>
            <capacity unit="LBS">10</capacity>
            <contents unit="LBS">10</contents>
            <priority>2</priority>
        </tank>
        <tank type="FUEL">
            <!--9: Right Feed line-->
            <location unit="IN">
                <x>489</x>
                <y>38</y>
                <z>-47</z>
            </location>
            <capacity unit="LBS">10</capacity>
            <contents unit="LBS">10</contents>
            <priority>1</priority>
        </tank>
    </propulsion>

    <external_reactions>
        <force name="catapult" frame="BODY">
            <location unit="IN">
                <x>667</x>
                <y>0</y>
                <z>0</z>
            </location>
            <direction>
                <x>1</x>
                <y>0</y>
                <z>0</z>
            </direction>
        </force>
        <force name="holdback" frame="BODY">
            <location unit="IN">
                <x>667</x>
                <y>0</y>
                <z>0</z>
            </location>
            <direction>
                <x>-1</x>
                <y>0</y>
                <z>0</z>
            </direction>
        </force>
        <force name="hook" frame="BODY">
            <location unit="IN">
                <x>300</x>
                <y>0</y>
                <z>0</z>
            </location>
            <direction>
                <x>-0.9995</x>
                <y>0</y>
                <z>0.01</z>
            </direction>
        </force>
    </external_reactions>

    <flight_control name="FCS"></flight_control>
    <system file="f-15-hydraulic"/>
    <system file="f-15-electrics"/>
    <system file="catapult"/>
    <system file="f-15-cadc"/>
    <system file="f-15-apc"/>
    <system file="f-15-ecs"/>
    <system file="f-15-engines"/>
    <system file="hook"/>
    <system file="flight-controls"/>
    <aerodynamics>
        <function name="aero/coefficients/CFXB">
            <description>BASIC DRAG</description>
            <product>
                <table>
                    <independentVar lookup="row">aero/alpha-deg</independentVar>
                    <independentVar lookup="column">fcs/elevator-pos-deg</independentVar>
                    <tableData>
                        -30	        -20	        -15	        -10	          0	         10	         15
                        -10	 0.10184000	 0.08655000	 0.07634000	 0.06615000	 0.04017000	 0.03843000	 0.03803000
                        0	 0.04196000	 0.03071000	 0.02364000	 0.01872000	 0.01396000	 0.01874000	 0.02426000
                        2	 0.03877000	 0.02840000	 0.02238000	 0.01833000	 0.01588000	 0.02332000	 0.03009000
                        4	 0.03850000	 0.02909000	 0.02388000	 0.02085000	 0.02036000	 0.03089000	 0.03890000
                        6	 0.04120000	 0.03282000	 0.02835000	 0.02643000	 0.02743000	 0.04169000	 0.05092000
                        8	 0.04683000	 0.03946000	 0.03586000	 0.03503000	 0.03715000	 0.05589000	 0.06636000
                        10	 0.05528000	 0.04900000	 0.04643000	 0.04683000	 0.04957000	 0.07373000	 0.08539000
                        12	 0.06633000	 0.06174000	 0.06027000	 0.06190000	 0.06481000	 0.09501000	 0.10813000
                        14	 0.08104000	 0.07776000	 0.07744000	 0.08035000	 0.08297000	 0.12003000	 0.13473000
                        15	 0.08947000	 0.08703000	 0.08734000	 0.09091000	 0.09306000	 0.13380000	 0.14925000
                        17	 0.10768000	 0.10710000	 0.10876000	 0.11351000	 0.11483000	 0.16390000	 0.17963000
                        20	 0.14048000	 0.14288000	 0.14669000	 0.15318000	 0.15271000	 0.21616000	 0.23154000
                        25	 0.19647000	 0.20533000	 0.21338000	 0.22377000	 0.22197000	 0.29848000	 0.31852000
                        30	 0.25505000	 0.27091000	 0.28298000	 0.29667000	 0.30068000	 0.38119000	 0.39684000
                        40	 0.37238000	 0.39907000	 0.41421000	 0.42816000	 0.44805000	 0.53816000	 0.55213000
                        60	 0.61827000	 0.65883000	 0.68066000	 0.70264000	 0.79781000	 0.89012000	 0.86958000
                    </tableData>
                </table>
            </product>
        </function>
        <function name="aero/coefficients/CFXDF">
            <description>DRAG INCREMENT DUE TO FLAPS</description>
            <product>
                <property>fcs/flap-pos-deg</property>
                <table>
                    <independentVar lookup="row">aero/alpha-deg</independentVar>
                    <independentVar lookup="column">aero/beta-deg</independentVar>
                    <tableData>
                        -10	          0	          1	          3	          4	          5	         10
                        -10	 0.04141000	 0.04129000	 0.04128000	 0.04126000	 0.04141000	 0.04125000	 0.04126000
                        0	 0.00893000	 0.00834000	 0.00825000	 0.00871000	 0.00836000	 0.00909000	 0.00892000
                        2	 0.00360000	 0.00333000	 0.00355000	 0.00293000	 0.00333000	 0.00394000	 0.00362000
                        4	-0.00032000	-0.00097000	-0.00093000	-0.00092000	-0.00079000	-0.00059000	-0.00029000
                        6	-0.00448000	-0.00535000	-0.00533000	-0.00509000	-0.00501000	-0.00495000	-0.00444000
                        8	-0.00860000	-0.00960000	-0.00966000	-0.00900000	-0.00943000	-0.00929000	-0.00942000
                        10	-0.01244000	-0.01266000	-0.01240000	-0.01047000	-0.01261000	-0.01289000	-0.01236000
                        12	-0.01653000	-0.01642000	-0.01627000	-0.01584000	-0.01601000	-0.01634000	-0.01649000
                        14	-0.02021000	-0.02029000	-0.01964000	-0.01992000	-0.02027000	-0.02028000	-0.02027000
                        15	-0.02186000	-0.02216000	-0.02208000	-0.02173000	-0.02203000	-0.02208000	-0.02146000
                        17	-0.02623000	-0.02474000	-0.02468000	-0.02438000	-0.02487000	-0.02480000	-0.02619000
                        20	-0.03027000	-0.02866000	-0.02860000	-0.02827000	-0.02891000	-0.02921000	-0.03065000
                        25	-0.03619000	-0.03168000	-0.03180000	-0.03197000	-0.03295000	-0.03307000	-0.03615000
                        30	-0.03206000	-0.03298000	-0.03298000	-0.03222000	-0.03217000	-0.03192000	-0.03197000
                        40	 0.18852000	 0.18498000	 0.18494000	 0.18535000	 0.18535000	 0.18555000	 0.18845000
                        60	 0.25452000	 0.25762000	 0.25762000	 0.25732000	 0.25682000	 0.25682000	 0.25116000
                    </tableData>
                </table>
            </product>
        </function>
        <function name="aero/coefficients/CFXGEAR">
            <description>DRAG INCREMENT DUE TO GEAR</description>
            <product>
                <property>gear/gear-pos-norm</property>
                <table>
                    <independentVar lookup="row">aero/alpha-deg</independentVar>
                    <independentVar lookup="column">aero/beta-deg</independentVar>
                    <tableData>
                        -10	          0	          1	          3	          4	          5	         10
                        -10	 0.00100000	 0.00101000	 0.00101000	 0.00100000	 0.00123000	 0.00100000	 0.00101000
                        0	 0.00105000	 0.00105000	 0.00105000	 0.00105000	 0.00105000	 0.00105000	 0.00105000
                        2	 0.00105000	 0.00105000	 0.00105000	 0.00105000	 0.00105000	 0.00105000	 0.00104000
                        4	 0.00104000	 0.00109000	 0.00107000	 0.00104000	 0.00104000	 0.00105000	 0.00104000
                        6	 0.00104000	 0.00104000	 0.00104000	 0.00103000	 0.00103000	 0.00103000	 0.00105000
                        8	 0.00103000	 0.00102000	 0.00095000	 0.00102000	 0.00100000	 0.00102000	 0.00018000
                        10	 0.00102000	 0.00101000	 0.00101000	 0.00100000	 0.00192000	 0.00101000	 0.00107000
                        12	 0.00100000	 0.00098000	 0.00098000	 0.00098000	 0.00099000	 0.00099000	 0.00105000
                        14	 0.00097000	 0.00047000	 0.00096000	 0.00097000	 0.00049000	 0.00096000	 0.00098000
                        15	 0.00097000	 0.00096000	 0.00095000	 0.00095000	 0.00095000	 0.00095000	 0.00132000
                        17	 0.00091000	 0.00090000	 0.00090000	 0.00092000	 0.00091000	 0.00091000	 0.00092000
                        20	 0.00088000	 0.00086000	 0.00086000	 0.00076000	 0.00087000	 0.00080000	 0.00089000
                        25	 0.00081000	 0.00078000	 0.00077000	 0.00077000	 0.00061000	 0.00078000	 0.00069000
                        30	 0.00078000	 0.00077000	 0.00082000	 0.00082000	 0.00083000	 0.00081000	 0.00078000
                        40	 0.00077000	 0.00073000	 0.00076000	 0.00077000	 0.00076000	 0.00076000	 0.00078000
                        60	 0.00014000	 0.00043000	 0.00043000	 0.00043000	 0.00041000	 0.00053000	 0.00014000
                    </tableData>
                </table>
            </product>
        </function>
        <function name="aero/coefficients/CFXTNK">
            <description>DRAG INCREMENT DUE TO TANK</description>
            <product>
                <property>metrics/stores-tank-factor</property>
                <table>
                    <independentVar lookup="row">aero/alpha-deg</independentVar>
                    <independentVar lookup="column">aero/beta-deg</independentVar>
                    <tableData>
                        -10	          0	          1	          3	          4	          5	         10
                        -10	 0.00364000	 0.00363000	 0.00364000	 0.00364000	 0.00380000	 0.00363000	 0.00365000
                        0	 0.00340000	 0.00338000	 0.00338000	 0.00338000	 0.00338000	 0.00338000	 0.00340000
                        2	 0.00341000	 0.00340000	 0.00340000	 0.00340000	 0.00340000	 0.00340000	 0.00340000
                        4	 0.00345000	 0.00344000	 0.00346000	 0.00344000	 0.00343000	 0.00344000	 0.00345000
                        6	 0.00351000	 0.00350000	 0.00350000	 0.00349000	 0.00350000	 0.00349000	 0.00352000
                        8	 0.00359000	 0.00357000	 0.00351000	 0.00358000	 0.00356000	 0.00358000	 0.00274000
                        10	 0.00369000	 0.00368000	 0.00368000	 0.00368000	 0.00368000	 0.00368000	 0.00374000
                        12	 0.00382000	 0.00381000	 0.00380000	 0.00381000	 0.00381000	 0.00381000	 0.00381000
                        14	 0.00396000	 0.00395000	 0.00395000	 0.00396000	 0.00395000	 0.00395000	 0.00396000
                        15	 0.00403000	 0.00402000	 0.00402000	 0.00403000	 0.00403000	 0.00403000	 0.00439000
                        17	 0.00418000	 0.00419000	 0.00420000	 0.00419000	 0.00419000	 0.00418000	 0.00418000
                        20	 0.00437000	 0.00448000	 0.00449000	 0.00434000	 0.00444000	 0.00444000	 0.00438000
                        25	 0.00489000	 0.00495000	 0.00496000	 0.00495000	 0.00479000	 0.00496000	 0.00489000
                        30	 0.00471000	 0.00486000	 0.00481000	 0.00483000	 0.00482000	 0.00485000	 0.00471000
                        40	 0.00517000	 0.00506000	 0.00506000	 0.00508000	 0.00506000	 0.00508000	 0.00518000
                        60	 0.00576000	 0.00622000	 0.00623000	 0.00621000	 0.00620000	 0.00629000	 0.00575000
                    </tableData>
                </table>
            </product>
        </function>
        <function name="aero/coefficients/CFZB">
            <description>BASIC LIFT</description>
            <product>
                <table>
                    <independentVar lookup="row">aero/alpha-deg</independentVar>
                    <independentVar lookup="column">fcs/elevator-pos-deg</independentVar>
                    <tableData>
                        -30	        -20	        -15	        -10	          0	         10	         15
                        -10	-0.74995000	-0.71387000	-0.68602000	-0.65154000	-0.55928000	-0.48855000	-0.45031000
                        0	-0.16522000	-0.11944000	-0.08619000	-0.05034000	 0.02769000	 0.10179000	 0.13988000
                        2	-0.04847000	-0.00041000	 0.03171000	 0.06938000	 0.14581000	 0.22194000	 0.25984000
                        4	 0.06903000	 0.11855000	 0.15092000	 0.18890000	 0.26413000	 0.34233000	 0.37987000
                        6	 0.18627000	 0.23675000	 0.27055000	 0.30821000	 0.38334000	 0.46386000	 0.50076000
                        8	 0.30286000	 0.35602000	 0.39026000	 0.42860000	 0.50355000	 0.58656000	 0.62257000
                        10	 0.41905000	 0.47554000	 0.51094000	 0.55041000	 0.62461000	 0.71040000	 0.74522000
                        12	 0.53830000	 0.59589000	 0.63301000	 0.67236000	 0.74625000	 0.83382000	 0.86836000
                        14	 0.65490000	 0.71670000	 0.75513000	 0.79454000	 0.86832000	 0.95746000	 0.99188000
                        15	 0.71452000	 0.77728000	 0.81633000	 0.85596000	 0.92874000	 1.01790000	 1.05190000
                        17	 0.83014000	 0.89395000	 0.93336000	 0.97195000	 1.04582000	 1.13638000	 1.16706000
                        20	 0.99334000	 1.05834000	 1.09695000	 1.13296000	 1.20445000	 1.29167000	 1.31317000
                        25	 1.17517000	 1.24741000	 1.28673000	 1.32318000	 1.39444000	 1.42868000	 1.44870000
                        30	 1.29223000	 1.37057000	 1.41085000	 1.44827000	 1.52228000	 1.52822000	 1.53978000
                        40	 1.37822000	 1.45041000	 1.48277000	 1.50697000	 1.56950000	 1.61963000	 1.62895000
                        60	 1.37237000	 1.42207000	 1.44766000	 1.46266000	 1.50495000	 1.52598000	 1.51621000
                    </tableData>
                </table>
            </product>
        </function>
        <function name="aero/coefficients/CFZDF">
            <description>LIFT INCREMENT DUE TO FLAPS</description>
            <product>
                <property>fcs/flap-pos-deg</property>
                <table>
                    <independentVar lookup="row">aero/alpha-deg</independentVar>
                    <independentVar lookup="column">aero/beta-deg</independentVar>
                    <tableData>
                        -10	          0	          1	          3	          4	          5	         10
                        -10	-0.22002000	-0.21953000	-0.21955000	-0.21960000	-0.22030000	-0.21969000	-0.21972000
                        0	-0.19263000	-0.19792000	-0.18213000	-0.18637000	-0.17403000	-0.16990000	-0.19253000
                        2	-0.19253000	-0.19055000	-0.18660000	-0.18208000	-0.18013000	-0.17995000	-0.19340000
                        4	-0.19441000	-0.18813000	-0.18758000	-0.18669000	-0.18653000	-0.18702000	-0.19435000
                        6	-0.19526000	-0.19016000	-0.19057000	-0.19086000	-0.19066000	-0.19075000	-0.19519000
                        8	-0.19646000	-0.19104000	-0.19182000	-0.19580000	-0.19261000	-0.19218000	-0.19573000
                        10	-0.19820000	-0.19107000	-0.19094000	-0.18954000	-0.19212000	-0.19264000	-0.19806000
                        12	-0.19501000	-0.19354000	-0.19330000	-0.19323000	-0.19382000	-0.19399000	-0.19498000
                        14	-0.19442000	-0.19557000	-0.19408000	-0.19491000	-0.19643000	-0.19579000	-0.19457000
                        15	-0.18738000	-0.19587000	-0.19590000	-0.19515000	-0.19510000	-0.19477000	-0.18675000
                        17	-0.18820000	-0.19482000	-0.19516000	-0.19643000	-0.19373000	-0.19057000	-0.18816000
                        20	-0.18471000	-0.18568000	-0.18579000	-0.18604000	-0.18719000	-0.18744000	-0.18517000
                        25	-0.15846000	-0.14464000	-0.14537000	-0.14783000	-0.14839000	-0.14929000	-0.15839000
                        30	-0.08430000	-0.09184000	-0.09195000	-0.09017000	-0.08952000	-0.08852000	-0.08416000
                        40	 0.10981000	 0.09451000	 0.09458000	 0.09517000	 0.09607000	 0.09713000	 0.10979000
                        60	 0.10920000	 0.10954000	 0.10955000	 0.10960000	 0.10953000	 0.10958000	 0.10862000
                    </tableData>
                </table>
            </product>
        </function>
        <function name="aero/coefficients/CFZGEAR">
            <description>LIFT INCREMENT DUE TO GEAR</description>
            <product>
                <property>gear/gear-pos-norm</property>
                <table>
                    <independentVar lookup="row">aero/alpha-deg</independentVar>
                    <independentVar lookup="column">aero/beta-deg</independentVar>
                    <tableData>
                        -10	          0	          1	          3	          4	          5	         10
                        -10	 0.00039000	 0.00037000	 0.00036000	 0.00039000	-0.00110000	 0.00038000	 0.00038000
                        0	-0.00011000	-0.00002000	-0.00003000	-0.00001000	-0.00001000	-0.00004000	-0.00011000
                        2	-0.00005000	-0.00003000	-0.00002000	-0.00005000	-0.00004000	-0.00004000	-0.00009000
                        4	-0.00011000	 0.00151000	 0.00011000	-0.00012000	-0.00011000	-0.00011000	-0.00011000
                        6	-0.00019000	-0.00018000	-0.00018000	-0.00022000	-0.00021000	-0.00021000	-0.00016000
                        8	-0.00026000	-0.00029000	-0.00059000	-0.00028000	-0.00039000	-0.00029000	 0.00045000
                        10	-0.00034000	-0.00037000	-0.00036000	-0.00038000	 0.01025000	-0.00035000	-0.00020000
                        12	-0.00043000	-0.00057000	-0.00046000	-0.00046000	-0.00044000	-0.00045000	 0.00006000
                        14	-0.00051000	-0.00495000	-0.00053000	-0.00052000	-0.00463000	-0.00052000	-0.00051000
                        15	-0.00049000	-0.00054000	-0.00055000	-0.00055000	-0.00055000	-0.00056000	 0.00011000
                        17	-0.00061000	-0.00071000	-0.00072000	-0.00065000	-0.00067000	-0.00065000	-0.00061000
                        20	-0.00067000	-0.00073000	-0.00073000	-0.00086000	-0.00069000	-0.00108000	-0.00066000
                        25	-0.00064000	-0.00065000	-0.00067000	-0.00066000	-0.00082000	-0.00065000	-0.00102000
                        30	-0.00042000	-0.00040000	-0.00042000	-0.00036000	-0.00037000	-0.00038000	-0.00042000
                        40	-0.00017000	-0.00002000	-0.00002000	-0.00004000	-0.00004000	-0.00011000	-0.00017000
                        60	-0.00002000	-0.00001000	-0.00002000	-0.00002000	-0.00001000	 0.00001000	-0.00002000
                    </tableData>
                </table>
            </product>
        </function>
        <function name="aero/coefficients/CFZTNK">
            <description>LIFT INCREMENT DUE TO TANK</description>
            <product>
                <property>metrics/stores-tank-factor</property>
                <table>
                    <independentVar lookup="row">aero/alpha-deg</independentVar>
                    <independentVar lookup="column">aero/beta-deg</independentVar>
                    <tableData>
                        -10	          0	          1	          3	          4	          5	         10
                        -10	-0.00234000	-0.00240000	-0.00240000	-0.00240000	-0.00304000	-0.00239000	-0.00235000
                        0	-0.00004000	 0.00007000	 0.00004000	 0.00003000	-0.00004000	 0.00004000	-0.00004000
                        2	 0.00049000	 0.00053000	 0.00052000	 0.00052000	 0.00055000	 0.00052000	 0.00045000
                        4	 0.00097000	 0.00102000	 0.00124000	 0.00101000	 0.00101000	 0.00101000	 0.00097000
                        6	 0.00146000	 0.00151000	 0.00151000	 0.00147000	 0.00148000	 0.00147000	 0.00149000
                        8	 0.00195000	 0.00198000	 0.00169000	 0.00198000	 0.00188000	 0.00197000	 0.00266000
                        10	 0.00245000	 0.00248000	 0.00248000	 0.00249000	 0.00248000	 0.00248000	 0.00259000
                        12	 0.00296000	 0.00300000	 0.00301000	 0.00301000	 0.00300000	 0.00300000	 0.00296000
                        14	 0.00340000	 0.00353000	 0.00353000	 0.00353000	 0.00353000	 0.00346000	 0.00340000
                        15	 0.00336000	 0.00370000	 0.00371000	 0.00374000	 0.00373000	 0.00372000	 0.00396000
                        17	 0.00378000	 0.00419000	 0.00419000	 0.00418000	 0.00397000	 0.00395000	 0.00378000
                        20	 0.00391000	 0.00465000	 0.00464000	 0.00411000	 0.00423000	 0.00420000	 0.00392000
                        25	 0.00458000	 0.00473000	 0.00472000	 0.00471000	 0.00453000	 0.00468000	 0.00457000
                        30	 0.00252000	 0.00274000	 0.00257000	 0.00272000	 0.00267000	 0.00267000	 0.00251000
                        40	 0.00164000	 0.00105000	 0.00105000	 0.00108000	 0.00108000	 0.00109000	 0.00164000
                        60	 0.00093000	 0.00108000	 0.00107000	 0.00106000	 0.00106000	 0.00106000	 0.00092000
                    </tableData>
                </table>
            </product>
        </function>
        <function name="aero/coefficients/CMM1">
            <description>BASIC PITCHING MOMENT</description>
            <product>
                <table>
                    <independentVar lookup="row">aero/alpha-deg</independentVar>
                    <independentVar lookup="column">fcs/elevator-pos-deg</independentVar>
                    <tableData>
                        -30	        -20	        -15	        -10	          0	         10	         15
                        -10	 0.46004000	 0.40256000	 0.35914000	 0.30466000	 0.15301000	 0.04573000	-0.01210000
                        0	 0.28549000	 0.21457000	 0.16192000	 0.10400000	-0.01908000	-0.13527000	-0.19519000
                        2	 0.25086000	 0.17718000	 0.12607000	 0.06586000	-0.05438000	-0.17477000	-0.23521000
                        4	 0.21552000	 0.14002000	 0.08829000	 0.02766000	-0.09006000	-0.21555000	-0.27590000
                        6	 0.18042000	 0.10376000	 0.04993000	-0.01014000	-0.12726000	-0.25869000	-0.31845000
                        8	 0.14591000	 0.06594000	 0.01108000	-0.05000000	-0.16619000	-0.30454000	-0.36332000
                        10	 0.11141000	 0.02719000	-0.02988000	-0.09290000	-0.20693000	-0.35337000	-0.41066000
                        12	 0.07097000	-0.01349000	-0.07379000	-0.13674000	-0.24888000	-0.40245000	-0.46007000
                        14	 0.03665000	-0.05611000	-0.11872000	-0.18167000	-0.29205000	-0.45319000	-0.51160000
                        15	 0.01637000	-0.07813000	-0.14182000	-0.20508000	-0.31355000	-0.47831000	-0.53675000
                        17	-0.02380000	-0.12090000	-0.18524000	-0.24703000	-0.35450000	-0.52866000	-0.58224000
                        20	-0.08802000	-0.18938000	-0.25318000	-0.31307000	-0.41931000	-0.60986000	-0.65300000
                        25	-0.16341000	-0.27337000	-0.33568000	-0.39289000	-0.49424000	-0.67792000	-0.72260000
                        30	-0.21450000	-0.33158000	-0.39097000	-0.44178000	-0.54928000	-0.73350000	-0.76185000
                        40	-0.30977000	-0.42100000	-0.47133000	-0.50732000	-0.62251000	-0.82921000	-0.84540000
                        60	-0.48363000	-0.56304000	-0.60401000	-0.62859000	-0.75637000	-1.03790000	-1.03444000
                    </tableData>
                </table>
            </product>
        </function>
        <function name="aero/coefficients/CMMDF">
            <description>PITCHING MOMENT DUE TO FLAPS</description>
            <product>
                <property>fcs/flap-pos-deg</property>
                <table>
                    <independentVar lookup="row">aero/alpha-deg</independentVar>
                    <independentVar lookup="column">aero/beta-deg</independentVar>
                    <tableData>
                        -10	          0	          1	          3	          4	          5	         10
                        -10	 0.16531000	 0.15789000	 0.15796000	 0.15866000	 0.16009000	 0.15993000	 0.16493000
                        0	 0.13795000	 0.14124000	 0.11661000	 0.12328000	 0.10004000	 0.09867000	 0.13779000
                        2	 0.14027000	 0.13125000	 0.12643000	 0.12058000	 0.11573000	 0.11641000	 0.14120000
                        4	 0.14645000	 0.13314000	 0.13243000	 0.13130000	 0.13123000	 0.13226000	 0.14634000
                        6	 0.15157000	 0.14061000	 0.14127000	 0.14222000	 0.14178000	 0.14197000	 0.15145000
                        8	 0.15627000	 0.14454000	 0.14589000	 0.15392000	 0.14753000	 0.14692000	 0.15576000
                        10	 0.15948000	 0.14552000	 0.14490000	 0.14127000	 0.14687000	 0.14863000	 0.15930000
                        12	 0.15703000	 0.15160000	 0.15144000	 0.15160000	 0.15307000	 0.15347000	 0.15695000
                        14	 0.16055000	 0.15867000	 0.15712000	 0.15964000	 0.16094000	 0.15979000	 0.16054000
                        15	 0.16105000	 0.16097000	 0.16160000	 0.16334000	 0.16134000	 0.16069000	 0.16023000
                        17	 0.16430000	 0.16130000	 0.16136000	 0.16220000	 0.16274000	 0.16267000	 0.16425000
                        20	 0.16618000	 0.16873000	 0.16876000	 0.16780000	 0.16810000	 0.16772000	 0.16633000
                        25	 0.15762000	 0.14935000	 0.14969000	 0.15120000	 0.15161000	 0.15200000	 0.15755000
                        30	 0.13917000	 0.14096000	 0.14109000	 0.14092000	 0.14081000	 0.14064000	 0.13907000
                        40	-0.21213000	-0.20687000	-0.20686000	-0.20693000	-0.20751000	-0.20827000	-0.21201000
                        60	-0.22907000	-0.23143000	-0.23144000	-0.23142000	-0.23108000	-0.23115000	-0.22669000
                    </tableData>
                </table>
            </product>
        </function>
        <function name="aero/coefficients/CMMGEAR">
            <description>PITCHING MOMENT INCREMENT DUE TO GEAR</description>
            <product>
                <property>gear/gear-pos-norm</property>
                <table>
                    <independentVar lookup="row">aero/alpha-deg</independentVar>
                    <independentVar lookup="column">aero/beta-deg</independentVar>
                    <tableData>
                        -10	          0	          1	          3	          4	          5	         10
                        -10	-0.00069000	-0.00069000	-0.00070000	-0.00069000	 0.00069000	-0.00071000	-0.00070000
                        0	 0.00002000	 0.00001000	 0.00002000	 0.00001000	-0.00001000	 0.00000000	 0.00003000
                        2	 0.00010000	 0.00010000	 0.00008000	 0.00011000	 0.00011000	 0.00010000	 0.00014000
                        4	 0.00023000	-0.00087000	-0.00001000	 0.00025000	 0.00024000	 0.00025000	 0.00023000
                        6	 0.00041000	 0.00041000	 0.00041000	 0.00040000	 0.00040000	 0.00039000	 0.00037000
                        8	 0.00055000	 0.00057000	 0.00089000	 0.00057000	 0.00066000	 0.00054000	 0.00009000
                        10	 0.00070000	 0.00072000	 0.00072000	 0.00070000	-0.00635000	 0.00071000	 0.00054000
                        12	 0.00085000	 0.00095000	 0.00086000	 0.00086000	 0.00087000	 0.00086000	 0.00053000
                        14	 0.00099000	 0.00394000	 0.00102000	 0.00101000	 0.00370000	 0.00101000	 0.00099000
                        15	 0.00106000	 0.00108000	 0.00109000	 0.00108000	 0.00109000	 0.00108000	 0.00030000
                        17	 0.00116000	 0.00124000	 0.00123000	 0.00122000	 0.00122000	 0.00121000	 0.00116000
                        20	 0.00139000	 0.00146000	 0.00145000	 0.00163000	 0.00142000	 0.00167000	 0.00138000
                        25	 0.00161000	 0.00166000	 0.00165000	 0.00165000	 0.00188000	 0.00164000	 0.00187000
                        30	 0.00184000	 0.00184000	 0.00185000	 0.00184000	 0.00184000	 0.00185000	 0.00183000
                        40	 0.00221000	 0.00221000	 0.00223000	 0.00225000	 0.00225000	 0.00224000	 0.00220000
                        60	 0.00248000	 0.00250000	 0.00250000	 0.00249000	 0.00249000	 0.00240000	 0.00248000
                    </tableData>
                </table>
            </product>
        </function>
        <function name="aero/coefficients/CMMQ">
            <description>PITCH DAMPING DERIVATIVE</description>
            <product>
                <property>aero/qb</property>
                <table>
                    <independentVar lookup="row">aero/alpha-deg</independentVar>
                    <tableData>
                        -10		-8.07606270
                        0		 0.06055760
                        2		-0.93880130
                        4		-2.61309220
                        6		-1.79357410
                        8		-1.75143090
                        10		-0.95993680
                        12		-0.46091720
                        14		-0.13654030
                        15		 0.10802180
                        17		 1.08107400
                        20		 1.63398610
                        25		-2.62351400
                        30		-385.37717470
                        40		 3.66732360
                        60		 71.22594740
                    </tableData>
                </table>
            </product>
        </function>
        <function name="aero/coefficients/CMMTNK">
            <description>PITCHING MOMENT INCREMENT DUE TO TANK</description>
            <product>
                <property>metrics/stores-tank-factor</property>
                <table>
                    <independentVar lookup="row">aero/alpha-deg</independentVar>
                    <independentVar lookup="column">aero/beta-deg</independentVar>
                    <tableData>
                        -10	          0	          1	          3	          4	          5	         10
                        -10	-0.00593000	-0.00619000	-0.00619000	-0.00616000	-0.00530000	-0.00613000	-0.00594000
                        0	 0.00016000	 0.00005000	 0.00009000	 0.00008000	 0.00008000	 0.00006000	 0.00017000
                        2	 0.00137000	 0.00134000	 0.00135000	 0.00134000	 0.00130000	 0.00133000	 0.00141000
                        4	 0.00257000	 0.00260000	 0.00233000	 0.00259000	 0.00259000	 0.00259000	 0.00257000
                        6	 0.00376000	 0.00385000	 0.00384000	 0.00383000	 0.00382000	 0.00380000	 0.00371000
                        8	 0.00494000	 0.00509000	 0.00542000	 0.00507000	 0.00517000	 0.00505000	 0.00447000
                        10	 0.00610000	 0.00629000	 0.00628000	 0.00625000	 0.00625000	 0.00624000	 0.00594000
                        12	 0.00721000	 0.00745000	 0.00745000	 0.00743000	 0.00741000	 0.00739000	 0.00721000
                        14	 0.00838000	 0.00859000	 0.00859000	 0.00856000	 0.00854000	 0.00857000	 0.00838000
                        15	 0.00898000	 0.00923000	 0.00922000	 0.00917000	 0.00916000	 0.00913000	 0.00822000
                        17	 0.01007000	 0.01033000	 0.01033000	 0.01030000	 0.01029000	 0.01026000	 0.01007000
                        20	 0.01200000	 0.01191000	 0.01190000	 0.01234000	 0.01213000	 0.01211000	 0.01199000
                        25	 0.01469000	 0.01508000	 0.01507000	 0.01505000	 0.01526000	 0.01498000	 0.01469000
                        30	 0.01777000	 0.01838000	 0.01839000	 0.01830000	 0.01827000	 0.01815000	 0.01777000
                        40	 0.02202000	 0.02268000	 0.02267000	 0.02257000	 0.02251000	 0.02246000	 0.02201000
                        60	 0.02575000	 0.02613000	 0.02612000	 0.02608000	 0.02604000	 0.02592000	 0.02575000
                    </tableData>
                </table>
            </product>
        </function>
        <function name="aero/coefficients/CML1">
            <description>BASIC ROLLING MOMENT</description>
            <product>
                <table>
                    <independentVar lookup="row">aero/alpha-deg</independentVar>
                    <independentVar lookup="column">aero/beta-deg</independentVar>
                    <tableData>
                        -10	          0	          1	          3	          4	          5	         10
                        -10	 0.01526000	 0.00000000	-0.00159000	-0.00475000	-0.00631000	-0.00786000	-0.01525000
                        0	-0.01111000	 0.00000000	 0.00090000	 0.00329000	 0.00432000	 0.00570000	 0.01111000
                        2	-0.01633000	 0.00000000	 0.00163000	 0.00492000	 0.00654000	 0.00820000	 0.01633000
                        4	-0.02172000	 0.00000000	 0.00219000	 0.00657000	 0.00875000	 0.01092000	 0.02172000
                        6	-0.02714000	 0.00000000	 0.00275000	 0.00823000	 0.01096000	 0.01369000	 0.02714000
                        8	-0.03261000	 0.00000000	 0.00330000	 0.00991000	 0.01319000	 0.01646000	 0.03285000
                        10	-0.03806000	 0.00000000	 0.00386000	 0.01155000	 0.01541000	 0.01925000	 0.03807000
                        12	-0.04367000	 0.00000000	 0.00443000	 0.01327000	 0.01768000	 0.02207000	 0.04368000
                        14	-0.04848000	 0.00001000	 0.00502000	 0.01501000	 0.01995000	 0.02487000	 0.04850000
                        15	-0.05065000	 0.00001000	 0.00512000	 0.01531000	 0.02045000	 0.02553000	 0.05065000
                        17	-0.05532000	 0.00001000	 0.00553000	 0.01663000	 0.02219000	 0.02780000	 0.05534000
                        20	-0.05929000	 0.00001000	 0.00639000	 0.01882000	 0.02473000	 0.03062000	 0.05932000
                        25	-0.05642000	 0.00002000	 0.00562000	 0.01700000	 0.02261000	 0.02824000	 0.05646000
                        30	-0.05262000	 0.00004000	 0.00510000	 0.01524000	 0.02022000	 0.02547000	 0.05270000
                        40	-0.04999000	 0.00006000	 0.00497000	 0.01485000	 0.01980000	 0.02475000	 0.05010000
                        60	-0.06057000	 0.00008000	 0.00620000	 0.01844000	 0.02453000	 0.03064000	 0.06072000
                    </tableData>
                </table>
            </product>
        </function>
        <function name="aero/coefficients/CMLDAD">
            <description>ROLLING MOMENT DUE TO AILERON DEFLECTION</description>
            <product>
                <property>fcs/aileron-pos-deg</property>
                <table>
                    <independentVar lookup="row">aero/alpha-deg</independentVar>
                    <tableData>
                        -10		 0.00568667
                        0		 0.00578000
                        2		 0.00585333
                        4		 0.00578963
                        6		 0.00571778
                        8		 0.00571111
                        10		 0.00572667
                        12		 0.00570074
                        14		 0.00562889
                        15		 0.00560815
                        17		 0.00553407
                        20		 0.00540444
                        25		 0.00508296
                        30		 0.00484296
                        40		 0.00527333
                        60		 0.00810444
                    </tableData>
                </table>
            </product>
        </function>
        <function name="aero/coefficients/CMLDRD">
            <description>ROLLING MOMENT DUE TO RUDDER DEFLECTION -(CLD)</description>
            <product>
                <property>fcs/rudder-pos-deg</property>
                <value>
                    0.85 <!-- DRFLX1 -->
                </value>
                <value>
                    1 <!-- EPA43 -->
                </value>
                <table>
                    <independentVar lookup="row">aero/alpha-deg</independentVar>
                    <independentVar lookup="column">aero/beta-deg</independentVar>
                    <tableData>
                        -10	          0	          1	          3	          4	          5	         10
                        -10	-0.00052767	-0.00046667	-0.00045933	-0.00044733	-0.00044267	-0.00043867	-0.00042900
                        0	-0.00055100	-0.00044467	-0.00043567	-0.00042200	-0.00041600	-0.00041067	-0.00039667
                        2	-0.00055533	-0.00044000	-0.00043133	-0.00041600	-0.00041000	-0.00040467	-0.00038833
                        4	-0.00055900	-0.00043500	-0.00042633	-0.00041133	-0.00040500	-0.00039900	-0.00038200
                        6	-0.00056100	-0.00043133	-0.00042233	-0.00040667	-0.00040033	-0.00039467	-0.00037700
                        8	-0.00056000	-0.00042733	-0.00041800	-0.00040267	-0.00039700	-0.00039067	-0.00038000
                        10	-0.00055567	-0.00042167	-0.00041300	-0.00039467	-0.00039033	-0.00038533	-0.00036633
                        12	-0.00055233	-0.00041800	-0.00040900	-0.00039367	-0.00038700	-0.00038133	-0.00036333
                        14	-0.00055633	-0.00041500	-0.00040700	-0.00039100	-0.00038467	-0.00038233	-0.00036567
                        15	-0.00055000	-0.00042367	-0.00041233	-0.00039200	-0.00038767	-0.00038200	-0.00036133
                        17	-0.00055133	-0.00041800	-0.00040800	-0.00040200	-0.00038433	-0.00038033	-0.00035967
                        20	-0.00051033	-0.00040567	-0.00039733	-0.00039167	-0.00038667	-0.00037900	-0.00036500
                        25	-0.00055067	-0.00042967	-0.00042167	-0.00040600	-0.00039633	-0.00039333	-0.00037533
                        30	-0.00048900	-0.00043400	-0.00042433	-0.00040933	-0.00041167	-0.00040100	-0.00036500
                        40	-0.00037167	-0.00029800	-0.00030367	-0.00028233	-0.00029733	-0.00029633	-0.00030200
                        60	-0.00014733	-0.00012533	-0.00012300	-0.00012067	-0.00011933	-0.00011967	-0.00011167
                    </tableData>
                </table>
            </product>
        </function>
        <function name="aero/coefficients/CMLDTD">
            <description>ROLLING MOMENT DUE TO DIFFERENTIAL TAIL DEFLECTION</description>
            <product>
                <value>
                    0.975 <!-- DTFLX1 -->
                </value>
                <property>fcs/differential-elevator-pos-deg</property>
                <table>
                    <independentVar lookup="row">aero/alpha-deg</independentVar>
                    <independentVar lookup="column">fcs/elevator-pos-deg</independentVar>
                    <tableData>
                        -10	          0	         10
                        -10	 0.00150500	 0.00150500	 0.00150500
                        0	 0.00138000	 0.00138000	 0.00138000
                        2	 0.00139800	 0.00139800	 0.00139800
                        4	 0.00142400	 0.00142400	 0.00142400
                        6	 0.00147800	 0.00147800	 0.00147800
                        8	 0.00154000	 0.00154000	 0.00154000
                        10	 0.00160700	 0.00160700	 0.00160700
                        12	 0.00167400	 0.00167400	 0.00167400
                        14	 0.00174800	 0.00174800	 0.00174800
                        15	 0.00176800	 0.00176800	 0.00176800
                        17	 0.00186500	 0.00186500	 0.00186500
                        20	 0.00204100	 0.00204100	 0.00204100
                        25	 0.00155700	 0.00155700	 0.00155700
                        30	 0.00154300	 0.00154300	 0.00154300
                        40	 0.00211800	 0.00211800	 0.00211800
                        60	 0.00292100	 0.00292100	 0.00292100
                    </tableData>
                </table>
            </product>
        </function>
        <function name="aero/coefficients/CMLGEAR">
            <description>ROLLING MOMENT INCREMENT DUE TO GEAR</description>
            <product>
                <property>gear/gear-pos-norm</property>
                <table>
                    <independentVar lookup="row">aero/alpha-deg</independentVar>
                    <independentVar lookup="column">aero/beta-deg</independentVar>
                    <tableData>
                        -10	          0	          1	          3	          4	          5	         10
                        -10	-0.00011000	 0.00000000	 0.00001000	 0.00003000	 0.00004000	 0.00006000	 0.00011000
                        0	-0.00006000	 0.00000000	 0.00000000	 0.00002000	 0.00002000	 0.00002000	 0.00006000
                        2	-0.00005000	 0.00000000	 0.00000000	 0.00001000	 0.00002000	 0.00002000	 0.00005000
                        4	-0.00004000	-0.00005000	 0.00001000	 0.00001000	 0.00002000	 0.00003000	 0.00004000
                        6	-0.00005000	 0.00000000	 0.00000000	 0.00001000	 0.00002000	 0.00002000	 0.00005000
                        8	-0.00004000	 0.00000000	 0.00001000	 0.00001000	 0.00001000	 0.00002000	-0.00020000
                        10	-0.00004000	 0.00000000	 0.00000000	 0.00001000	-0.00006000	 0.00001000	 0.00004000
                        12	-0.00003000	 0.00001000	 0.00000000	 0.00001000	 0.00001000	 0.00002000	 0.00005000
                        14	-0.00002000	 0.00013000	 0.00000000	 0.00000000	 0.00002000	 0.00001000	 0.00001000
                        15	-0.00001000	 0.00000000	 0.00000000	 0.00001000	 0.00001000	 0.00001000	 0.00002000
                        17	-0.00001000	 0.00000000	 0.00000000	 0.00001000	 0.00000000	 0.00000000	 0.00001000
                        20	-0.00001000	 0.00000000	 0.00000000	 0.00001000	 0.00001000	 0.00002000	 0.00001000
                        25	 0.00004000	 0.00000000	 0.00000000	-0.00001000	-0.00001000	-0.00002000	-0.00004000
                        30	 0.00002000	 0.00000000	 0.00001000	 0.00001000	 0.00000000	 0.00001000	-0.00003000
                        40	 0.00002000	-0.00001000	 0.00000000	 0.00000000	 0.00000000	 0.00000000	-0.00002000
                        60	 0.00022000	 0.00000000	-0.00001000	-0.00003000	-0.00004000	-0.00006000	-0.00021000
                    </tableData>
                </table>
            </product>
        </function>
        <function name="aero/coefficients/CMLP">
            <description>ROLL DAMPING DERIVATIVE</description>
            <product>
                <property>aero/pb</property>
                <table>
                    <independentVar lookup="row">aero/alpha-deg</independentVar>
                    <tableData>
                        -10		 0.27555200
                        0		 0.29072870
                        2		 0.23130490
                        4		 0.27587100
                        6		 0.27213960
                        8		 0.26943340
                        10		 0.27391670
                        12		 0.25763560
                        14		 0.25463710
                        15		 0.20231710
                        17		 0.34850280
                        20		 0.34799700
                        25		 0.10048850
                        30		-0.02235950
                        40		-0.15507190
                        60		-0.62838470
                    </tableData>
                </table>
            </product>
        </function>
        <function name="aero/coefficients/CMLR">
            <description>ROLLING MOMENT DUE TO YAW RATE</description>
            <product>
                <property>aero/rb</property>
                <table>
                    <independentVar lookup="row">aero/alpha-deg</independentVar>
                    <tableData>
                        -10		 0.03464870
                        0		-0.11597360
                        2		-0.12797010
                        4		-0.16489660
                        6		-0.18866590
                        8		-0.21912450
                        10		-0.24826570
                        12		-0.26983120
                        14		-0.32722180
                        15		-0.32869310
                        17		-0.36409000
                        20		-0.38755960
                        25		-0.24965060
                        30		-0.23617220
                        40		-0.38561060
                        60		-0.45033510
                    </tableData>
                </table>
            </product>
        </function>
        <function name="aero/coefficients/CMLTNK">
            <description>ROLLING MOMENT INCREMENT DUE TO TANK</description>
            <product>
                <property>metrics/stores-tank-factor</property>
                <table>
                    <independentVar lookup="row">aero/alpha-deg</independentVar>
                    <independentVar lookup="column">aero/beta-deg</independentVar>
                    <tableData>
                        -10	          0	          1	          3	          4	          5	         10
                        -10	 0.00011000	 0.00000000	-0.00001000	-0.00004000	-0.00005000	-0.00006000	-0.00012000
                        0	-0.00012000	 0.00000000	 0.00002000	 0.00003000	 0.00004000	 0.00006000	 0.00012000
                        2	-0.00016000	 0.00000000	 0.00002000	 0.00005000	 0.00006000	 0.00008000	 0.00016000
                        4	-0.00020000	 0.00000000	 0.00002000	 0.00006000	 0.00008000	 0.00011000	 0.00020000
                        6	-0.00024000	 0.00000000	 0.00002000	 0.00007000	 0.00010000	 0.00012000	 0.00024000
                        8	-0.00027000	 0.00000000	 0.00004000	 0.00008000	 0.00011000	 0.00014000	 0.00003000
                        10	-0.00030000	 0.00000000	 0.00003000	 0.00009000	 0.00013000	 0.00015000	 0.00030000
                        12	-0.00033000	 0.00000000	 0.00003000	 0.00010000	 0.00013000	 0.00017000	 0.00033000
                        14	-0.00032000	 0.00000000	 0.00003000	 0.00010000	 0.00014000	 0.00015000	 0.00031000
                        15	-0.00033000	 0.00000000	 0.00003000	 0.00009000	 0.00013000	 0.00016000	 0.00034000
                        17	-0.00036000	 0.00000000	 0.00003000	 0.00011000	 0.00016000	 0.00019000	 0.00036000
                        20	-0.00017000	 0.00000000	 0.00004000	 0.00001000	 0.00003000	 0.00006000	 0.00017000
                        25	-0.00021000	 0.00000000	 0.00003000	 0.00009000	 0.00013000	 0.00015000	 0.00022000
                        30	 0.00024000	 0.00000000	-0.00009000	-0.00015000	-0.00015000	-0.00023000	-0.00024000
                        40	 0.00008000	 0.00000000	 0.00000000	-0.00003000	-0.00003000	-0.00004000	-0.00008000
                        60	 0.00010000	 0.00000000	 0.00000000	 0.00000000	 0.00001000	 0.00000000	-0.00009000
                    </tableData>
                </table>
            </product>
        </function>
        <function name="aero/coefficients/CFYB">
            <description>BASIC SIDE FORCE</description>
            <product>
                <table>
                    <independentVar lookup="row">aero/alpha-deg</independentVar>
                    <independentVar lookup="column">aero/beta-deg</independentVar>
                    <independentVar lookup="table">fcs/elevator-pos-deg</independentVar>
                    <tableData breakPoint="-30">
                        -10	        -5	        -4	        -3	        -1	         0	         1	         3	         4	         5	        10
                        -10	 0.07496000	 0.03849000	 0.03019000	 0.02269000	 0.00772000	-0.00002000	-0.00772000	-0.02269000	-0.03019000	-0.03849000	-0.07499000
                        0	 0.08690000	 0.04370000	 0.03497000	 0.02625000	 0.00884000	-0.00002000	-0.00884000	-0.02625000	-0.03497000	-0.04370000	-0.08689000
                        2	 0.08919000	 0.04491000	 0.03594000	 0.02695000	 0.00898000	-0.00002000	-0.00898000	-0.02695000	-0.03594000	-0.04491000	-0.08928000
                        4	 0.09181000	 0.04616000	 0.03692000	 0.02768000	 0.00920000	-0.00002000	-0.00920000	-0.02768000	-0.03692000	-0.04616000	-0.09185000
                        6	 0.09446000	 0.04743000	 0.03785000	 0.02857000	 0.00949000	-0.00002000	-0.00949000	-0.02857000	-0.03785000	-0.04743000	-0.09450000
                        8	 0.09697000	 0.04854000	 0.03914000	 0.02956000	 0.00977000	-0.00002000	-0.00977000	-0.02956000	-0.03914000	-0.04854000	-0.09702000
                        10	 0.09881000	 0.04970000	 0.03915000	 0.02908000	 0.00935000	-0.00002000	-0.00935000	-0.02908000	-0.03915000	-0.04970000	-0.09884000
                        12	 0.10181000	 0.05251000	 0.04151000	 0.03075000	 0.00952000	-0.00003000	-0.00952000	-0.03075000	-0.04151000	-0.05251000	-0.10191000
                        14	 0.10649000	 0.05395000	 0.04388000	 0.03197000	 0.01070000	-0.00003000	-0.01070000	-0.03197000	-0.04388000	-0.05395000	-0.10653000
                        15	 0.11005000	 0.05469000	 0.04356000	 0.03238000	 0.01081000	-0.00003000	-0.01081000	-0.03238000	-0.04356000	-0.05469000	-0.11008000
                        17	 0.12253000	 0.05494000	 0.04406000	 0.03382000	 0.01087000	-0.00003000	-0.01087000	-0.03382000	-0.04406000	-0.05494000	-0.12257000
                        20	 0.14137000	 0.07593000	 0.06177000	 0.04665000	 0.01556000	-0.00002000	-0.01556000	-0.04665000	-0.06177000	-0.07593000	-0.14141000
                        25	 0.13862000	 0.07284000	 0.05871000	 0.04468000	 0.01474000	-0.00002000	-0.01474000	-0.04468000	-0.05871000	-0.07284000	-0.13866000
                        30	 0.13009000	 0.06797000	 0.05444000	 0.04110000	 0.01379000	-0.00001000	-0.01379000	-0.04110000	-0.05444000	-0.06797000	-0.13012000
                        40	 0.10351000	 0.05278000	 0.04245000	 0.03202000	 0.01061000	-0.00001000	-0.01061000	-0.03202000	-0.04245000	-0.05278000	-0.10352000
                        60	 0.02513000	 0.01101000	 0.00866000	 0.00643000	 0.00214000	 0.00001000	-0.00214000	-0.00643000	-0.00866000	-0.01101000	-0.02518000
                    </tableData>
                    <tableData breakPoint="-20">
                        -10	        -5	        -4	        -3	        -1	         0	         1	         3	         4	         5	        10
                        -10	 0.07987000	 0.04023000	 0.03217000	 0.02429000	 0.00768000	-0.00002000	-0.00768000	-0.02429000	-0.03217000	-0.04023000	-0.07991000
                        0	 0.09971000	 0.05025000	 0.04019000	 0.03016000	 0.01012000	-0.00003000	-0.01012000	-0.03016000	-0.04019000	-0.05025000	-0.09975000
                        2	 0.10220000	 0.05047000	 0.04104000	 0.03077000	 0.01031000	-0.00003000	-0.01031000	-0.03077000	-0.04104000	-0.05047000	-0.10192000
                        4	 0.10392000	 0.05218000	 0.04200000	 0.03151000	 0.01049000	-0.00003000	-0.01049000	-0.03151000	-0.04200000	-0.05218000	-0.10398000
                        6	 0.10601000	 0.05343000	 0.04270000	 0.03227000	 0.01056000	-0.00003000	-0.01056000	-0.03227000	-0.04270000	-0.05343000	-0.10611000
                        8	 0.10807000	 0.05556000	 0.04351000	 0.03246000	 0.01039000	-0.00003000	-0.01039000	-0.03246000	-0.04351000	-0.05556000	-0.10813000
                        10	 0.10922000	 0.05523000	 0.04414000	 0.03224000	 0.01067000	-0.00003000	-0.01067000	-0.03224000	-0.04414000	-0.05523000	-0.10866000
                        12	 0.10816000	 0.05499000	 0.04438000	 0.03297000	 0.01086000	-0.00003000	-0.01086000	-0.03297000	-0.04438000	-0.05499000	-0.10823000
                        14	 0.10971000	 0.05497000	 0.04426000	 0.03306000	 0.01117000	-0.00003000	-0.01117000	-0.03306000	-0.04426000	-0.05497000	-0.10977000
                        15	 0.11278000	 0.05621000	 0.04492000	 0.03327000	 0.01150000	-0.00003000	-0.01150000	-0.03327000	-0.04492000	-0.05621000	-0.11284000
                        17	 0.12489000	 0.05677000	 0.04504000	 0.03461000	 0.01116000	-0.00002000	-0.01116000	-0.03461000	-0.04504000	-0.05677000	-0.12494000
                        20	 0.14317000	 0.07697000	 0.06209000	 0.04713000	 0.01566000	-0.00002000	-0.01566000	-0.04713000	-0.06209000	-0.07697000	-0.14321000
                        25	 0.13769000	 0.07245000	 0.05823000	 0.04426000	 0.01456000	-0.00001000	-0.01456000	-0.04426000	-0.05823000	-0.07245000	-0.13780000
                        30	 0.12765000	 0.06694000	 0.05373000	 0.04050000	 0.01363000	-0.00001000	-0.01363000	-0.04050000	-0.05373000	-0.06694000	-0.12767000
                        40	 0.09791000	 0.04981000	 0.03867000	 0.03013000	 0.00998000	 0.00000000	-0.00998000	-0.03013000	-0.03867000	-0.04981000	-0.09791000
                        60	 0.02361000	 0.00963000	 0.00761000	 0.00564000	 0.00189000	-0.00001000	-0.00189000	-0.00564000	-0.00761000	-0.00963000	-0.02358000
                    </tableData>
                    <tableData breakPoint="-15">
                        -10	        -5	        -4	        -3	        -1	         0	         1	         3	         4	         5	        10
                        -10	 0.08434000	 0.04291000	 0.03438000	 0.02599000	 0.00862000	-0.00002000	-0.00862000	-0.02599000	-0.03438000	-0.04291000	-0.08436000
                        0	 0.09420000	 0.04728000	 0.03790000	 0.02845000	 0.00960000	-0.00029000	-0.00960000	-0.02845000	-0.03790000	-0.04728000	-0.09366000
                        2	 0.09526000	 0.04801000	 0.03836000	 0.02874000	 0.00958000	-0.00001000	-0.00958000	-0.02874000	-0.03836000	-0.04801000	-0.09528000
                        4	 0.09716000	 0.04874000	 0.03900000	 0.02940000	 0.01021000	-0.00001000	-0.01021000	-0.02940000	-0.03900000	-0.04874000	-0.09718000
                        6	 0.09919000	 0.05034000	 0.03984000	 0.02981000	 0.00974000	-0.00001000	-0.00974000	-0.02981000	-0.03984000	-0.05034000	-0.09922000
                        8	 0.10104000	 0.05086000	 0.04058000	 0.03047000	 0.01019000	-0.00001000	-0.01019000	-0.03047000	-0.04058000	-0.05086000	-0.10106000
                        10	 0.10092000	 0.05063000	 0.04051000	 0.02982000	 0.01003000	 0.00004000	-0.01003000	-0.02982000	-0.04051000	-0.05063000	-0.10094000
                        12	 0.10098000	 0.05090000	 0.04059000	 0.03044000	 0.01014000	-0.00001000	-0.01014000	-0.03044000	-0.04059000	-0.05090000	-0.10099000
                        14	 0.10300000	 0.05131000	 0.04094000	 0.03076000	 0.01035000	-0.00001000	-0.01035000	-0.03076000	-0.04094000	-0.05131000	-0.10302000
                        15	 0.10672000	 0.05282000	 0.04230000	 0.03146000	 0.01084000	-0.00001000	-0.01084000	-0.03146000	-0.04230000	-0.05282000	-0.10674000
                        17	 0.11914000	 0.05413000	 0.04252000	 0.03265000	 0.01054000	-0.00001000	-0.01054000	-0.03265000	-0.04252000	-0.05413000	-0.11915000
                        20	 0.13732000	 0.07415000	 0.05982000	 0.04540000	 0.01508000	 0.00000000	-0.01508000	-0.04540000	-0.05982000	-0.07415000	-0.13733000
                        25	 0.13234000	 0.06975000	 0.05608000	 0.04258000	 0.01388000	 0.00000000	-0.01388000	-0.04258000	-0.05608000	-0.06975000	-0.13234000
                        30	 0.12404000	 0.06477000	 0.05207000	 0.03927000	 0.01326000	 0.00000000	-0.01326000	-0.03927000	-0.05207000	-0.06477000	-0.12404000
                        40	 0.09583000	 0.04860000	 0.03909000	 0.02932000	 0.00971000	 0.00000000	-0.00971000	-0.02932000	-0.03909000	-0.04860000	-0.09582000
                        60	 0.02996000	 0.01453000	 0.01158000	 0.00866000	 0.00290000	 0.00002000	-0.00290000	-0.00866000	-0.01158000	-0.01453000	-0.02930000
                    </tableData>
                    <tableData breakPoint="-10">
                        -10	        -5	        -4	        -3	        -1	         0	         1	         3	         4	         5	        10
                        -10	 0.07967000	 0.04029000	 0.03235000	 0.02449000	 0.00818000	 0.00000000	-0.00818000	-0.02449000	-0.03235000	-0.04029000	-0.07966000
                        0	 0.08803000	 0.04401000	 0.03520000	 0.02638000	 0.00883000	 0.00000000	-0.00883000	-0.02638000	-0.03520000	-0.04401000	-0.08801000
                        2	 0.08974000	 0.04488000	 0.03586000	 0.02689000	 0.00898000	-0.00003000	-0.00898000	-0.02689000	-0.03586000	-0.04488000	-0.08972000
                        4	 0.09176000	 0.04590000	 0.03677000	 0.02744000	 0.00907000	 0.00000000	-0.00907000	-0.02744000	-0.03677000	-0.04590000	-0.09174000
                        6	 0.09356000	 0.04674000	 0.03743000	 0.02807000	 0.00935000	 0.00000000	-0.00935000	-0.02807000	-0.03743000	-0.04674000	-0.09354000
                        8	 0.09503000	 0.04742000	 0.03798000	 0.02841000	 0.00959000	 0.00000000	-0.00959000	-0.02841000	-0.03798000	-0.04742000	-0.09500000
                        10	 0.09552000	 0.04782000	 0.03820000	 0.02821000	 0.00945000	 0.00000000	-0.00945000	-0.02821000	-0.03820000	-0.04782000	-0.09550000
                        12	 0.09642000	 0.04838000	 0.03872000	 0.02889000	 0.00962000	 0.00001000	-0.00962000	-0.02889000	-0.03872000	-0.04838000	-0.09634000
                        14	 0.09905000	 0.04901000	 0.03898000	 0.02937000	 0.00987000	 0.00000000	-0.00987000	-0.02937000	-0.03898000	-0.04901000	-0.09884000
                        15	 0.10371000	 0.05079000	 0.04073000	 0.03030000	 0.01051000	-0.00009000	-0.01051000	-0.03030000	-0.04073000	-0.05079000	-0.10362000
                        17	 0.11653000	 0.05330000	 0.04098000	 0.03122000	 0.01015000	 0.00000000	-0.01015000	-0.03122000	-0.04098000	-0.05330000	-0.11652000
                        20	 0.13418000	 0.07248000	 0.05849000	 0.04438000	 0.01474000	 0.00000000	-0.01474000	-0.04438000	-0.05849000	-0.07248000	-0.13417000
                        25	 0.13024000	 0.06841000	 0.05505000	 0.04179000	 0.01364000	-0.00043000	-0.01364000	-0.04179000	-0.05505000	-0.06841000	-0.13023000
                        30	 0.12321000	 0.06449000	 0.05180000	 0.03918000	 0.01327000	 0.00000000	-0.01327000	-0.03918000	-0.05180000	-0.06449000	-0.12336000
                        40	 0.09808000	 0.04977000	 0.03996000	 0.02997000	 0.00992000	 0.00001000	-0.00992000	-0.02997000	-0.03996000	-0.04977000	-0.09806000
                        60	 0.02897000	 0.01386000	 0.01097000	 0.00820000	 0.00271000	 0.00003000	-0.00271000	-0.00820000	-0.01097000	-0.01386000	-0.02893000
                    </tableData>
                    <tableData breakPoint="0">
                        -10	        -5	        -4	        -3	        -1	         0	         1	         3	         4	         5	        10
                        -10	 0.08615000	 0.04328000	 0.03478000	 0.02600000	 0.00868000	 0.00000000	-0.00868000	-0.02600000	-0.03478000	-0.04328000	-0.08616000
                        0	 0.09197000	 0.04608000	 0.03693000	 0.02757000	 0.00949000	 0.00000000	-0.00949000	-0.02757000	-0.03693000	-0.04608000	-0.09197000
                        2	 0.09352000	 0.04687000	 0.03750000	 0.02811000	 0.00941000	 0.00000000	-0.00941000	-0.02811000	-0.03750000	-0.04687000	-0.09354000
                        4	 0.09514000	 0.04767000	 0.03815000	 0.02862000	 0.00950000	 0.00000000	-0.00950000	-0.02862000	-0.03815000	-0.04767000	-0.09514000
                        6	 0.09677000	 0.04846000	 0.03880000	 0.02913000	 0.00973000	 0.00000000	-0.00973000	-0.02913000	-0.03880000	-0.04846000	-0.09678000
                        8	 0.09817000	 0.04910000	 0.03935000	 0.02963000	 0.00998000	 0.00000000	-0.00998000	-0.02963000	-0.03935000	-0.04910000	-0.09879000
                        10	 0.09866000	 0.04936000	 0.03946000	 0.02910000	 0.00977000	 0.00000000	-0.00977000	-0.02910000	-0.03946000	-0.04936000	-0.09866000
                        12	 0.09882000	 0.04969000	 0.03994000	 0.02973000	 0.00989000	 0.00000000	-0.00989000	-0.02973000	-0.03994000	-0.04969000	-0.09886000
                        14	 0.10121000	 0.05029000	 0.04026000	 0.03003000	 0.01010000	 0.00000000	-0.01010000	-0.03003000	-0.04026000	-0.05029000	-0.10126000
                        15	 0.10784000	 0.05207000	 0.04172000	 0.03126000	 0.01084000	 0.00000000	-0.01084000	-0.03126000	-0.04172000	-0.05207000	-0.10777000
                        17	 0.12055000	 0.05673000	 0.04360000	 0.03167000	 0.01026000	 0.00000000	-0.01026000	-0.03167000	-0.04360000	-0.05673000	-0.12062000
                        20	 0.13367000	 0.07167000	 0.05783000	 0.04386000	 0.01451000	 0.00000000	-0.01451000	-0.04386000	-0.05783000	-0.07167000	-0.13376000
                        25	 0.12832000	 0.06722000	 0.05398000	 0.04093000	 0.01345000	 0.00000000	-0.01345000	-0.04093000	-0.05398000	-0.06722000	-0.12847000
                        30	 0.11752000	 0.06154000	 0.04933000	 0.03725000	 0.01266000	 0.00000000	-0.01266000	-0.03725000	-0.04933000	-0.06154000	-0.11769000
                        40	 0.08898000	 0.04451000	 0.03528000	 0.02601000	 0.00862000	 0.00000000	-0.00862000	-0.02601000	-0.03528000	-0.04451000	-0.08910000
                        60	 0.00327000	 0.00241000	 0.00192000	 0.00145000	 0.00051000	 0.00000000	-0.00051000	-0.00145000	-0.00192000	-0.00241000	-0.00337000
                    </tableData>
                    <tableData breakPoint="10">
                        -10	        -5	        -4	        -3	        -1	         0	         1	         3	         4	         5	        10
                        -10	 0.08289000	 0.04162000	 0.03332000	 0.02500000	 0.00834000	 0.00000000	-0.00834000	-0.02500000	-0.03332000	-0.04162000	-0.08285000
                        0	 0.08918000	 0.04476000	 0.03562000	 0.02659000	 0.00898000	 0.00012000	-0.00898000	-0.02659000	-0.03562000	-0.04476000	-0.08918000
                        2	 0.09053000	 0.04525000	 0.03619000	 0.02714000	 0.00905000	 0.00000000	-0.00905000	-0.02714000	-0.03619000	-0.04525000	-0.09053000
                        4	 0.09187000	 0.04593000	 0.03674000	 0.02755000	 0.00919000	 0.00000000	-0.00919000	-0.02755000	-0.03674000	-0.04593000	-0.09187000
                        6	 0.09317000	 0.04658000	 0.03701000	 0.02798000	 0.00934000	 0.00000000	-0.00934000	-0.02798000	-0.03701000	-0.04658000	-0.09313000
                        8	 0.09416000	 0.04699000	 0.03765000	 0.02837000	 0.00949000	 0.00000000	-0.00949000	-0.02837000	-0.03765000	-0.04699000	-0.09416000
                        10	 0.09422000	 0.04823000	 0.03756000	 0.02771000	 0.00930000	 0.00000000	-0.00930000	-0.02771000	-0.03756000	-0.04823000	-0.09421000
                        12	 0.09421000	 0.04716000	 0.03787000	 0.02820000	 0.00938000	 0.00000000	-0.00938000	-0.02820000	-0.03787000	-0.04716000	-0.09421000
                        14	 0.09819000	 0.04774000	 0.03813000	 0.02828000	 0.01014000	 0.00000000	-0.01014000	-0.02828000	-0.03813000	-0.04774000	-0.09818000
                        15	 0.10650000	 0.04938000	 0.03957000	 0.02955000	 0.01015000	 0.00000000	-0.01015000	-0.02955000	-0.03957000	-0.04938000	-0.10649000
                        17	 0.12015000	 0.05641000	 0.04401000	 0.03212000	 0.00947000	 0.00000000	-0.00947000	-0.03212000	-0.04401000	-0.05641000	-0.12013000
                        20	 0.13146000	 0.07001000	 0.05643000	 0.04273000	 0.01366000	 0.00001000	-0.01366000	-0.04273000	-0.05643000	-0.07001000	-0.13145000
                        25	 0.12624000	 0.06624000	 0.05306000	 0.04022000	 0.01314000	 0.00001000	-0.01314000	-0.04022000	-0.05306000	-0.06624000	-0.12622000
                        30	 0.10822000	 0.05553000	 0.04431000	 0.03335000	 0.01124000	 0.00001000	-0.01124000	-0.03335000	-0.04431000	-0.05553000	-0.10820000
                        40	 0.07378000	 0.03645000	 0.03193000	 0.02421000	 0.00826000	 0.00001000	-0.00826000	-0.02421000	-0.03193000	-0.03645000	-0.07377000
                        60	-0.00352000	-0.00008000	 0.00032000	 0.00069000	 0.00118000	-0.00002000	-0.00118000	-0.00069000	-0.00032000	 0.00008000	 0.00350000
                    </tableData>
                    <tableData breakPoint="15">
                        -10	        -5	        -4	        -3	        -1	         0	         1	         3	         4	         5	        10
                        -10	 0.08144000	 0.04091000	 0.03275000	 0.02458000	 0.00820000	 0.00000000	-0.00820000	-0.02458000	-0.03275000	-0.04091000	-0.08141000
                        0	 0.08757000	 0.04381000	 0.03496000	 0.02617000	 0.00876000	 0.00000000	-0.00876000	-0.02617000	-0.03496000	-0.04381000	-0.08754000
                        2	 0.08872000	 0.04434000	 0.03547000	 0.02659000	 0.00886000	 0.00000000	-0.00886000	-0.02659000	-0.03547000	-0.04434000	-0.08872000
                        4	 0.09035000	 0.04505000	 0.03604000	 0.02703000	 0.00901000	 0.00000000	-0.00901000	-0.02703000	-0.03604000	-0.04505000	-0.09034000
                        6	 0.09260000	 0.04561000	 0.03650000	 0.02740000	 0.00914000	 0.00000000	-0.00914000	-0.02740000	-0.03650000	-0.04561000	-0.09260000
                        8	 0.09481000	 0.04596000	 0.03681000	 0.02774000	 0.00919000	 0.00000000	-0.00919000	-0.02774000	-0.03681000	-0.04596000	-0.09407000
                        10	 0.09601000	 0.04593000	 0.03725000	 0.02546000	 0.00908000	 0.00000000	-0.00908000	-0.02546000	-0.03725000	-0.04593000	-0.09592000
                        12	 0.09715000	 0.04727000	 0.03747000	 0.02744000	 0.00912000	 0.00000000	-0.00912000	-0.02744000	-0.03747000	-0.04727000	-0.09714000
                        14	 0.10279000	 0.04978000	 0.03956000	 0.02910000	 0.00932000	 0.00000000	-0.00932000	-0.02910000	-0.03956000	-0.04978000	-0.10223000
                        15	 0.11089000	 0.05215000	 0.04168000	 0.03102000	 0.01056000	 0.00000000	-0.01056000	-0.03102000	-0.04168000	-0.05215000	-0.11088000
                        17	 0.12491000	 0.06233000	 0.04958000	 0.03728000	 0.01084000	 0.00000000	-0.01084000	-0.03728000	-0.04958000	-0.06233000	-0.12490000
                        20	 0.13524000	 0.07368000	 0.05961000	 0.04550000	 0.01529000	-0.00018000	-0.01529000	-0.04550000	-0.05961000	-0.07368000	-0.13562000
                        25	 0.12721000	 0.06540000	 0.05234000	 0.03964000	 0.01294000	-0.00262000	-0.01294000	-0.03964000	-0.05234000	-0.06540000	-0.12720000
                        30	 0.10761000	 0.05511000	 0.04399000	 0.03311000	 0.01116000	 0.00000000	-0.01116000	-0.03311000	-0.04399000	-0.05511000	-0.10760000
                        40	 0.07556000	 0.03976000	 0.03237000	 0.02449000	 0.00855000	 0.00000000	-0.00855000	-0.02449000	-0.03237000	-0.03976000	-0.07556000
                        60	 0.00976000	 0.00756000	 0.00682000	 0.00513000	 0.00170000	-0.00001000	-0.00170000	-0.00513000	-0.00682000	-0.00756000	-0.00980000
                    </tableData>
                </table>
            </product>
        </function>
        <function name="aero/coefficients/CFYGEAR">
            <description>SIDE FORCE INCREMENT DUE TO GEAR</description>
            <product>
                <property>gear/gear-pos-norm</property>
                <table>
                    <independentVar lookup="row">aero/alpha-deg</independentVar>
                    <independentVar lookup="column">aero/beta-deg</independentVar>
                    <tableData>
                        -10	          0	          1	          3	          4	          5	         10
                        -10	-0.00003000	-0.00001000	 0.00001000	 0.00001000	 0.00026000	 0.00001000	 0.00003000
                        4	-0.00003000	-0.00023000	-0.00003000	 0.00001000	 0.00001000	 0.00002000	 0.00003000
                        10	 0.00001000	-0.00001000	 0.00000000	 0.00000000	-0.00131000	 0.00001000	-0.00003000
                        15	-0.00006000	-0.00002000	 0.00000000	 0.00003000	 0.00002000	 0.00002000	-0.00007000
                        25	 0.00009000	-0.00007000	-0.00001000	-0.00003000	-0.00001000	-0.00006000	-0.00008000
                        60	 0.00015000	-0.00003000	-0.00002000	-0.00008000	-0.00011000	-0.00016000	-0.00015000
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                    </tableData>
                </table>
            </product>
        </function>
        <function name="aero/coefficients/CFYP">
            <description>SIDE FORCE DUE TO ROLL RATE</description>
            <product>
                <property>aero/pb</property>
                <table>
                    <independentVar lookup="row">aero/alpha-deg</independentVar>
                    <tableData>
                        -10		-0.33249010
                        0		-0.09118460
                        6		 0.07957180
                        12		 0.20494360
                        17		 0.17917100
                        30		 0.13538410
                        60		 0.56116360
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                    </tableData>
                </table>
            </product>
        </function>
        <function name="aero/coefficients/CFYR">
            <description>SIDE FORCE DUE TO YAW RATE</description>
            <product>
                <property>aero/rb</property>
                <table>
                    <independentVar lookup="row">aero/alpha-deg</independentVar>
                    <tableData>
                        -10		 0.64206440
                        0		 0.72222440
                        6		 0.60523010
                        12		 0.61392910
                        17		 0.81312450
                        30		 0.84210090
                        60		 1.03115170
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                    </tableData>
                </table>
            </product>
        </function>
        <function name="aero/coefficients/CFYTNK">
            <description>SIDE FORCE INCREMENT DUE TO TANK</description>
            <product>
                <property>metrics/stores-tank-factor</property>
                <table>
                    <independentVar lookup="row">aero/alpha-deg</independentVar>
                    <independentVar lookup="column">aero/beta-deg</independentVar>
                    <tableData>
                        -10	          0	          1	          3	          4	          5	         10
                        -10	-0.00001000	-0.00001000	 0.00001000	 0.00002000	 0.00015000	 0.00002000	 0.00001000
                        4	 0.00010000	 0.00000000	-0.00005000	-0.00003000	-0.00004000	-0.00004000	-0.00011000
                        10	 0.00015000	-0.00001000	-0.00002000	-0.00004000	-0.00006000	-0.00008000	-0.00017000
                        15	 0.00046000	-0.00002000	-0.00003000	-0.00013000	-0.00015000	-0.00017000	-0.00058000
                        25	 0.00015000	-0.00007000	-0.00001000	-0.00002000	 0.00000000	-0.00004000	-0.00015000
                        60	 0.00022000	-0.00003000	-0.00003000	-0.00009000	-0.00013000	-0.00019000	-0.00023000
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                    </tableData>
                </table>
            </product>
        </function>
        <function name="aero/coefficients/CYDAD">
            <description>SIDE FORCE DUE TO AILERON DEFLECTION</description>
            <product>
                <property>fcs/aileron-pos-deg</property>
                <table>
                    <independentVar lookup="row">aero/alpha-deg</independentVar>
                    <tableData>
                        -10		 0.00095556
                        0		 0.00124963
                        6		 0.00141111
                        12		 0.00050593
                        17		-0.00091185
                        30		-0.00550074
                        60		-0.00144000
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                    </tableData>
                </table>
            </product>
        </function>
        <function name="aero/coefficients/CYDRD">
            <description>SIDE FORCE DUE TO RUDDER DEFLECTION</description>
            <product>
                <property>fcs/rudder-pos-deg</property>
                <table>
                    <independentVar lookup="row">aero/alpha-deg</independentVar>
                    <independentVar lookup="column">fcs/rudder-pos-deg</independentVar>
                    <tableData>
                        -30	          0	         30
                        -10	-0.00300167	 0.00000000	 0.00300167
                        4	-0.00343767	 0.00000000	 0.00343767
                        10	-0.00353633	 0.00000000	 0.00353633
                        15	-0.00357367	 0.00000000	 0.00357367
                        25	-0.00334533	 0.00000000	 0.00334533
                        60	-0.00180133	 0.00000000	 0.00180133
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                    </tableData>
                </table>
            </product>
        </function>
        <function name="aero/coefficients/CYDTD">
            <description>SIDE FORCE DUE TO DIFFERENTIAL TAIL DEFLECTION - CYDTD</description>
            <product>
                <value>
                    0.975 <!-- DTFLX5 -->
                </value>
                <property>fcs/differential-elevator-pos-deg</property>
                <table>
                    <independentVar lookup="row">aero/alpha-deg</independentVar>
                    <independentVar lookup="column">fcs/elevator-pos-deg</independentVar>
                    <tableData>
                        -10	          0	         10
                        -10	 0.00190000	 0.00190000	 0.00190000
                        4	 0.00107200	 0.00107200	 0.00107200
                        10	 0.00072900	 0.00072900	 0.00072900
                        15	 0.00026700	 0.00026700	 0.00026700
                        25	-0.00121300	-0.00121300	-0.00121300
                        60	 0.00095900	 0.00095900	 0.00095900
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                    </tableData>
                </table>
            </product>
        </function>
        <function name="aero/coefficients/CMN1">
            <description>BASIC YAWING MOMENT</description>
            <product>
                <table>
                    <independentVar lookup="row">aero/alpha-deg</independentVar>
                    <independentVar lookup="column">aero/beta-deg</independentVar>
                    <independentVar lookup="table">fcs/elevator-pos-deg</independentVar>
                    <tableData breakPoint="-30">
                        -10	        -5	        -4	        -3	        -1	         0	         1	         3	         4	         5	        10
                        -10	 0.05251000	 0.02692000	 0.02113000	 0.01588000	 0.00539000	-0.00001000	-0.00539000	-0.01588000	-0.02113000	-0.02692000	-0.05253000
                        4	 0.05566000	 0.02807000	 0.02246000	 0.01685000	 0.00560000	-0.00001000	-0.00560000	-0.01685000	-0.02246000	-0.02807000	-0.05568000
                        10	 0.06093000	 0.03086000	 0.02424000	 0.01811000	 0.00572000	-0.00001000	-0.00572000	-0.01811000	-0.02424000	-0.03086000	-0.06095000
                        15	 0.07013000	 0.03540000	 0.02831000	 0.02103000	 0.00704000	-0.00002000	-0.00704000	-0.02103000	-0.02831000	-0.03540000	-0.07015000
                        25	 0.08218000	 0.04195000	 0.03373000	 0.02557000	 0.00835000	-0.00001000	-0.00835000	-0.02557000	-0.03373000	-0.04195000	-0.08220000
                        60	 0.06046000	 0.02953000	 0.02358000	 0.01767000	 0.00590000	 0.00000000	-0.00590000	-0.01767000	-0.02358000	-0.02953000	-0.06051000
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                    </tableData>
                    <tableData breakPoint="-20">
                        -10	        -5	        -4	        -3	        -1	         0	         1	         3	         4	         5	        10
                        -10	 0.05284000	 0.02658000	 0.02125000	 0.01604000	 0.00505000	-0.00001000	-0.00505000	-0.01604000	-0.02125000	-0.02658000	-0.05287000
                        4	 0.06192000	 0.03116000	 0.02509000	 0.01883000	 0.00627000	-0.00002000	-0.00627000	-0.01883000	-0.02509000	-0.03116000	-0.06196000
                        10	 0.06706000	 0.03403000	 0.02718000	 0.01982000	 0.00653000	-0.00002000	-0.00653000	-0.01982000	-0.02718000	-0.03403000	-0.06666000
                        15	 0.07131000	 0.03614000	 0.02896000	 0.02141000	 0.00743000	-0.00002000	-0.00743000	-0.02141000	-0.02896000	-0.03614000	-0.07135000
                        25	 0.08296000	 0.04240000	 0.03400000	 0.02575000	 0.00840000	-0.00001000	-0.00840000	-0.02575000	-0.03400000	-0.04240000	-0.08303000
                        60	 0.06427000	 0.03125000	 0.02498000	 0.01870000	 0.00625000	-0.00001000	-0.00625000	-0.01870000	-0.02498000	-0.03125000	-0.06426000
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                    </tableData>
                    <tableData breakPoint="-15">
                        -10	        -5	        -4	        -3	        -1	         0	         1	         3	         4	         5	        10
                        -10	 0.05457000	 0.02773000	 0.02221000	 0.01678000	 0.00557000	-0.00001000	-0.00557000	-0.01678000	-0.02221000	-0.02773000	-0.05457000
                        4	 0.05719000	 0.02881000	 0.02306000	 0.01741000	 0.00613000	-0.00001000	-0.00613000	-0.01741000	-0.02306000	-0.02881000	-0.05720000
                        10	 0.06165000	 0.03112000	 0.02492000	 0.01835000	 0.00616000	 0.00003000	-0.00616000	-0.01835000	-0.02492000	-0.03112000	-0.06167000
                        15	 0.06751000	 0.03412000	 0.02738000	 0.02036000	 0.00702000	-0.00001000	-0.00702000	-0.02036000	-0.02738000	-0.03412000	-0.06752000
                        25	 0.08055000	 0.04125000	 0.03309000	 0.02503000	 0.00811000	 0.00000000	-0.00811000	-0.02503000	-0.03309000	-0.04125000	-0.08055000
                        60	 0.07129000	 0.03595000	 0.02878000	 0.02160000	 0.00723000	 0.00001000	-0.00723000	-0.02160000	-0.02878000	-0.03595000	-0.07125000
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                    </tableData>
                    <tableData breakPoint="-10">
                        -10	        -5	        -4	        -3	        -1	         0	         1	         3	         4	         5	        10
                        -10	 0.05024000	 0.02543000	 0.02041000	 0.01545000	 0.00516000	 0.00000000	-0.00516000	-0.01545000	-0.02041000	-0.02543000	-0.05024000
                        4	 0.05342000	 0.02692000	 0.02152000	 0.01606000	 0.00527000	 0.00000000	-0.00527000	-0.01606000	-0.02152000	-0.02692000	-0.05341000
                        10	 0.05806000	 0.02929000	 0.02342000	 0.01731000	 0.00579000	 0.00000000	-0.00579000	-0.01731000	-0.02342000	-0.02929000	-0.05805000
                        15	 0.06515000	 0.03288000	 0.02642000	 0.01964000	 0.00679000	-0.00006000	-0.00679000	-0.01964000	-0.02642000	-0.03288000	-0.06508000
                        25	 0.08020000	 0.04095000	 0.03289000	 0.02487000	 0.00807000	-0.00030000	-0.00807000	-0.02487000	-0.03289000	-0.04095000	-0.08020000
                        60	 0.07405000	 0.03706000	 0.02960000	 0.02220000	 0.00739000	 0.00002000	-0.00739000	-0.02220000	-0.02960000	-0.03706000	-0.07402000
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                    </tableData>
                    <tableData breakPoint="0">
                        -10	        -5	        -4	        -3	        -1	         0	         1	         3	         4	         5	        10
                        -10	 0.04945000	 0.02484000	 0.01997000	 0.01492000	 0.00498000	-0.00001000	-0.00498000	-0.01492000	-0.01997000	-0.02484000	-0.04946000
                        4	 0.05518000	 0.02774000	 0.02221000	 0.01667000	 0.00554000	 0.00000000	-0.00554000	-0.01667000	-0.02221000	-0.02774000	-0.05518000
                        10	 0.06074000	 0.03056000	 0.02444000	 0.01805000	 0.00605000	-0.00001000	-0.00605000	-0.01805000	-0.02444000	-0.03056000	-0.06074000
                        15	 0.06808000	 0.03428000	 0.02751000	 0.02056000	 0.00710000	-0.00001000	-0.00710000	-0.02056000	-0.02751000	-0.03428000	-0.06805000
                        25	 0.08293000	 0.04228000	 0.03389000	 0.02560000	 0.00837000	-0.00005000	-0.00837000	-0.02560000	-0.03389000	-0.04228000	-0.08301000
                        60	 0.07611000	 0.03890000	 0.03115000	 0.02339000	 0.00785000	-0.00006000	-0.00785000	-0.02339000	-0.03115000	-0.03890000	-0.07625000
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                    </tableData>
                    <tableData breakPoint="10">
                        -10	        -5	        -4	        -3	        -1	         0	         1	         3	         4	         5	        10
                        -10	 0.04857000	 0.02436000	 0.01950000	 0.01462000	 0.00488000	 0.00000000	-0.00488000	-0.01462000	-0.01950000	-0.02436000	-0.04855000
                        4	 0.05420000	 0.02719000	 0.02176000	 0.01633000	 0.00544000	 0.00000000	-0.00544000	-0.01633000	-0.02176000	-0.02719000	-0.05420000
                        10	 0.06006000	 0.03094000	 0.02411000	 0.01783000	 0.00597000	 0.00000000	-0.00597000	-0.01783000	-0.02411000	-0.03094000	-0.06005000
                        15	 0.06953000	 0.03428000	 0.02750000	 0.02052000	 0.00703000	 0.00000000	-0.00703000	-0.02052000	-0.02750000	-0.03428000	-0.06953000
                        25	 0.08907000	 0.04576000	 0.03662000	 0.02763000	 0.00901000	 0.00001000	-0.00901000	-0.02763000	-0.03662000	-0.04576000	-0.08905000
                        60	 0.07986000	 0.04097000	 0.03288000	 0.02474000	 0.00839000	 0.00001000	-0.00839000	-0.02474000	-0.03288000	-0.04097000	-0.07985000
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                    </tableData>
                    <tableData breakPoint="15">
                        -10	        -5	        -4	        -3	        -1	         0	         1	         3	         4	         5	        10
                        -10	 0.04817000	 0.02417000	 0.01935000	 0.01451000	 0.00484000	 0.00000000	-0.00484000	-0.01451000	-0.01935000	-0.02417000	-0.04816000
                        4	 0.05443000	 0.02726000	 0.02181000	 0.01637000	 0.00546000	 0.00000000	-0.00546000	-0.01637000	-0.02181000	-0.02726000	-0.05443000
                        10	 0.06246000	 0.03021000	 0.02449000	 0.01691000	 0.00598000	 0.00000000	-0.00598000	-0.01691000	-0.02449000	-0.03021000	-0.06244000
                        15	 0.07337000	 0.03685000	 0.02953000	 0.02199000	 0.00747000	 0.00000000	-0.00747000	-0.02199000	-0.02953000	-0.03685000	-0.07336000
                        25	 0.09176000	 0.04631000	 0.03705000	 0.02794000	 0.00911000	-0.00136000	-0.00911000	-0.02794000	-0.03705000	-0.04631000	-0.09175000
                        60	 0.08392000	 0.04306000	 0.03460000	 0.02598000	 0.00866000	 0.00000000	-0.00866000	-0.02598000	-0.03460000	-0.04306000	-0.08393000
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                    </tableData>
                </table>
            </product>
        </function>
        <function name="aero/coefficients/CMNDAD">
            <description>YAWING MOMENT DUE TO AILERON DEFLECTION</description>
            <product>
                <property>fcs/aileron-pos-deg</property>
                <table>
                    <independentVar lookup="row">aero/alpha-deg</independentVar>
                    <tableData>
                        -10		 0.00052963
                        0		 0.00070593
                        6		 0.00074963
                        12		 0.00031407
                        17		-0.00036370
                        30		-0.00289259
                        60		-0.00345630
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                    </tableData>
                </table>
            </product>
        </function>
        <function name="aero/coefficients/CMNDRDr">
            <description>YAWING MOMENT DUE TO RUDDER DEFLECTION</description>
            <product>
                <property>fcs/rudder-pos-deg</property>
                <value>
                    0.89 <!-- DRFLX3 -->
                </value>
                <value>
                    1 <!-- EPA43 -->
                </value>
                <table>
                    <independentVar lookup="row">aero/alpha-deg</independentVar>
                    <independentVar lookup="column">aero/beta-deg</independentVar>
                    <tableData>
                        -10	          0	          1	          3	          4	          5	         10
                        -10	-0.00221333	-0.00172533	-0.00169300	-0.00163467	-0.00161467	-0.00159500	-0.00156200
                        4	-0.00258567	-0.00196400	-0.00192633	-0.00186633	-0.00184267	-0.00182300	-0.00178567
                        10	-0.00263100	-0.00201900	-0.00198367	-0.00188567	-0.00189367	-0.00187933	-0.00184867
                        15	-0.00262733	-0.00204833	-0.00201433	-0.00194333	-0.00193567	-0.00192033	-0.00186900
                        25	-0.00241167	-0.00190267	-0.00187133	-0.00181700	-0.00178233	-0.00178600	-0.00176233
                        60	-0.00073267	-0.00097133	-0.00098100	-0.00100433	-0.00101767	-0.00103233	-0.00108400
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                    </tableData>
                </table>
            </product>
        </function>
        <function name="aero/coefficients/CMNDTD">
            <description>YAWING MOMENT DUE TO DIFFERENTIAL TAIL DEFLECTION</description>
            <product>
                <value>
                    0.975 <!-- DTFLX3 -->
                </value>
                <property>fcs/differential-elevator-pos-deg</property>
                <table>
                    <independentVar lookup="row">aero/alpha-deg</independentVar>
                    <independentVar lookup="column">fcs/elevator-pos-deg</independentVar>
                    <tableData>
                        -10	          0	         10
                        -10	 0.00083700	 0.00083700	 0.00083700
                        4	 0.00071900	 0.00071900	 0.00071900
                        10	 0.00067300	 0.00067300	 0.00067300
                        15	 0.00052200	 0.00052200	 0.00052200
                        25	-0.00010600	-0.00010600	-0.00010600
                        60	-0.00038300	-0.00038300	-0.00038300
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                    </tableData>
                </table>
            </product>
        </function>
        <function name="aero/coefficients/CMNGEAR">
            <description>YAWING MOMENT INCREMENT DUE TO GEAR</description>
            <product>
                <property>gear/gear-pos-norm</property>
                <table>
                    <independentVar lookup="row">aero/alpha-deg</independentVar>
                    <independentVar lookup="column">aero/beta-deg</independentVar>
                    <tableData>
                        -10	          0	          1	          3	          4	          5	         10
                        -10	-0.00049000	 0.00000000	 0.00005000	 0.00015000	 0.00034000	 0.00025000	 0.00048000
                        4	-0.00047000	-0.00014000	 0.00003000	 0.00015000	 0.00019000	 0.00024000	 0.00047000
                        10	-0.00044000	 0.00000000	 0.00004000	 0.00014000	-0.00074000	 0.00023000	 0.00043000
                        15	-0.00045000	 0.00000000	 0.00004000	 0.00015000	 0.00019000	 0.00023000	 0.00040000
                        25	-0.00038000	 0.00000000	 0.00004000	 0.00011000	 0.00016000	 0.00018000	 0.00041000
                        60	-0.00032000	 0.00000000	 0.00003000	 0.00007000	 0.00009000	 0.00010000	 0.00032000
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                    </tableData>
                </table>
            </product>
        </function>
        <function name="aero/coefficients/CMNP">
            <description>YAWING MOMENT DUE TO ROLL RATE</description>
            <product>
                <property>aero/pb</property>
                <table>
                    <independentVar lookup="row">aero/alpha-deg</independentVar>
                    <tableData>
                        -10		 0.74297100
                        0		-0.06025050
                        6		 0.46414230
                        12		-0.16873080
                        17		-0.75469150
                        30		 0.40488250
                        60		-1.14769910
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                    </tableData>
                </table>
            </product>
        </function>
        <function name="aero/coefficients/CMNR">
            <description>YAW DAMPING DERIVATIVE</description>
            <product>
                <property>aero/rb</property>
                <table>
                    <independentVar lookup="row">aero/alpha-deg</independentVar>
                    <tableData>
                        -10		 0.73142590
                        0		-0.05270590
                        6		 0.46454690
                        12		-0.18863260
                        17		-0.59336040
                        30		 0.46516090
                        60		-1.24144210
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                    </tableData>
                </table>
            </product>
        </function>
        <function name="aero/coefficients/CMNTNK">
            <description>YAWING MOMENT INCREMENT DUE TO TANK</description>
            <product>
                <property>metrics/stores-tank-factor</property>
                <table>
                    <independentVar lookup="row">aero/alpha-deg</independentVar>
                    <independentVar lookup="column">aero/beta-deg</independentVar>
                    <tableData>
                        -10	          0	          1	          3	          4	          5	         10
                        -10	-0.00302000	 0.00000000	 0.00031000	 0.00093000	 0.00132000	 0.00154000	 0.00302000
                        4	-0.00293000	 0.00000000	 0.00029000	 0.00090000	 0.00119000	 0.00149000	 0.00293000
                        10	-0.00284000	 0.00000000	 0.00029000	 0.00088000	 0.00115000	 0.00144000	 0.00283000
                        15	-0.00269000	 0.00000000	 0.00027000	 0.00081000	 0.00109000	 0.00136000	 0.00263000
                        25	-0.00251000	 0.00000000	 0.00027000	 0.00078000	 0.00105000	 0.00129000	 0.00250000
                        60	-0.00178000	 0.00000000	 0.00018000	 0.00052000	 0.00068000	 0.00084000	 0.00178000
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                    </tableData>
                </table>
            </product>
        </function>
        <function name="aero/coefficients/CLIFT">
            <sum>
                <property>aero/coefficients/CFZB</property>
                <property>aero/coefficients/CFZDF</property>
                <property>aero/coefficients/CFZGEAR</property>
                <property>aero/coefficients/CFZTNK</property>
            </sum>
        </function>
        <axis name="LIFT">
            <function name="aero/force/LIFT">
                <product>
                    <property>aero/qbar-psf</property>
                    <property>metrics/Sw-sqft</property>
                    <property>aero/coefficients/CLIFT</property>
                </product>
            </function>
        </axis>
        <function name="aero/coefficients/CDRAG">
            <sum>
                <property>aero/coefficients/CFXB</property>
                <property>aero/coefficients/CFXDF</property>
                <property>aero/coefficients/CFXGEAR</property>
                <property>aero/coefficients/CFXTNK</property>
            </sum>
        </function>
        <axis name="DRAG">
            <function name="aero/force/DRAG">
                <product>
                    <property>aero/qbar-psf</property>
                    <property>metrics/Sw-sqft</property>
                    <property>aero/coefficients/CDRAG</property>
                </product>
            </function>
        </axis>
        <function name="aero/coefficients/CSIDE">
            <sum>
                <property>aero/coefficients/CFYB</property>
                <property>aero/coefficients/CFYP</property>
                <property>aero/coefficients/CFYR</property>
                <property>aero/coefficients/CYDAD</property>
                <property>aero/coefficients/CYDRD</property>
                <property>aero/coefficients/CYDTD</property>
                <property>aero/coefficients/CFYGEAR</property>
                <property>aero/coefficients/CFYTNK</property>
            </sum>
        </function>
        <axis name="SIDE">
            <function name="aero/force/SIDE">
                <product>
                    <property>aero/qbar-psf</property>
                    <property>metrics/Sw-sqft</property>
                    <property>aero/coefficients/CSIDE</property>
                </product>
            </function>
        </axis>
        <function name="aero/coefficients/CROLL">
            <sum>
                <property>aero/coefficients/CML1</property>
                <property>aero/coefficients/CMLP</property>
                <property>aero/coefficients/CMLR</property>
                <property>aero/coefficients/CMLDAD</property>
                <property>aero/coefficients/CMLDRD</property>
                <property>aero/coefficients/CMLDTD</property>
                <property>aero/coefficients/CMLGEAR</property>
                <property>aero/coefficients/CMLTNK</property>
            </sum>
        </function>
        <axis name="ROLL">
            <function name="aero/force/ROLL">
                <product>
                    <property>aero/qbar-psf</property>
                    <property>metrics/Sw-sqft</property>
                    <property>metrics/bw-ft</property>
                    <property>aero/coefficients/CROLL</property>
                </product>
            </function>
        </axis>
        <function name="aero/coefficients/CPITCH">
            <sum>
                <property>aero/coefficients/CMM1</property>
                <property>aero/coefficients/CMMDF</property>
                <property>aero/coefficients/CMMQ</property>
                <property>aero/coefficients/CMMGEAR</property>
                <property>aero/coefficients/CMMTNK</property>
            </sum>
        </function>
        <axis name="PITCH">
            <function name="aero/force/PITCH">
                <product>
                    <property>aero/qbar-psf</property>
                    <property>metrics/Sw-sqft</property>
                    <property>metrics/cbarw-ft</property>
                    <property>aero/coefficients/CPITCH</property>
                </product>
            </function>
        </axis>
        <function name="aero/coefficients/CYAW">
            <sum>
                <property>aero/coefficients/CMN1</property>
                <property>aero/coefficients/CMNGEAR</property>
                <property>aero/coefficients/CMNTNK</property>
                <property>aero/coefficients/CMNDRDr</property>
                <property>aero/coefficients/CMNP</property>
                <property>aero/coefficients/CMNR</property>
                <property>aero/coefficients/CMNDTD</property>
                <property>aero/coefficients/CMNDAD</property>
            </sum>
        </function>
        <axis name="YAW">
            <function name="aero/force/YAW">
                <product>
                    <property>aero/qbar-psf</property>
                    <property>metrics/Sw-sqft</property>
                    <property>metrics/bw-ft</property>
                    <property>aero/coefficients/CYAW</property>
                </product>
            </function>
        </axis>
    </aerodynamics>
    <output name="c:/users/richard/dev/flightgear/aircraft/f-14b/JSBOut.csv" type="CSV" rate="10">
        <!--<simulation> ON </simulation>
        <atmosphere> ON </atmosphere>
        <massprops> ON </massprops>-->
        <aerosurfaces> ON </aerosurfaces>
        <rates> ON </rates>
        <velocities> ON </velocities>
        <!--<forces> ON </forces>-->
        <!--<position> ON </position>-->
        <coefficients> ON </coefficients>
        <!--<ground_reactions> ON </ground_reactions>-->
        <fcs> ON </fcs>
        <!--<propulsion> ON </propulsion>-->
    </output>
</fdm_config>
<!--
        <function name="aero/coefficients/CMMQ">
            <description>PITCH DAMPING DERIVATIVE - CMQ</description>
            <product>
                <property>aero/qb</property>
                <table>
                    <independentVar lookup="row">aero/alpha-deg</independentVar>
                    <tableData>
                        -19		 1.28046091
                        -18		 0.06779284
                        -9		-5.14643535
                        0		-4.33509000
                        9		-4.14194274
                        18		-8.60337414
                        35		-14.05390898
                        60		-4.89707200
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                    </tableData>
                </table>
            </product>
        </function>

        <function name="aero/coefficients/CMLP">
            <description>ROLL DAMPING DERIVATIVE - CLP</description>
            <product>
                <property>aero/pb</property>
                <table>
                    <independentVar lookup="row">aero/alpha-deg</independentVar>
                    <tableData>
                        -20		-0.08541388
                        -19		-0.09921293
                        -10		-0.16536625
                        -1		-0.24899556
                        8		-0.23373326
                        17		-0.16351086
                        30		-0.08092988
                        60		-0.32802377
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                    </tableData>
                </table>
            </product>
        </function>
        <function name="aero/coefficients/CMLR">
            <description>ROLLING MOMENT DUE TO YAW RATE - CLR</description>
            <product>
                <property>aero/rb</property>
                <table>
                    <independentVar lookup="row">aero/alpha-deg</independentVar>
                    <tableData>
                        -20		-0.05760685
                        -19		-0.08859624
                        -10		-0.02268499
                        -1		 0.02551353
                        8		 0.13849720
                        17		 0.14832098
                        30		 0.00127235
                        60		 0.02905128
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                    </tableData>
                </table>
            </product>
        </function>
        <function name="aero/coefficients/CFYP">
            <description>SIDE FORCE DUE TO ROLL RATE (CYP)</description>
            <product>
                <property>aero/pb</property>
                <table>
                    <independentVar lookup="row">aero/alpha-deg</independentVar>
                    <tableData>
                        -20		 0.01205991
                        -19		-0.12656627
                        -10		-0.05712140
                        -1		-0.03039054
                        8		 0.11405321
                        17		-0.01265038
                        30		 0.00235423
                        60		 0.00000000
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                    </tableData>
                </table>
            </product>
        </function>
        <function name="aero/coefficients/CFYR">
            <description>SIDE FORCE DUE TO YAW RATE (CYR)</description>
            <product>
                <property>aero/rb</property>
                <table>
                    <independentVar lookup="row">aero/alpha-deg</independentVar>
                    <tableData>
                        -20		 0.35000000
                        -19		 0.35000000
                        -10		 0.35000000
                        -1		 0.37623865
                        8		 0.21100454
                        17		 0.05283658
                        30		 0.01370411
                        60		 0.00000000
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                    </tableData>
                </table>
            </product>
        </function>

        <function name="aero/coefficients/CMNP">
            <description>YAWING MOMENT DUE TO ROLL RATE - CNP</description>
            <product>
                <property>aero/pb</property>
                <table>
                    <independentVar lookup="row">aero/alpha-deg</independentVar>
                    <tableData>
                        -20		 0.06927476
                        -19		 0.11136042
                        -10		 0.00976387
                        -1		 0.01412738
                        8		-0.03618489
                        17		-0.01251303
                        30		-0.09320734
                        60		-0.06638497
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                    </tableData>
                </table>
            </product>
        </function>
        <function name="aero/coefficients/CMNR">
            <description>YAW DAMPING DERIVATIVE - CMNR</description>
            <product>
                <property>aero/rb</property>
                <table>
                    <independentVar lookup="row">aero/alpha-deg</independentVar>
                    <tableData>
                        -20		-0.28050000
                        -19		-0.28050000
                        -10		-0.28050000
                        -1		-0.25592342
                        8		-0.24649284
                        17		-0.45795136
                        30		-0.09673448
                        60		-0.11000000
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                    </tableData>
                </table>
            </product>
        </function>

-->
