<?xml version="1.0"?>
<?xml-stylesheet type="text/xsl" href="https://raw.githubusercontent.com/JSBSim-Team/jsbsim/master/JSBSimScript.xsl"?>
<fdm_config name="F-15 (all variants)" version="2.0" release="PRODUCTION"
   xmlns:xsi="http://www.w3.org/2001/XMLSchema-instance"
   xsi:noNamespaceSchemaLocation="https://raw.githubusercontent.com/JSBSim-Team/jsbsim/master/JSBSim.xsd">

    <fileheader>
        <author>Richard Harrison</author>
        <filecreationdate>2015-08-29</filecreationdate>
        <version>1.0</version>
        <description>F-15 - basic aerodynamics are the same, except for the two place canopy which is accounted for</description>
        <note>Aircraft origin for measurements is the nose</note>
        <note>
            F-15C in the critical aft c.g. configuration has a weight of 33,467
            pounds and a c.g. location at 563.1 inches (6:12). To
            convert c.g. location in inches to percent mean aerodynamic
            chord, the following equation is used for all A through D
            models of the F-15: (measurements in inches).
            % MAC = (xcg - 408.1 * 100) / 191.33

            As of 2024 I've now changed the axes system so that 0,0,0 is the CG (25.65% MAC)
            after some thinking and testing it seems to be a nicer way to do it.

            Of course changing the origin has no effect on anything else because it is all relative
            to the origin.
        </note>
        <limitation></limitation>
        <reference
            refID="ZDAT/AED/2014/12-2"
            author="Richard Harrison, rjh@zaretto.com"
            title="F-15 Aerodynamic data from  (AFIT/GAE/ENY/90D-16); CG 25.65%"
            date="December, 2014"
            URL="http://www.zaretto.com/sites/zaretto.com/files/F-15-data/rjh-zaretto-f-15-aerodynamic-data.pdf"
        />
        <reference
            refID="AFIT/GAE/ENY/90D-16"
            author="Robert J. McDonnell, B.S., Captain, USAF"
            title="INVESTIGATION OF THE HIGH ANGLE OF ATTACK DYNAMICS OF THE F-15B USING BIFURCATION ANALYSIS"
            date="December 1990"
            URL="http://www.zaretto.com/sites/zaretto.com/files/F-15-data/ADA230462.pdf"
        />
        <reference
            refID="AFIT/GA/ENY/91D-1"
            author="Richard L. Bennet, Major, USAF"
            title="ANALYSIS OF THE EFFECTS OF REMOVING NOSE BALLAST FROM THE F-15 EAGLE"
            date="December 1991"
            URL="http://www.zaretto.com/sites/zaretto.com/files/F-15-data/ADA244044.pdf"
        />
        <reference
            refID="NASA CR-152391-VOL-1 Figure 3-7 p54"
            author="DR. J. R. LUMMUS, G. T. JOYCE, O C. D. O MALLEY"
            title="ANALYSIS OF WIND TUNNEL TEST RESULTS FOR A 9.39-PER CENT SCALE MODEL OF A VSTOL FIGHTER/ATTACK AIRCRAFT : VOLUME I - STUDY OVERVIEW"
            date="October 1980"
            URL="http://www.zaretto.com/sites/zaretto.com/files/F-15-data/19810014497.pdf"
        />
        <reference
            refID="NASA TP-3627"
            author="Frank W. Burcham, Jr., Trindel A. Maine, C. Gordon Fullerton, and Lannie Dean Webb"
            title="Development and Flight Evaluation of an Emergency Digital Flight Control System Using Only Engine Thrust on an F-15 Airplane"
            date="September 1996"
            URL="http://www.zaretto.com/sites/zaretto.com/files/F-15-data/88414main_H-2048.pdf"
        />
        <reference
            refID="NASA-TM-72861"
            author="Thomas R. Sisk and Neil W. Matheny"
            title="Precision Controllability of the F-15 Airplane"
            date="May 1979"
            URL="http://www.zaretto.com/sites/zaretto.com/files/F-15-data/88414main_H-2048.pdf"
        />
        <reference
            refID="95-fuel-dumping-system"
            author="Sabc"
            title="Fuel Dumping System"
            date="08 September 2010"
            URL="http://www.f-15e.info/joomla/technology/fuel-system/95-fuel-dumping-system"
        />
        <reference
                refID="NASA TM-104278"
                author="Compiled by Sheryll Goecke Powers"
                title="An Electronic workshop on the Performance Seeking Control and Propulsion Controlled Aircraft Results of the F-15 Highly Integrated Digital Electronic Control Flight Research Program. Proceedings of the Electronic workshop"
                date="1995"
                URL="https://ntrs.nasa.gov/search.jsp?R=19950026588"
        />
        <reference
                refID="NASA TM-84643 19830013883"
                author="M. LEROY SPEARMAN"
                title="Effects of wing and tail location on the aerodynamic characteristics of an airplane for mach numbers from 0.25 to 4.63"
                date="1983"
                URL="https://ntrs.nasa.gov/archive/nasa/casi.ntrs.nasa.gov/19830013883.pdf"
        />

    </fileheader>
    <metrics>
        <wingarea unit="FT2">608</wingarea>
        <wing_incidence unit="DEG">2</wing_incidence>
        <wingspan unit="FT">42.8</wingspan>
        <chord unit="IN">191.3</chord> <!-- 485.90cm -->
        <location unit="IN" name="EYEPOINT">
            <x>-237.717</x>
            <y>0</y>
            <z>-3.94</z>
        </location>
        <location unit="IN" name="VRP">
            <x>-48.717</x>
            <y>0</y>
            <z>0</z>
        </location>
        <location unit="IN" name="AERORP">
            <x>0</x> <!-- 0.2565 %MAC, 49.06in, 124.633cm, -->
            <y>0</y>
            <z>0</z>
        </location>
    </metrics>

    <mass_balance>
        <location unit="IN" name="CG">
            <x>-1.71699999999998</x>
            <y>0</y>
            <z>0</z>
        </location>
        <ixx unit="SLUG*FT2">28700</ixx>
        <iyy unit="SLUG*FT2">165100</iyy>
        <izz unit="SLUG*FT2">187900</izz>
        <ixz unit="SLUG*FT2">-520</ixz>
        <!-- F-15A 27,700lbs
             F-15B 28,100lbs
             F-15C 28,600lbs
             F-15D 29,100lbs
             F-15C (MSIP) 29,500lbs
             F-15D (MSIP) 30,000
        -->
        <emptywt unit="LBS">29500</emptywt>

        <pointmass name="Station2-1">
            <weight unit="LBS">0</weight>
            <location unit="M" name="Pointmass Station2-1">
                <x>-0.4488118</x>
                <y>-3.721</y>
                <z>0.388</z>
            </location>
        </pointmass>

        <pointmass name="Station2-2">
            <weight unit="LBS">0</weight>
            <location unit="M" name="Pointmass Station2-2">
                <x>0.575188200000001</x>
                <y>-3.3034</y>
                <z>-0.091</z>
            </location>
        </pointmass>

        <pointmass name="Station2-3">
            <weight unit="LBS">0</weight>
            <location unit="M" name="Pointmass Station2-3">
                <x>-0.0918118000000003</x>
                <y>-2.891</y>
                <z>0.461</z>
            </location>
        </pointmass>

        <pointmass name="Station3">
            <weight unit="LBS">0</weight>
            <location unit="M" name="Pointmass Station3">
                <x>-1.6918118</x>
                <y>-1.611</y>
                <z>0.567</z>
            </location>
        </pointmass>

        <pointmass name="Station4">
            <weight unit="LBS">0</weight>
            <location unit="M" name="Pointmass Station4">
                <x>2.2281882</x>
                <y>-1.611</y>
                <z>0.567</z>
            </location>
        </pointmass>

        <pointmass name="Station5">
            <weight unit="LBS">0</weight>
            <location unit="M" name="Pointmass Station5">
                <x>-0.0918118000000003</x>
                <y>0</y>
                <z>-1.231</z>
            </location>
        </pointmass>

        <pointmass name="Station6">
            <weight unit="LBS">0</weight>
            <location unit="M" name="Pointmass Station6">
                <x>2.2281882</x>
                <y>1.611</y>
                <z>0.567</z>
            </location>
        </pointmass>

        <pointmass name="Station7">
            <weight unit="LBS">0</weight>
            <location unit="M" name="Pointmass Station7">
                <x>-1.6918118</x>
                <y>1.611</y>
                <z>0.567</z>
            </location>
        </pointmass>

        <pointmass name="Station8">
            <weight unit="LBS">0</weight>
            <location unit="M" name="Pointmass Station8-1 (2-3)">
                <x>-0.0918118000000003</x>
                <y>2.891</y>
                <z>0.461</z>
            </location>
        </pointmass>

        <pointmass name="Station9">
            <weight unit="LBS">0</weight>
            <location unit="M" name="Pointmass Station8-2 (2-2)">
                <x>0.575188200000001</x>
                <y>3.3034</y>
                <z>-0.091</z>
            </location>
        </pointmass>

        <pointmass name="Station10">
            <weight unit="LBS">0</weight>
            <location unit="M" name="Pointmass Station8-3 (2-1)">
                <x>-0.4488118</x>
                <y>3.721</y>
                <z>0.388</z>
            </location>
        </pointmass>

        <pointmass name="CFT11">
            <weight unit="LBS">0</weight>
            <location unit="M" name="CFT left">
                <x>0.354188200000001</x>
                <y>-1.76</y>
                <z>0.021</z>
              </location>
          </pointmass>

        <pointmass name="CFT12">
            <weight unit="LBS">0</weight>
            <location unit="M" name="CFT right">
                <x>0.354188200000001</x>
                <y>1.76</y>
                <z>0.021</z>
              </location>
          </pointmass>

        <pointmass name="PylonL">
            <weight unit="LBS">0</weight>
            <location unit="M" name="PylonL">
                <x>0.2081882</x>
                <y>-3.3034</y>
                <z>1.4077</z>
            </location>
        </pointmass>

        <pointmass name="PylonR">
            <weight unit="LBS">0</weight>
            <location unit="M" name="PylonR">
                <x>0.2081882</x>
                <y>3.3034</y>
                <z>1.4077</z>
            </location>
        </pointmass>

        <pointmass name="F-15D-extra">
            <weight unit="LBS">0</weight>
            <location unit="M" name="F-15D">
                <x>-4.3998118</x>
                <y>0</y>
                <z>-0.5</z>
            </location>
        </pointmass>

    </mass_balance>

    <!--  Tire on concrete 1.00, ref: http://ffden-2.phys.uaf.edu/211_fall2002.web.dir/ben_townsend/staticandkineticfriction.htm
          also refs: http://www.altraliterature.com/pdfs/P-1648-pages41-44.pdf http://seniorphysics.com/physics/static_friction_time_dependence.pdf
       -->
    <ground_reactions>
        <contact type="BOGEY" name="NOSE_LG">
            <location unit="IN">
                <x>-237.717</x>
                <y>0</y>
                <z>-77.6496063</z>
            </location>
            <static_friction>1.0</static_friction>
            <dynamic_friction>0.5</dynamic_friction>
            <rolling_friction>0.02</rolling_friction>
            <spring_coeff unit="LBS/FT">25200</spring_coeff>
            <damping_coeff unit="LBS/FT/SEC">1400</damping_coeff>
            <max_steer unit="DEG">35</max_steer>
            <brake_group>NOSE</brake_group>
            <retractable>1</retractable>
        </contact>
        <contact type="BOGEY" name="LEFT_MLG">
            <location unit="IN">
                <x>16.283</x>
                <y>-98</y>
                <z>-84.3385827</z>
            </location>
            <static_friction>1.0</static_friction>
            <dynamic_friction>0.5</dynamic_friction>
            <rolling_friction>0.02</rolling_friction>
            <spring_coeff unit="LBS/FT">25200</spring_coeff>
            <damping_coeff unit="LBS/FT/SEC">1400</damping_coeff>
            <max_steer unit="DEG">0</max_steer>
            <brake_group>LEFT</brake_group>
            <retractable>1</retractable>
        </contact>
        <contact type="BOGEY" name="RIGHT_MLG">
            <location unit="IN">
                <x>16.283</x>
                <y>98</y>
                <z>-84.3385827</z>
            </location>
            <static_friction>1.0</static_friction>
            <dynamic_friction>0.5</dynamic_friction>
            <rolling_friction>0.02</rolling_friction>
            <spring_coeff unit="LBS/FT">25200</spring_coeff>
            <damping_coeff unit="LBS/FT/SEC">1400</damping_coeff>
            <max_steer unit="DEG">0</max_steer>
            <brake_group>RIGHT</brake_group>
            <retractable>1</retractable>
        </contact>

        <!--These three contact points that are used to substitute for damaged gear. The z-position will be adjusted lower when the gear is damaged, and the damaged gear will be move upwards. This is really to make it
            look about right and also to help with the dynamics -->
        <contact type="STRUCTURE" name="NOSE_LG_DOORS">
            <location unit="IN">
                <x>-237.717</x>
                <y>0</y>
                <z>-30.6496063</z>
            </location>
                       <static_friction>1.2</static_friction>
            <dynamic_friction>1.212</dynamic_friction>
            <rolling_friction>1.413</rolling_friction>
            <spring_coeff unit="LBS/FT">25200</spring_coeff>
            <damping_coeff unit="LBS/FT/SEC">5600</damping_coeff>

        </contact>
        <contact type="STRUCTURE" name="LEFT_MLG_DOORS">
            <location unit="IN">
                <x>16.283</x>
                <y>-98</y>
                <z>-30</z>
            </location>
                       <static_friction>1.2</static_friction>
            <dynamic_friction>1.212</dynamic_friction>
            <rolling_friction>1.413</rolling_friction>
            <spring_coeff unit="LBS/FT">25200</spring_coeff>
            <damping_coeff unit="LBS/FT/SEC">5600</damping_coeff>

        </contact>
        <contact type="STRUCTURE" name="RIGHT_MLG_DOORS">
            <location unit="IN">
                <x>16.283</x>
                <y>98</y>
                <z>-30</z>
            </location>
           <static_friction>1.2</static_friction>
            <dynamic_friction>1.212</dynamic_friction>
            <rolling_friction>1.413</rolling_friction>
            <spring_coeff unit="LBS/FT">25200</spring_coeff>
            <damping_coeff unit="LBS/FT/SEC">5600</damping_coeff>

        </contact>

        <contact type="STRUCTURE" name="LEFT_WING_TIP">
            <location unit="IN">
                <x>37.283</x>
                <y>-256.8</y>
                <z>13</z>
            </location>
            <static_friction>1.2</static_friction>
            <dynamic_friction>1.212</dynamic_friction>
            <rolling_friction>1.413</rolling_friction>
            <spring_coeff unit="LBS/FT">25200</spring_coeff>
            <damping_coeff unit="LBS/FT/SEC">5600</damping_coeff>
        </contact>
        <contact type="STRUCTURE" name="RIGHT_WING_TIP">
            <location unit="IN">
                <x>37.283</x>
                <y>256.8</y>
                <z>13</z>
            </location>
            <static_friction>1.2</static_friction>
            <dynamic_friction>1.212</dynamic_friction>
            <rolling_friction>1.413</rolling_friction>
            <spring_coeff unit="LBS/FT">25200</spring_coeff>
            <damping_coeff unit="LBS/FT/SEC">5600</damping_coeff>
        </contact>
        <contact type="STRUCTURE" name="CANOPY">
            <location unit="IN">
                <x>-220.717</x>
                <y>0</y>
                <z>10</z>
            </location>
            <static_friction>1.2</static_friction>
            <dynamic_friction>1.212</dynamic_friction>
            <rolling_friction>1.413</rolling_friction>
            <spring_coeff unit="LBS/FT">25200</spring_coeff>
            <damping_coeff unit="LBS/FT/SEC">5600</damping_coeff>
        </contact>
        <contact type="STRUCTURE" name="RADOME_FRONT">
            <location unit="IN">
                <x>-414.717</x>
                <y>0</y>
                <z>-18</z>
            </location>
            <static_friction>1.2</static_friction>
            <dynamic_friction>1.212</dynamic_friction>
            <rolling_friction>1.413</rolling_friction>
            <spring_coeff unit="LBS/FT">25200</spring_coeff>
            <damping_coeff unit="LBS/FT/SEC">5600</damping_coeff>
        </contact>
        <contact type="STRUCTURE" name="LEFT_VERTICAL_TAIL">
            <location unit="IN">
                <x>309.283</x>
                <y>-98</y>
                <z>60</z>
            </location>
            <static_friction>1.2</static_friction>
            <dynamic_friction>1.212</dynamic_friction>
            <rolling_friction>1.413</rolling_friction>
            <spring_coeff unit="LBS/FT">25200</spring_coeff>
            <damping_coeff unit="LBS/FT/SEC">5600</damping_coeff>
        </contact>
        <contact type="STRUCTURE" name="RIGHT_VERTICAL_TAIL">
            <location unit="IN">
                <x>309.283</x>
                <y>98</y>
                <z>60</z>
            </location>
            <static_friction>1.2</static_friction>
            <dynamic_friction>1.212</dynamic_friction>
            <rolling_friction>1.413</rolling_friction>
            <spring_coeff unit="LBS/FT">25200</spring_coeff>
            <damping_coeff unit="LBS/FT/SEC">5600</damping_coeff>
        </contact>
        <contact type="STRUCTURE" name="REAR_BODY_LEFT">
            <location unit="IN">
                <x>234.283</x>
                <y>-58</y>
                <z>-12</z>
            </location>
            <static_friction>1.2</static_friction>
            <dynamic_friction>1.212</dynamic_friction>
            <rolling_friction>1.413</rolling_friction>
            <spring_coeff unit="LBS/FT">25200</spring_coeff>
            <damping_coeff unit="LBS/FT/SEC">5600</damping_coeff>
        </contact>
        <contact type="STRUCTURE" name="REAR_BODY_RIGHT">
            <location unit="IN">
                <x>234.283</x>
                <y>58</y>
                <z>-12</z>
            </location>
            <static_friction>1.2</static_friction>
            <dynamic_friction>1.212</dynamic_friction>
            <rolling_friction>1.413</rolling_friction>
            <spring_coeff unit="LBS/FT">25200</spring_coeff>
            <damping_coeff unit="LBS/FT/SEC">5600</damping_coeff>
        </contact>
        <contact type="STRUCTURE" name="NOSE_CONE">
            <location unit="IN">
                <x>-434.717</x>
                <y>0</y>
                <z>-15</z>
            </location>
            <static_friction>1.2</static_friction>
            <dynamic_friction>1.212</dynamic_friction>
            <rolling_friction>1.413</rolling_friction>
            <spring_coeff unit="LBS/FT">25200</spring_coeff>
            <damping_coeff unit="LBS/FT/SEC">5600</damping_coeff>
        </contact>
    </ground_reactions>

    <propulsion>
        <engine file="F100-PW-220">
            <feed>1</feed>
            <feed>2</feed>
            <feed>4</feed>
            <feed>10</feed>
            <feed>6</feed>
            <feed>7</feed>
            <feed>9</feed>
            <thruster file="direct">
                <location unit="IN">
                    <x>247.283</x>
                    <y>-12</y>
                    <z>0</z>
                </location>
                <orient unit="DEG">
                    <roll>0</roll>
                    <pitch>0</pitch>
                    <yaw>0</yaw>
                </orient>
            </thruster>
        </engine>
        <engine file="F100-PW-220">
            <feed>0</feed>
            <feed>2</feed>
            <feed>11</feed>
            <feed>3</feed>
            <feed>5</feed>
            <feed>7</feed>
            <feed>8</feed>
            <thruster file="direct">
                <location unit="IN">
                    <x>247.283</x>
                    <y>12</y>
                    <z>0</z>
                </location>
                <orient unit="DEG">
                    <roll>0</roll>
                    <pitch>0</pitch>
                    <yaw>0</yaw>
                </orient>
            </thruster>
        </engine>
        <!-- numerically lower priority are used first.-->
        <tank type="FUEL" name="0 Left Engine Feed (Tank3)">
            <!--0: Left Engine Feed-->
            <location unit="M">
                <x>-2.0418118</x>
                <y>0</y>
                <z>0.179</z>
            </location>
<!--F-15A            <capacity unit="LBS">1200</capacity>
            <contents unit="LBS">1200</contents>-->
            <type>JP-6</type>
            <capacity unit="LBS">1455</capacity>
            <contents unit="LBS">1455</contents>
            <priority>12</priority>
        </tank>
        <tank type="FUEL" name="1 Right Engine Feed (Tank1)">
            <!--1: Right Engine Feed-->
            <location unit="M">
                <x>-2.0418118</x>
                <y>0</y>
                <z>0.179</z>
            </location>
            <type>JP-6</type>
            <!--<capacity unit="LBS">1500</capacity>
            <contents unit="LBS">1500</contents>-->
            <capacity unit="LBS">1610</capacity>
            <contents unit="LBS">1610</contents>
            <priority>11</priority>
        </tank>
        <tank type="FUEL" name="2 Tank 1">
            <!--2: Tank 1-->
            <location unit="IN">
                <x>10</x>
                <y>0</y>
                <z>0.5</z>
            </location>
            <type>JP-6</type>
            <!--<capacity unit="LBS">3300</capacity>
            <contents unit="LBS">3300</contents>-->
            <capacity unit="LBS">4420</capacity>
            <contents unit="LBS">4420</contents>
            <standpipe unit="LBS">100</standpipe>
            <priority>10</priority>
        </tank>
        <tank type="FUEL" name="3 Left Wing Tank">
            <!--3: Left Wing Tank-->
            <location unit="M">
                <x>0.162188200000001</x>
                <y>-2.595</y>
                <z>0.771</z>
            </location>
            <type>JP-6</type>
            <!--<capacity unit="LBS">2750</capacity>
            <contents unit="LBS">2750</contents>-->
            <capacity unit="LBS">3470</capacity>
            <contents unit="LBS">3470</contents>
            <standpipe unit="LBS">100</standpipe>
            <priority>7</priority>
        </tank>
        <tank type="FUEL" name="4 Right Wing Tank">
            <!--4: Right Wing Tank-->
            <location unit="M">
              <x>0.162188200000001</x>
              <y>2.595</y>
              <z>0.771</z>
            </location>
            <!--<capacity unit="LBS">2750</capacity>
            <contents unit="LBS">2750</contents>-->
            <capacity unit="LBS">3470</capacity>
            <contents unit="LBS">3470</contents>
            <standpipe unit="LBS">100</standpipe>
            <priority>7</priority>
        </tank>
        <tank type="FUEL" name="5 Left External Wing Tank">
            <!--5: Left External Wing Tank-->
            <location unit="M">
              <x>0.575188200000001</x>
              <y>-3.3034</y>
              <z>-0.091</z>
            </location>
            <type>JP-6</type>
            <!--<capacity unit="LBS">3950</capacity>-->
            <capacity unit="LBS">4250</capacity>
            <contents unit="LBS">0</contents>
            <standpipe unit="LBS">100</standpipe>
            <priority>4</priority>
        </tank>
        <tank type="FUEL" name="6 Right External Wing Tank">
            <!--6: Right External Wing Tank-->
            <location unit="M">
              <x>0.575188200000001</x>
              <y>3.3034</y>
              <z>-0.091</z>
            </location>
            <type>JP-6</type>
            <!--<capacity unit="LBS">3950</capacity>-->
            <capacity unit="LBS">4250</capacity>
            <standpipe unit="LBS">100</standpipe>
            <contents unit="LBS">0</contents>
            <priority>4</priority>
        </tank>
        <tank type="FUEL" name="7 Centre External Tank">
            <!--7: External Tank-->
            <location unit="M">
                <x>-0.0918118000000003</x>
                <y>0</y>
                <z>-1.231</z>
            </location>
            <type>JP-6</type>
            <!--<capacity unit="LBS">3950</capacity>-->
            <capacity unit="LBS">4250</capacity>
            <standpipe unit="LBS">100</standpipe>
            <contents unit="LBS">0</contents>
            <priority>3</priority>
        </tank>
        <tank type="FUEL" name="8 left conformal Tank">
            <!--8: left conformal Tank-->
            <location unit="M">
                <x>0.354188200000001</x>
                <y>-1.76</y>
                <z>0.021</z>
            </location>
            <type>JP-6</type>
            <!--<capacity unit="LBS">4720</capacity>-->
            <capacity unit="LBS">5200</capacity>
            <standpipe unit="LBS">100</standpipe>
            <contents unit="LBS">0</contents>
            <priority>6</priority>
        </tank>
        <tank type="FUEL" name="9 Right conformal Tank">
            <!--9: Right conformal Tank-->
            <location unit="M">
              <x>0.354188200000001</x>
              <y>1.76</y>
              <z>0.021</z>
            </location>
            <type>JP-6</type>
            <!--<capacity unit="LBS">4720</capacity>-->
            <capacity unit="LBS">5200</capacity>
            <contents unit="LBS">0</contents>
            <priority>6</priority>
        </tank>

        <tank type="FUEL" name="10 Left Feed line">
            <!--10: Left Feed line-->
            <location unit="IN">
                <x>54.283</x>
                <y>-38</y>
                <z>-47</z>
            </location>
            <type>JP-6</type>
            <capacity unit="LBS">10</capacity>
            <contents unit="LBS">10</contents>
            <priority>1</priority>
        </tank>
        <tank type="FUEL" name="11 Right Feed line">
            <!--11: Right Feed line-->
            <location unit="IN">
                <x>54.283</x>
                <y>38</y>
                <z>-47</z>
            </location>
            <type>JP-6</type>
            <capacity unit="LBS">10</capacity>
            <contents unit="LBS">10</contents>
            <priority>1</priority>
        </tank>

        <dump-rate unit="LBS/MIN">910</dump-rate>
    </propulsion>

    <external_reactions>
        <!-- wake turbulence from other AI plane -->
        <force name="ai-wake" frame="BODY">
            <location unit="M">
                <!-- Center of the main wing leading edge -->
                <x>-1.6332418</x>
                <y> 0.0 </y>
                <z> 0.63046 </z>
            </location>
            <direction>
                <x>   0.0 </x>
                <y>   0.0 </y>
                <z>   0.0 </z>
            </direction>
        </force>
        <moment name="ai-wake" frame="BODY">
            <direction>
                <x>   0.0 </x>
                <y>   0.0 </y>
                <z>   0.0 </z>
            </direction>
        </moment>

        <force name="catapult" frame="BODY">
            <location unit="IN">
                <x>232.283</x>
                <y>0</y>
                <z>0</z>
            </location>
            <direction>
                <x>1</x>
                <y>0</y>
                <z>0</z>
            </direction>
        </force>
        <force name="holdback" frame="BODY">
            <location unit="IN">
                <x>232.283</x>
                <y>0</y>
                <z>0</z>
            </location>
            <direction>
                <x>-1</x>
                <y>0</y>
                <z>0</z>
            </direction>
        </force>
        <force name="hook" frame="BODY">
            <location unit="IN">
                <x>-134.717</x>
                <y>0</y>
                <z>0</z>
            </location>
            <direction>
                <x>-0.9995</x>
                <y>0</y>
                <z>0.01</z>
            </direction>
        </force>
    </external_reactions>

    <flight_control name="FCS">
        <channel name="Nose Wheel Steering">
            <switch name="systems/NWS/engaged">
                <default value="0"/>
                <test value="1">
                    gear/unit[0]/wheel-speed-fps le 221
                    systems/hydraulics/combined-system-pressure ne 0
                    position/aircraft-on-ground ne 0
                    systems/holdback/launchbar-engaged eq 0
                    fcs/steer-maneuver ne 0
                </test>
                <test value="2">
                    gear/unit[0]/wheel-speed-fps le 221
                    systems/hydraulics/combined-system-pressure ne 0
                    position/aircraft-on-ground ne 0
                    systems/holdback/launchbar-engaged eq 0
                </test>
                <output>systems/NWS/engaged</output>
            </switch>

            <scheduled_gain name="tied/steer-pos-deg"> <!-- Prevent failed to tie object error -JD -->
                <input>fcs/steer-cmd-norm</input>
                <table>
                    <independentVar lookup="row">gear/unit[0]/wheel-speed-fps</independentVar>
                    <independentVar lookup="column">systems/NWS/engaged</independentVar>
                    <tableData>
                               0   1    2
                          0   0   35   15
                         40   0   35   7.5
                        100   0   35   2.5
                        300   0    0    0
                    </tableData>
                </table>
                <output>fcs/steer-pos-deg</output>
            </scheduled_gain>
        </channel>
    </flight_control>
    <system file="f-15-hydraulic"/>
    <system file="f-15-electrics"/>
    <system file="catapult"/>
    <system file="f-15-cadc"/>
    <system file="f-15-ecs"/>
    <system file="f-15-engines"/>
    <system file="hook"/>
    <system file="flight-controls"/>
    <aerodynamics>

        <function name="aero/coefficients/CFXAIM">
            <description>DRAG INCREMENT DUE TO AIM</description>
            <product>
                <sum>
                    <property>metrics/stores-aiml-factor</property>
                    <property>metrics/stores-aimr-factor</property>
                </sum>
                <table>
                    <independentVar lookup="row">aero/alpha-deg</independentVar>
                    <independentVar lookup="column">aero/beta-deg</independentVar>
                    <tableData>
                        -20	        -10	         -5	          0	          5	         10	         20
                        -10	 0.00071389	 0.00041917	 0.00036861	 0.00027389	 0.00029806	 0.00029833	 0.00029306
                        -5	 0.00033389	 0.00028778	 0.00028694	 0.00028083	 0.00027833	 0.00030694	 0.00031750
                        0	 0.00027111	 0.00029250	 0.00029278	 0.00029306	 0.00029278	 0.00029194	 0.00026833
                        5	 0.00026528	 0.00026694	 0.00027972	 0.00025972	 0.00028972	 0.00028944	 0.00028417
                        10	 0.00029167	 0.00029083	 0.00029750	 0.00031528	 0.00029778	 0.00029778	 0.00029000
                        15	 0.00031611	 0.00030278	 0.00030250	 0.00029722	 0.00030000	 0.00029694	 0.00028722
                        20	 0.00031083	 0.00032111	 0.00031444	 0.00033083	 0.00030222	 0.00029083	 0.00027750
                        25	 0.00031722	 0.00030194	 0.00033111	 0.00034972	 0.00033417	 0.00032306	 0.00026222
                        30	 0.00031889	 0.00030639	 0.00031000	 0.00034583	 0.00029833	 0.00030306	 0.00029167
                        40	 0.00029083	 0.00028500	 0.00028250	 0.00038639	 0.00027417	 0.00026750	 0.00025861
                    </tableData>
                </table>
            </product>
        </function>
        <function name="aero/coefficients/CFYAIM">
            <description>SIDE FORCE INCREMENT DUE TO AIM</description>
            <product>
                <sum>
                    <property>metrics/stores-aiml-factor-negated</property>
                    <property>metrics/stores-aimr-factor</property>
                </sum>
                <table>
                    <independentVar lookup="row">aero/alpha-deg</independentVar>
                    <independentVar lookup="column">aero/beta-deg</independentVar>
                    <tableData>
                        -20	        -10	         -5	          0	          5	         10	         20
                        -10	 0.00143972	 0.00065556	 0.00032139	 0.00000000	 0.00000000	 0.00000000	 0.00000028
                        -5	 0.00020361	 0.00000000	 0.00000000	 0.00000000	 0.00004056	 0.00000000	 0.00000000
                        0	 0.00000000	 0.00000722	 0.00000250	 0.00000000	 0.00000083	 0.00000444	 0.00006694
                        5	 0.00000000	 0.00000500	 0.00000000	 0.00000000	 0.00000000	 0.00000000	 0.00000000
                        10	 0.00000000	 0.00006944	 0.00000000	 0.00000000	 0.00000472	 0.00000000	 0.00001417
                        15	 0.00002778	 0.00005028	 0.00000861	 0.00004667	 0.00003667	 0.00001417	 0.00003306
                        20	 0.00009556	 0.00000000	 0.00003694	 0.00000528	 0.00003750	 0.00003500	 0.00002278
                        25	 0.00012639	 0.00000000	 0.00001778	 0.00000000	 0.00000000	 0.00000000	 0.00000000
                        30	 0.00009222	 0.00000000	 0.00000000	 0.00000000	 0.00000000	 0.00000000	 0.00000000
                        40	 0.00000000	 0.00000000	 0.00000000	 0.00000000	 0.00000000	 0.00000000	 0.00000000
                    </tableData>
                </table>
            </product>
        </function>

        <function name="aero/coefficients/CFZAIM">
            <description>LIFT INCREMENT DUE TO AIM </description>
            <product>
                <sum>
                    <property>metrics/stores-aiml-factor</property>
                    <property>metrics/stores-aimr-factor</property>
                </sum>
                <table>
                    <independentVar lookup="row">aero/alpha-deg</independentVar>
                    <independentVar lookup="column">aero/beta-deg</independentVar>
                    <tableData>
                        -20	        -10	         -5	          0	          5	         10	         20
                        -10	 0.00091417	 0.00105806	 0.00071278	 0.00105972	 0.00000139	 0.00000000	 0.00000000
                        -5	 0.00000000	 0.00006417	 0.00009111	 0.00031889	 0.00020611	 0.00000000	 0.00000000
                        0	 0.00000000	 0.00000000	 0.00000000	 0.00000000	 0.00000139	 0.00000278	 0.00000000
                        5	 0.00000000	 0.00000000	 0.00000000	 0.00000000	 0.00000000	 0.00000000	 0.00000000
                        10	 0.00000000	 0.00003167	 0.00004694	 0.00056000	 0.00000000	 0.00000000	 0.00000000
                        15	 0.00000417	 0.00000000	 0.00000000	 0.00000000	 0.00000000	 0.00000000	 0.00000000
                        20	 0.00000000	 0.00000000	 0.00003167	 0.00009056	 0.00000000	 0.00000000	 0.00000000
                        25	 0.00000000	 0.00000611	 0.00006556	 0.00014083	 0.00025750	 0.00016750	 0.00000000
                        30	 0.00000000	 0.00000000	 0.00000000	 0.00005833	 0.00000000	 0.00007472	 0.00008500
                        40	 0.00000000	 0.00000000	 0.00000000	 0.00001472	 0.00000000	 0.00000000	 0.00000000
                    </tableData>
                </table>
            </product>
        </function>
        <function name="aero/coefficients/CMLAIM">
            <description>ROLLING MOMENT INCREMENT DUE TO AIM</description>
            <product>
                <sum>
                    <property>metrics/stores-aiml-factor-negated</property>
                    <property>metrics/stores-aimr-factor</property>
                </sum>
                <table>
                    <independentVar lookup="row">aero/alpha-deg</independentVar>
                    <independentVar lookup="column">aero/beta-deg</independentVar>
                    <tableData>
                        -20	        -10	         -5	          0	          5	         10	         20
                        -10	 0.00000000	 0.00000000	 0.00000000	 0.00000000	 0.00000000	 0.00000000	 0.00000000
                        -5	 0.00000000	 0.00000000	 0.00000000	 0.00000000	 0.00000000	 0.00000000	 0.00001306
                        0	 0.00001583	 0.00000028	 0.00000083	 0.00000000	 0.00000000	 0.00000000	 0.00000000
                        5	 0.00002167	 0.00002500	 0.00000528	 0.00000806	 0.00001611	 0.00002667	 0.00006250
                        10	 0.00000000	 0.00000167	 0.00000333	 0.00001722	 0.00003278	 0.00005056	 0.00008056
                        15	 0.00000000	 0.00000472	 0.00001111	 0.00002972	 0.00004389	 0.00005528	 0.00006472
                        20	 0.00000000	 0.00001222	 0.00000444	 0.00001083	 0.00003639	 0.00005028	 0.00004917
                        25	 0.00000000	 0.00000000	 0.00000000	 0.00000000	 0.00000000	 0.00000000	 0.00002500
                        30	 0.00000000	 0.00000000	 0.00000000	 0.00000000	 0.00000000	 0.00000000	 0.00000000
                        40	 0.00000000	 0.00000000	 0.00000000	 0.00000000	 0.00000000	 0.00000000	 0.00000000
                    </tableData>
                </table>
            </product>
        </function>

        <function name="aero/coefficients/CMMAIM">
            <description>PITCHING MOMENT INCREMENT DUE TO AIM</description>
            <product>
                <sum>
                    <property>metrics/stores-aiml-factor</property>
                    <property>metrics/stores-aimr-factor</property>
                </sum>
                <table>
                    <independentVar lookup="row">aero/alpha-deg</independentVar>
                    <independentVar lookup="column">aero/beta-deg</independentVar>
                    <tableData>
                        -20	        -10	         -5	          0	          5	         10	         20
                        -10	 0.00072722	 0.00025028	 0.00058528	 0.00000000	 0.00000000	 0.00000000	 0.00000000
                        -5	 0.00000000	 0.00000000	 0.00000000	 0.00000000	 0.00000000	 0.00014000	 0.00000000
                        0	 0.00002444	 0.00000000	 0.00000000	 0.00000722	 0.00001333	 0.00002222	 0.00005722
                        5	 0.00017778	 0.00025333	 0.00022333	 0.00052500	 0.00015611	 0.00016028	 0.00017194
                        10	 0.00018806	 0.00016750	 0.00016306	 0.00013250	 0.00021694	 0.00025250	 0.00029167
                        15	 0.00018583	 0.00016972	 0.00018417	 0.00026222	 0.00025333	 0.00030278	 0.00035639
                        20	 0.00025500	 0.00020417	 0.00021694	 0.00018917	 0.00029667	 0.00035333	 0.00042417
                        25	 0.00027750	 0.00032639	 0.00035667	 0.00021389	 0.00037389	 0.00036333	 0.00046250
                        30	 0.00034472	 0.00038806	 0.00043194	 0.00026861	 0.00046722	 0.00045528	 0.00044278
                        40	 0.00048778	 0.00054278	 0.00056806	 0.00027694	 0.00058472	 0.00058083	 0.00056833
                    </tableData>
                </table>
            </product>
        </function>

        <function name="aero/coefficients/CMNAIM">
            <description>YAWING MOMENT INCREMENT DUE TO AIM</description>
            <product>
                <sum>
                    <property>metrics/stores-aiml-factor-negated</property>
                    <property>metrics/stores-aimr-factor</property>
                </sum>
                <table>
                    <independentVar lookup="row">aero/alpha-deg</independentVar>
                    <independentVar lookup="column">aero/beta-deg</independentVar>
                    <tableData>
                        -20	        -10	         -5	          0	          5	         10	         20
                        -10	 0.00077972	 0.00034667	 0.00012111	 0.00000000	 0.00000000	 0.00000833	 0.00006528
                        -5	 0.00000000	 0.00000000	 0.00000000	 0.00000000	 0.00003583	 0.00002194	 0.00001278
                        0	 0.00000000	 0.00000000	 0.00000000	 0.00000056	 0.00002972	 0.00005917	 0.00016444
                        5	 0.00000000	 0.00000000	 0.00000000	 0.00002139	 0.00005472	 0.00008306	 0.00014611
                        10	 0.00000000	 0.00000000	 0.00001472	 0.00004306	 0.00006944	 0.00009889	 0.00016306
                        15	 0.00000000	 0.00002167	 0.00004250	 0.00006500	 0.00009500	 0.00011694	 0.00017333
                        20	 0.00001361	 0.00006333	 0.00006083	 0.00008778	 0.00011472	 0.00013917	 0.00018361
                        25	 0.00003500	 0.00006889	 0.00007583	 0.00009194	 0.00010194	 0.00011139	 0.00018000
                        30	 0.00005556	 0.00006833	 0.00008917	 0.00010361	 0.00011778	 0.00012361	 0.00013056
                        40	 0.00003389	 0.00008167	 0.00010083	 0.00011972	 0.00014167	 0.00015417	 0.00017222
                    </tableData>
                </table>
            </product>
        </function>

        <function name="aero/coefficients/CFXTNK">
            <description>DRAG INCREMENT DUE TO TANK CFXTNK(ALPHA,BETA)</description>
            <product>
                <property>metrics/stores-tank-factor</property>
                <table>
                    <independentVar lookup="row">aero/alpha-deg</independentVar>
                    <independentVar lookup="column">aero/beta-deg</independentVar>
                    <tableData>
                        -20	        -15	        -10	         -5	          0	          5	         10	         15	         20
                        -30	 0.01494000	 0.01114000	 0.01165000	 0.01049000	 0.00998000	 0.01049000	 0.01165000	 0.01114000	 0.01494000
                        -20	 0.00897000	 0.00933000	 0.00799000	 0.00793000	 0.00779000	 0.00793000	 0.00799000	 0.00933000	 0.00897000
                        -15	 0.00803000	 0.00752000	 0.00759000	 0.00581000	 0.00776000	 0.00581000	 0.00759000	 0.00752000	 0.00803000
                        -10	 0.00715000	 0.00574000	 0.00694000	 0.00671000	 0.00631000	 0.00671000	 0.00694000	 0.00574000	 0.00715000
                        -5	 0.00646000	 0.00677000	 0.00012000	 0.00634000	 0.00658000	 0.00634000	 0.00012000	 0.00677000	 0.00646000
                        0	 0.00622000	 0.00633000	 0.00634000	 0.00632000	 0.00632000	 0.00632000	 0.00634000	 0.00633000	 0.00622000
                        5	 0.00616000	 0.00633000	 0.00640000	 0.00645000	 0.00835000	 0.00645000	 0.00640000	 0.00633000	 0.00616000
                        10	 0.00629000	 0.00646000	 0.00653000	 0.00677000	 0.01085000	 0.00677000	 0.00653000	 0.00646000	 0.00629000
                        15	 0.00656000	 0.00660000	 0.00454000	 0.00854000	 0.01156000	 0.00854000	 0.00454000	 0.00660000	 0.00656000
                        20	 0.00647000	 0.00683000	 0.00653000	 0.00297000	 0.01244000	 0.00297000	 0.00653000	 0.00683000	 0.00647000
                        23	 0.00657000	 0.00156000	 0.00908000	 0.00722000	 0.01660000	 0.00722000	 0.00908000	 0.00156000	 0.00657000
                        25	 0.00751000	 0.01074000	 0.01536000	 0.00885000	 0.01720000	 0.00885000	 0.01536000	 0.01074000	 0.00751000
                        26	 0.00782000	 0.01228000	 0.01635000	 0.00698000	 0.05528000	 0.00698000	 0.01565000	 0.01228000	 0.00782000
                        30	 0.00754000	 0.00872000	 0.01665000	 0.01537000	 0.01622000	 0.05153000	 0.01665000	 0.00872000	 0.00754000
                        35	 0.01165000	 0.01919000	 0.00884000	 0.02168000	 0.02231000	 0.20168000	 0.00884000	 0.01919000	 0.01165000
                        40	 0.01503000	 0.02090000	 0.02583000	 0.01221000	 0.03406000	 0.01221000	 0.02583000	 0.02090000	 0.01503000
                        50	 0.02766000	 0.02222000	 0.02644000	 0.02182000	 0.03414000	 0.02180000	 0.02364000	 0.02222000	 0.02766000
                        60	 0.01803000	 0.00781000	 0.02740000	 0.02934000	 0.00938000	 0.02934000	 0.02740000	 0.00781000	 0.01803000
                    </tableData>
                </table>
            </product>
        </function>
        <function name="aero/coefficients/CFYTNK">
            <description>SIDE FORCE INCREMENT DUE TO TANK CFYTNK(ALPHA,BETA)</description>
            <product>
                <sum>
                    <property>metrics/stores-tank-factor-l-negated</property>
                    <property>metrics/stores-tank-factor-r</property>
                </sum>
                <table>
                    <independentVar lookup="row">aero/alpha-deg</independentVar>
                    <independentVar lookup="column">aero/beta-deg</independentVar>
                    <tableData>
                        -20	        -15	        -10	         -5	          0	          5	         10	         15	         20
                        -30	-0.00054000	-0.00035000	 0.00047000	-0.00033000	 0.00000000	 0.00033000	-0.00047000	 0.00035000	 0.00054000
                        -20	 0.00067000	 0.00161000	-0.00042000	 0.00080000	 0.00000000	-0.00080000	 0.00042000	-0.00161000	-0.00067000
                        -15	 0.00058000	 0.00067000	 0.00004000	-0.00094000	 0.00000000	 0.00094000	-0.00004000	-0.00067000	-0.00058000
                        -10	 0.00063000	-0.00123000	-0.00126000	-0.00059000	 0.00000000	 0.00059000	 0.00126000	 0.00123000	-0.00063000
                        -5	 0.00036000	 0.00154000	-0.00022000	 0.00031000	 0.00000000	-0.00031000	 0.00022000	-0.00154000	-0.00036000
                        0	-0.00044000	-0.00016000	-0.00002000	-0.00001000	 0.00000000	 0.00001000	 0.00002000	 0.00016000	 0.00044000
                        5	-0.00091000	-0.00050000	-0.00023000	 0.00006000	 0.00000000	-0.00006000	 0.00023000	 0.00050000	 0.00091000
                        10	-0.00132000	-0.00086000	-0.00115000	 0.00004000	 0.00000000	-0.00004000	 0.00115000	 0.00086000	 0.00132000
                        15	-0.00165000	-0.00209000	-0.00396000	-0.01229000	 0.00000000	 0.01229000	 0.00396000	 0.00209000	 0.00165000
                        20	-0.00275000	-0.00190000	-0.00314000	-0.00133000	 0.00000000	 0.00133000	 0.00314000	 0.00190000	 0.00275000
                        23	-0.00334000	 0.00871000	-0.00329000	 0.00328000	 0.00000000	-0.00328000	 0.00329000	-0.00871000	 0.00334000
                        25	-0.00230000	 0.01054000	-0.00388000	-0.01503000	 0.00000000	 0.01503000	 0.00388000	-0.01054000	 0.00230000
                        26	-0.00217000	 0.00222000	 0.05151000	-0.00454000	 0.00000000	 0.00454000	-0.05151000	-0.00222000	 0.00217000
                        30	-0.00281000	-0.00095000	-0.03677000	 0.02608000	 0.00000000	-0.02608000	 0.03677000	 0.00095000	 0.00281000
                        35	-0.01549000	 0.00803000	 0.02230000	 0.21438000	 0.00000000	-0.21438000	-0.02230000	-0.00803000	 0.01549000
                        40	 0.00233000	-0.00521000	 0.00024000	-0.02601000	 0.00000000	 0.02601000	-0.00024000	 0.00521000	-0.00233000
                        50	-0.01050000	-0.01282000	 0.06866000	-0.03090000	 0.00000000	 0.03090000	-0.06866000	 0.01282000	 0.01050000
                        60	-0.00628000	 0.00516000	-0.00498000	-0.00229000	 0.00000000	 0.00229000	 0.00498000	-0.00516000	 0.00628000
                    </tableData>
                </table>
            </product>
        </function>
        <function name="aero/coefficients/CFZTNK">
            <description>LIFT INCREMENT DUE TO TANK CFZTNK(ALPHA,BETA)</description>
            <product>
                <property>metrics/stores-tank-factor</property>
                <table>
                    <independentVar lookup="row">aero/alpha-deg</independentVar>
                    <independentVar lookup="column">aero/beta-deg</independentVar>
                    <tableData>
                        -20	        -15	        -10	         -5	          0	          5	         10	         15	         20
                        -30	-0.00264000	-0.00513000	-0.00480000	-0.00486000	-0.00399000	-0.00486000	-0.00480000	-0.00513000	-0.00264000
                        -20	-0.00399000	-0.00304000	-0.00278000	-0.00254000	-0.00263000	-0.00254000	-0.00278000	-0.00304000	-0.00399000
                        -15	-0.00326000	-0.00234000	-0.00332000	 0.00246000	-0.00409000	 0.00246000	-0.00332000	-0.00234000	-0.00326000
                        -10	-0.00080000	 0.00196000	-0.00210000	-0.00243000	 0.00130000	-0.00243000	-0.00210000	 0.00196000	-0.00080000
                        -5	-0.00023000	 0.00565000	 0.02331000	 0.00047000	-0.00109000	 0.00047000	 0.02331000	 0.00565000	-0.00023000
                        0	 0.00007000	 0.00019000	 0.00017000	 0.00011000	 0.00007000	 0.00011000	 0.00017000	 0.00019000	 0.00007000
                        5	 0.00092000	 0.00091000	 0.00085000	 0.00088000	-0.01105000	 0.00088000	 0.00085000	 0.00091000	 0.00092000
                        10	 0.00171000	 0.00158000	 0.00148000	 0.00168000	-0.01438000	 0.00168000	 0.00148000	 0.00158000	 0.00171000
                        15	 0.00228000	 0.00207000	-0.00818000	-0.00073000	 0.01240000	-0.00073000	-0.00818000	 0.00207000	 0.00228000
                        20	 0.00247000	 0.00293000	 0.00095000	 0.00781000	-0.00237000	 0.00781000	 0.00095000	 0.00293000	 0.00247000
                        23	 0.00241000	-0.00581000	 0.00506000	-0.00256000	 0.15926000	-0.00256000	 0.00506000	-0.00581000	 0.00241000
                        25	 0.00316000	-0.01045000	 0.01101000	 0.00251000	 0.02846000	 0.00251000	 0.01101000	-0.01045000	 0.00316000
                        26	 0.00363000	 0.00767000	 0.09835000	-0.00658000	 0.01467000	-0.00658000	 0.09835000	 0.00767000	 0.00363000
                        30	 0.00327000	 0.00165000	-0.01121000	 0.22519000	 0.00469000	 0.22519000	-0.01121000	 0.00165000	 0.00327000
                        35	-0.00054000	 0.00017000	 0.03253000	-0.15410000	 0.00576000	-0.15410000	 0.03253000	 0.00017000	-0.00054000
                        40	-0.01403000	 0.00949000	 0.00335000	 0.01782000	-0.02610000	 0.01782000	 0.00335000	 0.00949000	-0.01403000
                        50	 0.02362000	 0.01193000	-0.03809000	-0.00490000	 0.02710000	-0.00490000	-0.03809000	 0.01193000	 0.02362000
                        60	 0.01674000	-0.00274000	 0.01833000	 0.02072000	 0.00641000	 0.02072000	 0.01833000	-0.00274000	 0.01674000
                    </tableData>
                </table>
            </product>
        </function>
        <function name="aero/coefficients/CMLTNK">
            <description>ROLLING MOMENT INCREMENT DUE TO TANK CMLTNK(ALPHA,BETA)</description>
            <product>
                <sum>
                    <property>metrics/stores-tank-factor-l-negated</property>
                    <property>metrics/stores-tank-factor-r</property>
                </sum>
                <table>
                    <independentVar lookup="row">aero/alpha-deg</independentVar>
                    <independentVar lookup="column">aero/beta-deg</independentVar>
                    <tableData>
                        -20	        -15	        -10	         -5	          0	          5	         10	         15	         20
                        -30	 0.00484000	 0.00266000	 0.00168000	 0.00095000	 0.00000000	-0.00095000	-0.00168000	-0.00266000	-0.00484000
                        -20	 0.00161000	 0.00070000	 0.00011000	-0.00005000	 0.00000000	 0.00005000	-0.00011000	-0.00070000	-0.00161000
                        -15	 0.00106000	 0.00100000	 0.00037000	 0.00013000	 0.00000000	-0.00013000	-0.00037000	-0.00100000	-0.00106000
                        -10	-0.00057000	-0.00168000	 0.00019000	 0.00069000	 0.00000000	-0.00069000	-0.00019000	 0.00168000	 0.00057000
                        -5	-0.00022000	 0.00264000	 0.00767000	 0.00020000	 0.00000000	-0.00020000	-0.00767000	-0.00264000	 0.00022000
                        0	-0.00112000	-0.00086000	-0.00053000	-0.00025000	 0.00000000	 0.00025000	 0.00053000	 0.00086000	 0.00112000
                        5	-0.00214000	-0.00159000	-0.00099000	-0.00049000	 0.00000000	 0.00049000	 0.00099000	 0.00159000	 0.00214000
                        10	-0.00292000	-0.00221000	-0.00120000	-0.00068000	 0.00000000	 0.00068000	 0.00120000	 0.00221000	 0.00292000
                        15	-0.00349000	-0.00229000	-0.00215000	 0.00199000	 0.00000000	-0.00199000	 0.00215000	 0.00229000	 0.00349000
                        20	-0.00378000	-0.00298000	-0.00095000	-0.00274000	 0.00000000	 0.00274000	 0.00095000	 0.00298000	 0.00378000
                        23	-0.00370000	-0.00451000	-0.00494000	-0.00171000	 0.00000000	 0.00171000	 0.00494000	 0.00451000	 0.00370000
                        25	-0.00416000	-0.00830000	 0.00003000	 0.00168000	 0.00000000	-0.00168000	-0.00003000	 0.00830000	 0.00416000
                        26	-0.00464000	-0.00242000	-0.01231000	-0.00272000	 0.00000000	 0.00272000	 0.01231000	 0.00242000	 0.00464000
                        30	-0.00517000	-0.00524000	 0.00556000	 0.00877000	 0.00000000	-0.00877000	-0.00556000	 0.00524000	 0.00517000
                        35	-0.00650000	-0.00266000	-0.00217000	-0.06445000	 0.00000000	 0.06445000	 0.00217000	 0.00266000	 0.00650000
                        40	 0.01871000	 0.00370000	 0.00082000	-0.00016000	 0.00000000	 0.00016000	-0.00082000	-0.00370000	-0.01871000
                        50	-0.01123000	-0.01065000	 0.09544000	 0.01610000	 0.00000000	-0.01610000	-0.09544000	 0.01065000	 0.01123000
                        60	-0.00069000	 0.02008000	-0.00655000	-0.00263000	 0.00000000	 0.00263000	 0.00655000	-0.02008000	 0.00069000
                    </tableData>
                </table>
            </product>
        </function>
        <function name="aero/coefficients/CMMTNK">
            <description>PITCHING MOMENT INCREMENT DUE TO TANK CMMTNK(ALPHA,BETA)</description>
            <product>
                <property>metrics/stores-tank-factor</property>
                <table>
                    <independentVar lookup="row">aero/alpha-deg</independentVar>
                    <independentVar lookup="column">aero/beta-deg</independentVar>
                    <tableData>
                        -20	        -15	        -10	         -5	          0	          5	         10	         15	         20
                        -30	-0.04700000	-0.04223000	-0.04187000	-0.04599000	-0.05145000	-0.04599000	-0.04187000	-0.04223000	-0.04700000
                        -20	-0.02556000	-0.03518000	-0.03581000	-0.03671000	-0.03790000	-0.03671000	-0.03581000	-0.03518000	-0.02556000
                        -15	-0.02056000	-0.02348000	-0.02284000	-0.03508000	-0.02415000	-0.03508000	-0.02284000	-0.02348000	-0.02056000
                        -10	-0.01907000	-0.02676000	-0.01481000	-0.01321000	-0.02441000	-0.01321000	-0.01481000	-0.02676000	-0.01907000
                        -5	-0.00693000	-0.02380000	-0.06122000	-0.01032000	-0.00568000	-0.01032000	-0.06122000	-0.02380000	-0.00693000
                        0	 0.00203000	 0.00137000	 0.00090000	 0.00074000	 0.00064000	 0.00074000	 0.00090000	 0.00137000	 0.00203000
                        5	 0.00908000	 0.00918000	 0.00912000	 0.00888000	 0.02537000	 0.00888000	 0.00912000	 0.00918000	 0.00908000
                        10	 0.01534000	 0.01620000	 0.01612000	 0.01610000	 0.02633000	 0.01610000	 0.01612000	 0.01620000	 0.01534000
                        15	 0.02088000	 0.02193000	 0.02742000	 0.02592000	 0.01763000	 0.02592000	 0.02742000	 0.02193000	 0.02088000
                        20	 0.02639000	 0.02727000	 0.03123000	 0.02398000	 0.02838000	 0.02398000	 0.03123000	 0.02727000	 0.02639000
                        23	 0.02813000	 0.05262000	 0.02052000	 0.03387000	 0.07043000	 0.03387000	 0.02052000	 0.05262000	 0.02813000
                        25	 0.02768000	 0.08591000	 0.00954000	 0.03087000	-0.01407000	 0.03087000	 0.00954000	 0.08591000	 0.02768000
                        26	 0.02757000	 0.04278000	-0.00223000	 0.03697000	 0.00252000	 0.03697000	-0.00223000	 0.04278000	 0.02757000
                        30	 0.03093000	 0.02891000	-0.00480000	-0.45738000	 0.04480000	-0.45738000	-0.00480000	 0.02891000	 0.03093000
                        35	 0.02504000	 0.04008000	 0.00572000	 0.16683000	 0.16370000	 0.16683000	 0.00572000	 0.04008000	 0.02504000
                        40	 0.00587000	 0.02741000	 0.01562000	 0.01269000	 0.06869000	 0.01269000	 0.01562000	 0.02741000	 0.00587000
                        50	 0.03523000	 0.04855000	 0.25839000	 0.09417000	 0.01945000	 0.09417000	 0.25839000	 0.04855000	 0.03523000
                        60	 0.02757000	 0.03076000	 0.04160000	 0.04700000	 0.06928000	 0.04700000	 0.04160000	 0.03076000	 0.02757000
                    </tableData>
                </table>
            </product>
        </function>
        <function name="aero/coefficients/CMNTNK">
            <description>YAWING MOMENT INCREMENT DUE TO TANK CMNTNK(ALPHA,BETA)</description>
            <product>
                <sum>
                    <property>metrics/stores-tank-factor-l-negated</property>
                    <property>metrics/stores-tank-factor-r</property>
                </sum>
                <table>
                    <independentVar lookup="row">aero/alpha-deg</independentVar>
                    <independentVar lookup="column">aero/beta-deg</independentVar>
                    <tableData>
                        -20	        -15	        -10	         -5	          0	          5	         10	         15	         20
                        -30	-0.01148000	-0.01498000	-0.00988000	-0.00487000	 0.00000000	 0.00487000	 0.00988000	 0.01498000	 0.01148000
                        -20	-0.02029000	-0.01627000	-0.01075000	-0.00452000	 0.00000000	 0.00452000	 0.01075000	 0.01627000	 0.02029000
                        -15	-0.01974000	-0.01511000	-0.01016000	-0.00649000	 0.00000000	 0.00649000	 0.01016000	 0.01511000	 0.01974000
                        -10	-0.02029000	-0.01597000	-0.01182000	-0.00515000	 0.00000000	 0.00515000	 0.01182000	 0.01597000	 0.02029000
                        -5	-0.01984000	-0.01412000	-0.01054000	-0.00485000	 0.00000000	 0.00485000	 0.01054000	 0.01412000	 0.01984000
                        0	-0.01958000	-0.01520000	-0.01034000	-0.00525000	 0.00000000	 0.00525000	 0.01034000	 0.01520000	 0.01958000
                        5	-0.01918000	-0.01490000	-0.01018000	-0.00502000	 0.00000000	 0.00502000	 0.01018000	 0.01490000	 0.01918000
                        10	-0.01858000	-0.01458000	-0.01055000	-0.00461000	 0.00000000	 0.00461000	 0.01055000	 0.01458000	 0.01858000
                        15	-0.01774000	-0.01482000	-0.01332000	-0.01604000	 0.00000000	 0.01604000	 0.01332000	 0.01482000	 0.01774000
                        20	-0.01753000	-0.01389000	-0.01223000	-0.00120000	 0.00000000	 0.00120000	 0.01223000	 0.01389000	 0.01753000
                        23	-0.01676000	-0.00522000	-0.00949000	-0.00503000	 0.00000000	 0.00503000	 0.00949000	 0.00522000	 0.01676000
                        25	-0.01521000	-0.00263000	-0.01129000	-0.02239000	 0.00000000	 0.02239000	 0.01129000	 0.00263000	 0.01521000
                        26	-0.01441000	-0.00588000	 0.06784000	-0.01291000	 0.00000000	 0.01291000	-0.06784000	 0.00588000	 0.01441000
                        30	-0.01368000	-0.00632000	-0.04500000	 0.06200000	 0.00000000	-0.06200000	 0.04500000	 0.00632000	 0.01368000
                        35	-0.02048000	 0.01473000	 0.03058000	 0.15682000	 0.00000000	-0.15682000	-0.03058000	-0.01473000	 0.02048000
                        40	 0.01864000	-0.01010000	-0.00659000	-0.01420000	 0.00000000	 0.01420000	 0.00659000	 0.01010000	-0.01864000
                        50	-0.01680000	-0.01971000	-0.08768000	-0.02680000	 0.00000000	 0.02680000	 0.08768000	 0.01971000	 0.01680000
                        60	-0.01177000	 0.00371000	-0.00597000	-0.00153000	 0.00000000	 0.00153000	 0.00597000	-0.00371000	 0.01177000
                    </tableData>
                </table>
            </product>
        </function>
        <function name="aero/coefficients/EPA43">
            <description>CNDR MULTIPLIER CLDR, CYDR DUE TO SPEEDBRAKE</description>
                <table>
                    <independentVar lookup="row">aero/alpha-deg</independentVar>
                    <independentVar lookup="column">fcs/speedbrake-pos-norm</independentVar>
                    <tableData>
                        0	          5	         10	         15	         20	         25	         30	         35	         40	         45
                        -20	 1.00000000	 1.00000000	 1.00000000	 1.00000000	 1.00000000	 1.00000000	 1.00000000	 1.00000000	 1.00000000	 1.00000000
                        -17	 1.00000000	 1.00000000	 1.00000000	 1.00000000	 1.00000000	 1.00000000	 1.00000000	 1.00000000	 1.00000000	 1.00000000
                        -14	 1.00000000	 1.00000000	 1.00000000	 1.00000000	 1.00000000	 1.00000000	 1.00000000	 1.00000000	 1.00000000	 1.00000000
                        -11	 1.00000000	 1.00000000	 1.00000000	 1.00000000	 1.00000000	 1.00000000	 1.00000000	 1.00000000	 1.00000000	 1.00000000
                        -8	 1.00000000	 1.00000000	 1.00000000	 1.00000000	 1.00000000	 1.00000000	 1.00000000	 1.00000000	 1.00000000	 1.00000000
                        -5	 1.00000000	 1.00000000	 1.00000000	 1.00000000	 1.00000000	 1.00000000	 1.00000000	 1.00000000	 1.00000000	 1.00000000
                        -2	 1.00000000	 1.00000000	 1.00000000	 1.00000000	 1.00000000	 1.00000000	 1.00000000	 1.00000000	 1.00000000	 1.00000000
                        1	 1.00000000	 1.00000000	 1.00000000	 1.00000000	 1.00000000	 1.00000000	 1.00000000	 1.00000000	 1.00000000	 1.00000000
                        4	 1.00000000	 1.00000000	 1.00000000	 1.00000000	 1.00000000	 1.00000000	 1.00000000	 1.00000000	 1.00000000	 1.00000000
                        7	 1.00000000	 1.00000000	 1.00000000	 1.00000000	 1.00000000	 1.00000000	 1.00000000	 1.00000000	 1.00000000	 1.00000000
                        10	 1.00000000	 1.00000000	 1.00000000	 1.00000000	 1.00000000	 1.00000000	 1.00000000	 1.00000000	 1.00000000	 1.00000000
                        13	 1.00000000	 1.00000000	 1.00000000	 1.00000000	 1.00000000	 1.00000000	 1.00000000	 1.00000000	 1.00000000	 1.00000000
                        16	 1.00000000	 1.08520266	 1.06255253	 1.04255882	 1.02522154	 1.01054067	 0.99851623	 0.98914821	 0.98243661	 0.97838143
                        19	 1.00000000	 0.99811443	 0.97047029	 0.94548257	 0.92315126	 0.90347638	 0.88645792	 0.87209588	 0.86039027	 0.85134107
                        22	 1.00000000	 0.91726234	 0.88462418	 0.85464243	 0.82731712	 0.80264822	 0.78063574	 0.76127968	 0.74458005	 0.73053684
                        25	 1.00000000	 0.85948549	 0.82185331	 0.78687755	 0.75455821	 0.72489530	 0.69788880	 0.67353873	 0.65184508	 0.63280785
                        40	 1.00000000	 1.00000000	 1.00000000	 1.00000000	 1.00000000	 1.00000000	 1.00000000	 1.00000000	 1.00000000	 1.00000000
                        55	 1.00000000	 1.00000000	 1.00000000	 1.00000000	 1.00000000	 1.00000000	 1.00000000	 1.00000000	 1.00000000	 1.00000000
                        60	 1.00000000	 1.00000000	 1.00000000	 1.00000000	 1.00000000	 1.00000000	 1.00000000	 1.00000000	 1.00000000	 1.00000000
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                    </tableData>
                </table>
        </function>
        <function name="aero/coefficients/CdDBRK">
            <description>Drag due to speedbrakes</description>
            <product>
                <property>fcs/speedbrake-pos-norm</property>
                <table>
                    <independentVar lookup="row">aero/alpha-deg</independentVar>
                    <tableData>
                        -25		 0.02100000
                        -20		 0.03100000
                        -15		 0.04140000
                        -5		 0.06500000
                        0		 0.07840000
                        5		 0.06500000
                        15		 0.05140000
                        35		 0.02100000
                        40		 0.01880000
                    </tableData>
                </table>
            </product>
        </function>
        <function name="aero/coefficients/CdMach">
            <description>Drag mach factor (NASA CR-152391-VOL-1 Figure 3-7 p54)</description>
                <table>
                    <independentVar lookup="row">velocities/mach</independentVar>
                    <tableData>
                    0.00	0.970823
                    0.05	0.986678
                    0.20	0.990755
                    0.35	0.975057
                    0.50	0.985522
                    0.65	1.031429
                    0.98	2.401153
                    1.10	2.584163
                    1.25	2.500102
                    1.40	2.404051
                    1.55	2.296837
                    1.70	2.210755
                    1.85	2.118265
                    2.00	2.009633
                    2.15	1.913582
                    2.30	1.820163
                    2.45	1.698551
                    2.60	1.602571
                    2.75	1.508918
                    2.90	1.399908
                    3.00	1.325949
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                    </tableData>
                </table>
        </function>
        <function name="aero/coefficients/CFXB">
            <description>BASIC DRAG</description>
            <table>
                <independentVar lookup="row">aero/alpha-deg</independentVar>
                <independentVar lookup="column">fcs/elevator-pos-deg</independentVar>
                <tableData>
                                -30    	-25     	-20     	-15     	-10     	  -5     	0     	       5     	   10     	    15     	   20     	 25     	30
                    -20	0.5919179	0.5491017	0.5124564	0.4826868	0.4604429	0.4463426	0.4410042	0.4450930	0.4593785	0.4848089	0.5226013	0.5743507	0.6421590
                    -17	0.4652515	0.4315977	0.4027942	0.3793951	0.3619113	0.3508284	0.3466324	0.3498462	0.3610747	0.3810631	0.4107682	0.4514436	0.5047414
                    -14	0.3227617	0.2994148	0.2794328	0.2632000	0.2510708	0.2433822	0.2404713	0.2427008	0.2504904	0.2643571	0.2849646	0.3131826	0.3501572
                    -11	0.1971498	0.1828890	0.1706836	0.1607683	0.1533595	0.1486631	0.1468851	0.1482469	0.1530050	0.1614751	0.1740626	0.1912987	0.2138836
                    -8	0.1060907	0.0984167	0.0918487	0.0865130	0.0825262	0.0799990	0.0790421	0.0797750	0.0823354	0.0868933	0.0936670	0.1029421	0.1150955
                    -5	0.0521594	0.0483865	0.0451573	0.0425340	0.0405739	0.0393314	0.0388610	0.0392213	0.0404801	0.0427210	0.0460513	0.0506114	0.0565866
                    -2	0.0282363	0.0261938	0.0244457	0.0230256	0.0219645	0.0212919	0.0210372	0.0212323	0.0219137	0.0231269	0.0249297	0.0273983	0.0306329
                    1	0.0250490	0.0232371	0.0216863	0.0204265	0.0194852	0.0188885	0.0186626	0.0188356	0.0194402	0.0205163	0.0221157	0.0243056	0.0271752
                    4	0.0377407	0.0350107	0.0326742	0.0307761	0.0293578	0.0284588	0.0281184	0.0283791	0.0292900	0.0309114	0.0333211	0.0366206	0.0409441
                    7	0.0693946	0.0643750	0.0600788	0.0565887	0.0539809	0.0523278	0.0517020	0.0521813	0.0538561	0.0568375	0.0612681	0.0673351	0.0752847
                    10	0.1307911	0.1213303	0.1132331	0.1066552	0.1017402	0.0986245	0.0974450	0.0983484	0.1015050	0.1071241	0.1154748	0.1269094	0.1418924
                    13	0.2369023	0.2197660	0.2050995	0.1931849	0.1842823	0.1786389	0.1765024	0.1781388	0.1838563	0.1940342	0.2091598	0.2298714	0.2570102
                    16	0.4014842	0.3724430	0.3475873	0.3273953	0.3123077	0.3027439	0.2991230	0.3018963	0.3115858	0.3288347	0.3544684	0.3895688	0.4355616
                    19	0.6314845	0.5858062	0.5467113	0.5149518	0.4912210	0.4761783	0.4704830	0.4748451	0.4900855	0.5172158	0.5575344	0.6127430	0.6850839
                    22	0.9142304	0.8480998	0.7915002	0.7455205	0.7111643	0.6893861	0.6811409	0.6874561	0.7095203	0.7487981	0.8071694	0.8870975	0.9918288
                    25	1.1253796	1.0439756	0.9743040	0.9177047	0.8754137	0.8486057	0.8384561	0.8462299	0.8733901	0.9217394	0.9935920	1.0919802	1.2209002
                    40	1.7398150	1.6139660	1.5062550	1.4187537	1.3533726	1.3119279	1.2962369	1.3082550	1.3502441	1.4249912	1.5360739	1.6881801	1.8874879
                    55	2.2896972	2.1240726	1.9823186	1.8671619	1.7811165	1.7265730	1.7059227	1.7217392	1.7769993	1.8753709	2.0215621	2.2217427	2.4840432
                    60	2.4091215	2.2348584	2.0857110	1.9645480	1.8740147	1.8166263	1.7948989	1.8115404	1.8696828	1.9731851	2.1270013	2.3376227	2.6136041
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                </tableData>
            </table>
        </function>
        <function name="aero/coefficients/DCdRamp">
            <description>Cd increment due to ramps, NASA TP-3627, p14 Figure 10</description>
            <product>
                <property>propulsion/inlet/ramp1-position-norm</property>
                <table>
                    <independentVar lookup="row">aero/alpha-deg</independentVar>
                    <tableData>
                        -5		-0.00049713
                        1.25		 0.00100614
                        7.5		 0.00670196
                        13.75		 0.01263050
                        20		 0.01632770
                    </tableData>
                </table>
            </product>
        </function>

        <function name="aero/coefficients/DCdCFT">
            <description>Cd increment due to conformal tanks</description>
            <product>
                <property>propulsion/cft</property>
                <table>
                    <independentVar lookup="row">aero/alpha-deg</independentVar>
                    <tableData>
                         -30	0.0044058
                         -20	0.0033306
                         -15	0.0024402
                         -10	0.0028182
                          -5	0.0026628
                           0	0.0026544
                           5	0.002709
                          10	0.0028434
                          15	0.0035868
                          20	0.003826074
                          23	0.0030324
                          25	0.003717
                          26	0.0029316
                          30	0.0064554
                          35	0.0091056
                          40	0.0105882
                          50	0.0133644
                          60	0.01467228
                    </tableData>
                </table>
            </product>
        </function>

        <function name="aero/coefficients/DCdGE">
            <description>Delta drag due ground effect, NASA-TM-104278, p228</description>
                <table>
                    <independentVar lookup="row">position/h-agl-ft</independentVar>
                    <independentVar lookup="column">velocities/w-aero-fps</independentVar>
                    <tableData>
                                 0.7         6.5
                         0  	0.014888	0.040409
                         1  	0.012193	0.033129
                         3  	0.010844	0.029238
                         4  	0.009267	0.021686
                         6  	0.007690	0.015870
                         8  	0.006561	0.011991
                         9  	0.005545	0.009817
                        11  	0.004191	0.007486
                        13  	0.003286	0.006122
                        16  	0.002598	0.004051
                        18  	0.002024	0.002685
                        22  	0.001558	0.001590
                        25  	0.001093	0.000981
                        27  	0.000744	0.000744
                        29  	0.000000	0.000000
                    </tableData>
                </table>
        </function>


        <function name="aero/coefficients/CFZB">
            <description>BASIC LIFT</description>
                <table>
                    <independentVar lookup="row">aero/alpha-deg</independentVar>
                    <independentVar lookup="column">fcs/elevator-pos-deg</independentVar>
                    <tableData>
                        -30	        -25	        -20	        -15	        -10	         -5	          0	          5	         10	         15	         20	         25	         30
                        -20	-1.18316951	-1.15605351	-1.12739696	-1.09719988	-1.06546225	-1.03218409	-0.99736539	-0.96100615	-0.92310637	-0.88366606	-0.84268520	-0.80016381	-0.75610188
                        -17	-1.10450973	-1.07739372	-1.04873718	-1.01854009	-0.98680247	-0.95352431	-0.91870561	-0.88234637	-0.84444659	-0.80500628	-0.76402542	-0.72150403	-0.67744210
                        -14	-0.99198714	-0.96487113	-0.93621458	-0.90601750	-0.87427988	-0.84100171	-0.80618301	-0.76982378	-0.73192400	-0.69248368	-0.65150283	-0.60898144	-0.56491950
                        -11	-0.85172121	-0.82460520	-0.79594865	-0.76575157	-0.73401394	-0.70073578	-0.66591708	-0.62955784	-0.59165806	-0.55221775	-0.51123689	-0.46871550	-0.42465357
                        -8	-0.68948059	-0.66236458	-0.63370803	-0.60351095	-0.57177333	-0.53849516	-0.50367646	-0.46731722	-0.42941745	-0.38997713	-0.34899628	-0.30647488	-0.26241295
                        -5	-0.51068313	-0.48356712	-0.45491058	-0.42471349	-0.39297587	-0.35969771	-0.32487901	-0.28851977	-0.25061999	-0.21117967	-0.17019882	-0.12767743	-0.08361550
                        -2	-0.32039586	-0.29327985	-0.26462331	-0.23442622	-0.20268860	-0.16941044	-0.13459174	-0.09823250	-0.06033272	-0.02089240	 0.02008845	 0.06260984	 0.10667177
                        1	-0.12333500	-0.09621899	-0.06756244	-0.03736536	-0.00562773	 0.02765043	 0.06246913	 0.09882837	 0.13672815	 0.17616846	 0.21714932	 0.25967071	 0.30373264
                        4	 0.07613406	 0.10325007	 0.13190662	 0.16210370	 0.19384133	 0.22711949	 0.26193819	 0.29829743	 0.33619721	 0.37563752	 0.41661838	 0.45913977	 0.50320170
                        7	 0.27399673	 0.30111274	 0.32976929	 0.35996637	 0.39170399	 0.42498216	 0.45980086	 0.49616009	 0.53405987	 0.57350019	 0.61448104	 0.65700243	 0.70106437
                        10	 0.46658923	 0.49370524	 0.52236179	 0.55255887	 0.58429649	 0.61757466	 0.65239336	 0.68875259	 0.72665237	 0.76609269	 0.80707354	 0.84959493	 0.89365686
                        13	 0.65059860	 0.67771461	 0.70637116	 0.73656824	 0.76830586	 0.80158403	 0.83640273	 0.87276197	 0.91066174	 0.95010206	 0.99108291	 1.03360431	 1.07766624
                        16	 0.82306270	 0.85017871	 0.87883525	 0.90903234	 0.94076996	 0.97404812	 1.00886682	 1.04522606	 1.08312584	 1.12256616	 1.16354701	 1.20606840	 1.25013033
                        19	 0.98137019	 1.00848620	 1.03714275	 1.06733983	 1.09907745	 1.13235562	 1.16717432	 1.20353355	 1.24143333	 1.28087365	 1.32185450	 1.36437589	 1.40843783
                        22	 1.12326056	 1.15037656	 1.17903311	 1.20923020	 1.24096782	 1.27424598	 1.30906468	 1.34542392	 1.38332370	 1.42276401	 1.46374487	 1.50626626	 1.55032819
                        25	 1.24682409	 1.27394010	 1.30259665	 1.33279373	 1.36453135	 1.39780952	 1.43262822	 1.46898746	 1.50688723	 1.54632755	 1.58730840	 1.62982979	 1.67389173
                        40	 1.54745660	 1.57457260	 1.60322915	 1.63342623	 1.66516386	 1.69844202	 1.73326072	 1.76961996	 1.80751974	 1.84696005	 1.88794091	 1.93046230	 1.97452423
                        55	 1.30518050	 1.33229651	 1.36095305	 1.39115014	 1.42288776	 1.45616592	 1.49098462	 1.52734386	 1.56524364	 1.60468396	 1.64566481	 1.68818620	 1.73224813
                        60	 1.12441409	 1.15153009	 1.18018664	 1.21038373	 1.24212135	 1.27539951	 1.31021821	 1.34657745	 1.38447723	 1.42391754	 1.46489840	 1.50741979	 1.55148172
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                    </tableData>
                </table>
        </function>
        <function name="aero/coefficients/ClMach">
            <description>Lift Mach factor (NASA-TM-84643 Figure 3 Clalpha) and values for AOA derived from NASA-aaia-2000-0900 Figure 4</description>
                <table>
                    <independentVar lookup="row">velocities/mach</independentVar>
                    <tableData>
                    0.00	0.970823
                    0.05	0.986678
                    0.20	0.990755
                    0.35	0.975057
                    0.50	0.985522
                    0.65	1.031429
                    0.98	2.401153
                    1.10	2.584163
                    1.25	2.500102
                    1.40	2.404051
                    1.55	2.296837
                    1.70	2.210755
                    1.85	2.118265
                    2.00	2.009633
                    2.15	1.913582
                    2.30	1.820163
                    2.45	1.698551
                    2.60	1.602571
                    2.75	1.508918
                    2.90	1.399908
                    3.00	1.325949
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                    </tableData>
                </table>
        </function>
        <function name="aero/coefficients/DClRamp">
            <description>Cl increment due to ramps, NASA TP-3627, p14 Figure 10</description>
            <product>
                <property>propulsion/inlet/ramp1-position-norm</property>
                <table>
                    <independentVar lookup="row">aero/alpha-deg</independentVar>
                    <tableData>
                        -5		 0.00005593
                        1.25		-0.00001055
                        7.5		 0.00009866
                        13.75		 0.00062220
                        20		 0.00125403
                    </tableData>
                </table>
            </product>
        </function>
        <function name="aero/coefficients/DClGE">
            <description>Delta Cl due ground effect, NASA-TM-104278, p228</description>
                <table>
                    <independentVar lookup="row">position/h-agl-ft</independentVar>
                    <independentVar lookup="column">velocities/w-aero-fps</independentVar>
                    <tableData>
                                        0.7         6.5
                             0  	0.1039090	0.0734851
                             3  	0.0844895	0.0604182
                             5  	0.0669446	0.0510854
                             7  	0.0542444	0.0426352
                            10  	0.0419074	0.0343156
                            13  	0.0310507	0.0258929
                            16  	0.0209326	0.0175744
                            20  	0.0119226	0.0113901
                            23  	0.0081328	0.0079730
                            26  	0.0054696	0.0055229
                            29  	0.0035576	0.0035576
                            31  	0.0027785	0.0028405
                            33  	0.0012513	0.0012513
                            34  	0.0001122	0.0002520
                            50  	0.0         0.0
                    </tableData>
                </table>
        </function>

        <function name="aero/coefficients/CMM1">
            <description>BASIC PITCHING MOMENT - CM</description>
                <table>
                    <independentVar lookup="row">aero/alpha-deg</independentVar>
                    <independentVar lookup="column">fcs/elevator-pos-deg</independentVar>
                    <tableData>
                        -30	        -25	        -20	        -15	        -10	         -5	          0	          5	         10	         15	         20	         25	         30
                        -20	 0.45952289	 0.37945456	 0.31014266	 0.24943593	 0.19518306	 0.14523277	 0.09743376	 0.04963476	-0.00031553	-0.05456840	-0.11527513	-0.18458703	-0.26465536
                        -17	 0.38937924	 0.31040985	 0.24219691	 0.18258912	 0.12943520	 0.08058386	 0.03388381	-0.01281625	-0.06166759	-0.11482151	-0.17442930	-0.24264224	-0.32161163
                        -14	 0.35515436	 0.27728392	 0.21016993	 0.15166109	 0.09960612	 0.05185372	 0.00625262	-0.03934849	-0.08710088	-0.13915585	-0.19766469	-0.26477869	-0.34264913
                        -11	 0.34125892	 0.26448743	 0.19847238	 0.14106249	 0.09010647	 0.04345302	-0.00104913	-0.04555129	-0.09220473	-0.14316076	-0.20057065	-0.26658570	-0.34335719
                        -8	 0.33670631	 0.26103376	 0.19611767	 0.13980672	 0.08994965	 0.04439515	 0.00099194	-0.04241126	-0.08796576	-0.13782283	-0.19413378	-0.25904987	-0.33472242
                        -5	 0.33416405	 0.25959045	 0.19577330	 0.14056131	 0.09180318	 0.04734764	 0.00504338	-0.03726088	-0.08171643	-0.13047456	-0.18568655	-0.24950370	-0.32407729
                        -2	 0.32912996	 0.25565532	 0.19293712	 0.13882407	 0.09116489	 0.04780829	 0.00660298	-0.03460233	-0.07795893	-0.12561810	-0.17973115	-0.24244935	-0.31592400
                        1	 0.31922512	 0.24684942	 0.18523016	 0.13221607	 0.08565584	 0.04339819	 0.00329183	-0.03681454	-0.07907219	-0.12563242	-0.17864651	-0.24026576	-0.31264146
                        4	 0.30359561	 0.23231886	 0.17179856	 0.11988341	 0.07442213	 0.03326342	-0.00574399	-0.04475140	-0.08591010	-0.13137139	-0.18328653	-0.24380684	-0.31508359
                        7	 0.28241528	 0.21223748	 0.15281613	 0.10199993	 0.05763759	 0.01757784	-0.02033062	-0.05823909	-0.09829884	-0.14266118	-0.19347737	-0.25289873	-0.32307653
                        10	 0.25648135	 0.18740250	 0.12908009	 0.07936284	 0.03609945	-0.00286135	-0.03967087	-0.07648038	-0.11544119	-0.15870457	-0.20842182	-0.26674423	-0.33582308
                        13	 0.22689504	 0.15891513	 0.10169167	 0.05307337	 0.01090894	-0.02695292	-0.06266349	-0.09837406	-0.13623591	-0.17840035	-0.22701865	-0.28424211	-0.35222201
                        16	 0.19481928	 0.12793833	 0.07181382	 0.02429446	-0.01677102	-0.05353393	-0.08814555	-0.12275717	-0.15952008	-0.20058556	-0.24810492	-0.30422943	-0.37111038
                        19	 0.16130552	 0.09552351	 0.04049795	-0.00592245	-0.04588899	-0.08155295	-0.11506562	-0.14857829	-0.18424225	-0.22420879	-0.27062919	-0.32565476	-0.39143676
                        22	 0.12718163	 0.06249857	 0.00857196	-0.03674949	-0.07561708	-0.11018209	-0.14259582	-0.17500954	-0.20957455	-0.24844214	-0.29376360	-0.34769021	-0.41237327
                        25	 0.09299310	 0.02940899	-0.02341868	-0.06764118	-0.10540982	-0.13887589	-0.17019066	-0.20150543	-0.23497150	-0.27274014	-0.31696265	-0.36979031	-0.43337442
                        40	-0.07846087	-0.13655023	-0.18388315	-0.22261092	-0.25488482	-0.28285614	-0.30867617	-0.33449620	-0.36246752	-0.39474142	-0.43346918	-0.48080210	-0.53889147
                        55	-0.27682069	-0.32941531	-0.37125349	-0.40448651	-0.43126567	-0.45374224	-0.47406753	-0.49439282	-0.51686940	-0.54364855	-0.57688157	-0.61871975	-0.67131438
                        60	-0.34713052	-0.39789356	-0.43790016	-0.46930160	-0.49424917	-0.51489417	-0.53338787	-0.55188158	-0.57252658	-0.59747415	-0.62887559	-0.66888219	-0.71964523
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                    </tableData>
                </table>
        </function>
        <function name="aero/coefficients/CMMach">
            <description>Pitch Mach factor (NASA-TM-84643 Figure 3 Clalpha) and values for AOA derived from NASA-aaia-2000-0900 Figure 4</description>
                <table>
                    <independentVar lookup="row">velocities/mach</independentVar>
                    <tableData>
                    0.00	0.970823
                    0.05	0.986678
                    0.20	0.990755
                    0.35	0.975057
                    0.50	0.985522
                    0.65	1.031429
                    0.98	2.401153
                    1.10	2.584163
                    1.25	2.500102
                    1.40	2.404051
                    1.55	2.296837
                    1.70	2.210755
                    1.85	2.118265
                    2.00	2.009633
                    2.15	1.913582
                    2.30	1.820163
                    2.45	1.698551
                    2.60	1.602571
                    2.75	1.508918
                    2.90	1.399908
                    3.00	1.325949
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                    </tableData>
                </table>
        </function>
        <function name="aero/coefficients/CMMQ">
            <description>PITCH DAMPING DERIVATIVE - CMQ</description>
            <product>
                <property>aero/qb</property>
                <table>
                    <independentVar lookup="row">aero/alpha-deg</independentVar>
                    <tableData>
                        -19		 1.28046091
                        -18		 0.06779284
                        -15		-10.63663459
                        -12		-11.98901285
                        -9		-5.14643535
                        -6		-1.73694028
                        -3		-3.03302745
                        0		-4.33509000
                        3		-4.19691715
                        6		-3.92979167
                        9		-4.14194274
                        12		-5.95197929
                        15		-9.31395430
                        18		-8.60337414
                        21		-5.54389229
                        24		-3.26850300
                        35		-14.05390898
                        50		-5.06625000
                        60		-4.89707200
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                    </tableData>
                </table>
            </product>
        </function>
        <function name="aero/coefficients/DCMRamp">
            <description>CM increment due to ramps, NASA TP-3627, p14 Figure 10</description>
            <product>
                <property>propulsion/inlet/ramp1-position-norm</property>
                <table>
                    <independentVar lookup="row">aero/alpha-deg</independentVar>
                    <tableData>
                        -5		-0.00197787
                        1.25		 0.00134069
                        7.5		 0.00981163
                        13.75		 0.02150840
                        20		 0.03194620
                    </tableData>
                </table>
            </product>
        </function>

        <function name="aero/coefficients/DCMGE">
            <description>Delta pitch moment due ground effect, NASA-TM-104278, p228</description>
                <table>
                    <independentVar lookup="row">position/h-agl-ft</independentVar>
                    <independentVar lookup="column">velocities/w-aero-fps</independentVar>
                    <independentVar lookup="table">fcs/flap-pos-deg</independentVar>
                    <tableData breakPoint="0">
                                   0.7         6.5
                         0.0	-0.014767	-0.007937
                         0.1	-0.014690	-0.007912
                         0.4	-0.014111	-0.007729
                         1.6	-0.012123	-0.007099
                         3.7	-0.009725	-0.006025
                         6.4	-0.007056	-0.004666
                         8.4	-0.005538	-0.003887
                        10.1	-0.004577	-0.003312
                        11.3	-0.004206	-0.003037
                        13.7	-0.003450	-0.002503
                        14.7	-0.003087	-0.002366
                        16.1	-0.002625	-0.002184
                        19.0	-0.001958	-0.001755
                        23.2	-0.001214	-0.000968
                        26.9	-0.000605	-0.000741
                        28.6	-0.000350	-0.000355
                        36.6	-0.000127	-0.000125
                        50  	0.0         0.0
                    </tableData>
                    <tableData breakPoint="35">
                                   0.7         6.5
                         0.0	-0.054720	-0.054720
                         0.1	-0.035523	-0.035523
                         0.4	-0.031475	-0.031475
                         1.6	-0.026647	-0.026647
                         3.7	-0.020908	-0.020908
                         6.4	-0.013864	-0.013864
                         8.4	-0.011128	-0.011128
                        10.1	-0.008522	-0.008522
                        11.3	-0.006567	-0.006567
                        13.7	-0.004485	-0.004485
                        14.7	-0.003182	-0.003182
                        16.1	-0.002403	-0.002403
                        19.0	-0.001760	-0.001760
                        23.2	-0.001121	-0.001121
                        26.9	-0.000741	-0.000741
                        28.6	-0.000224	-0.000224
                        36.6	-0.000120	-0.000120
                        50  	0.0         0.0
                    </tableData>
                </table>
        </function>

        <function name="aero/coefficients/CLMach">
            <description>Roll Mach factor (NASA-TM-84643 Figure 3 Clalpha) and values for AOA derived from NASA-aaia-2000-0900 Figure 4</description>
                <table>
                    <independentVar lookup="row">velocities/mach</independentVar>
                    <tableData>
                    0.00	0.970823
                    0.05	0.986678
                    0.20	0.990755
                    0.35	0.975057
                    0.50	0.985522
                    0.65	1.031429
                    0.98	2.401153
                    1.10	2.584163
                    1.25	2.500102
                    1.40	2.404051
                    1.55	2.296837
                    1.70	2.210755
                    1.85	2.118265
                    2.00	2.009633
                    2.15	1.913582
                    2.30	1.820163
                    2.45	1.698551
                    2.60	1.602571
                    2.75	1.508918
                    2.90	1.399908
                    3.00	1.325949
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                    </tableData>
                </table>
        </function>
        <function name="aero/coefficients/CML1">
            <description>BASIC ROLLING MOMENT - CL(BETA)</description>
                <table>
                    <independentVar lookup="row">aero/alpha-deg</independentVar>
                    <independentVar lookup="column">aero/beta-deg</independentVar>
                    <tableData>
                        -20	        -15	        -10	         -5	          0	          1	          2	          3	          4	          9	         14	         19
                        -20	 0.00469432	-0.00012868	-0.00490692	-0.00962738	 0.00000000	 0.01335341	 0.01242651	 0.01149647	 0.01056339	 0.00585605	 0.00108833	-0.00372676
                        -17	 0.00614262	 0.00104818	-0.00400149	-0.00899339	 0.00000000	 0.01293657	 0.01195538	 0.01097106	 0.00998369	 0.00500491	-0.00003425	-0.00512078
                        -14	 0.00922801	 0.00386213	-0.00145898	-0.00672231	 0.00000000	 0.01088264	 0.00984717	 0.00880855	 0.00776690	 0.00251668	-0.00279391	-0.00815187
                        -11	 0.01324756	 0.00761025	 0.00201771	-0.00351706	 0.00000000	 0.00789454	 0.00680478	 0.00571188	 0.00461594	-0.00090571	-0.00648774	-0.01211714
                        -8	 0.01765672	 0.01174797	 0.00588399	 0.00007779	 0.00000000	 0.00451684	 0.00337279	 0.00222561	 0.00107538	-0.00471771	-0.01057118	-0.01647201
                        -5	 0.02204859	 0.01586841	 0.00973299	 0.00365535	 0.00000000	 0.00115642	-0.00004191	-0.00124339	-0.00244790	-0.00851243	-0.01463733	-0.02080960
                        -2	 0.02613460	 0.01968298	 0.01327612	 0.00692705	 0.00000000	-0.00189812	-0.00315074	-0.00440651	-0.00566531	-0.01200127	-0.01839761	-0.02484132
                        1	 0.02972632	 0.02300327	 0.01632498	 0.00970447	 0.00000000	-0.00445839	-0.00576530	-0.00707535	-0.00838844	-0.01499584	-0.02166361	-0.02837875
                        4	 0.03271872	 0.02572422	 0.01877450	 0.01188255	 0.00000000	-0.00641933	-0.00778052	-0.00914486	-0.01051224	-0.01739107	-0.02433028	-0.03131686
                        7	 0.03507449	 0.02780857	 0.02058741	 0.01342402	 0.00000000	-0.00774365	-0.00915913	-0.01057776	-0.01199942	-0.01914969	-0.02636034	-0.03361835
                        10	 0.03680983	 0.02927247	 0.02177987	 0.01434505	 0.00000000	-0.00844753	-0.00991730	-0.01139021	-0.01286616	-0.02028787	-0.02776995	-0.03529940
                        13	 0.03798129	 0.03017249	 0.02240846	 0.01470220	 0.00000000	-0.00858754	-0.01011159	-0.01163879	-0.01316903	-0.02086217	-0.02861569	-0.03641658
                        16	 0.03867403	 0.03059379	 0.02255833	 0.01458063	 0.00000000	-0.00824882	-0.00982716	-0.01140865	-0.01299317	-0.02095775	-0.02898270	-0.03705503
                        19	 0.03899119	 0.03063952	 0.02233261	 0.01408349	 0.00000000	-0.00753452	-0.00916715	-0.01080292	-0.01244174	-0.02067775	-0.02897414	-0.03731790
                        22	 0.03904457	 0.03042147	 0.02184313	 0.01332256	 0.00000000	-0.00655645	-0.00824337	-0.00993343	-0.01162653	-0.02013398	-0.02870180	-0.03731700
                        25	 0.03894653	 0.03005199	 0.02120222	 0.01241022	 0.00000000	-0.00542695	-0.00716816	-0.00891251	-0.01065989	-0.01943878	-0.02827804	-0.03716467
                        40	 0.03938858	 0.02913686	 0.01892990	 0.00878072	 0.00000000	-0.00071172	-0.00272436	-0.00474014	-0.00675896	-0.01689503	-0.02709147	-0.03733528
                        55	 0.04457298	 0.03296408	 0.02139994	 0.00989358	 0.00000000	-0.00073883	-0.00302291	-0.00531013	-0.00760039	-0.01909363	-0.03064725	-0.04224824
                        60	 0.04674521	 0.03468392	 0.02266739	 0.01070864	 0.00000000	-0.00119197	-0.00356653	-0.00594423	-0.00832496	-0.02027060	-0.03227661	-0.04432999
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                    </tableData>
                </table>
        </function>
        <function name="aero/coefficients/CMLDAD">
            <description>ROLLING MOMENT DUE TO AILERON DEFLECTION (CLDA)</description>
            <product>
                <property>fcs/aileron-pos-deg</property>
                <table>
                    <independentVar lookup="row">aero/alpha-deg</independentVar>
                    <independentVar lookup="column">fcs/elevator-pos-deg</independentVar>
                    <tableData>
                                -30	        -25	        -20	        -15	        -10	         -5	          0	          5	         10	         15	         20	         25	         30
                    -20	 0.00553617	 0.00553618	 0.00553619	 0.00553620	 0.00553621	 0.00553622	 0.00553624	 0.00553625	 0.00553626	 0.00553627	 0.00553628	 0.00553629	 0.00553630
                    -17	 0.00544789	 0.00544791	 0.00544792	 0.00544794	 0.00544795	 0.00544797	 0.00544798	 0.00544800	 0.00544801	 0.00544803	 0.00544804	 0.00544806	 0.00544807
                    -14	 0.00546527	 0.00546529	 0.00546531	 0.00546532	 0.00546534	 0.00546536	 0.00546538	 0.00546540	 0.00546541	 0.00546543	 0.00546545	 0.00546547	 0.00546549
                    -11	 0.00553391	 0.00553393	 0.00553395	 0.00553397	 0.00553399	 0.00553401	 0.00553404	 0.00553406	 0.00553408	 0.00553410	 0.00553412	 0.00553414	 0.00553416
                     -8	 0.00561676	 0.00561678	 0.00561681	 0.00561683	 0.00561686	 0.00561688	 0.00561691	 0.00561693	 0.00561696	 0.00561698	 0.00561701	 0.00561703	 0.00561706
                     -5	 0.00569048	 0.00569050	 0.00569053	 0.00569056	 0.00569059	 0.00569062	 0.00569065	 0.00569067	 0.00569070	 0.00569073	 0.00569076	 0.00569079	 0.00569082
                     -2	 0.00574223	 0.00574226	 0.00574229	 0.00574233	 0.00574236	 0.00574239	 0.00574242	 0.00574245	 0.00574248	 0.00574252	 0.00574255	 0.00574258	 0.00574261
                      1	 0.00576698	 0.00576702	 0.00576705	 0.00576709	 0.00576712	 0.00576716	 0.00576720	 0.00576723	 0.00576727	 0.00576730	 0.00576734	 0.00576737	 0.00576741
                      4	 0.00576518	 0.00576522	 0.00576526	 0.00576530	 0.00576533	 0.00576537	 0.00576541	 0.00576545	 0.00576549	 0.00576553	 0.00576557	 0.00576560	 0.00576564
                      7	 0.00574081	 0.00574085	 0.00574090	 0.00574094	 0.00574098	 0.00574102	 0.00574106	 0.00574111	 0.00574115	 0.00574119	 0.00574123	 0.00574127	 0.00574132
                     10	 0.00569986	 0.00569990	 0.00569995	 0.00569999	 0.00570004	 0.00570008	 0.00570013	 0.00570018	 0.00570022	 0.00570027	 0.00570031	 0.00570036	 0.00570040
                     13	 0.00564904	 0.00564909	 0.00564914	 0.00564918	 0.00564923	 0.00564928	 0.00564933	 0.00564938	 0.00564943	 0.00564948	 0.00564953	 0.00564958	 0.00564963
                     16	 0.00559487	 0.00559493	 0.00559498	 0.00559503	 0.00559508	 0.00559514	 0.00559519	 0.00559524	 0.00559529	 0.00559534	 0.00559540	 0.00559545	 0.00559550
                     19	 0.00554300	 0.00554306	 0.00554312	 0.00554317	 0.00554323	 0.00554328	 0.00554334	 0.00554340	 0.00554345	 0.00554351	 0.00554356	 0.00554362	 0.00554367
                     22	 0.00549776	 0.00549782	 0.00549788	 0.00549794	 0.00549800	 0.00549806	 0.00549812	 0.00549818	 0.00549823	 0.00549829	 0.00549835	 0.00549841	 0.00549847
                     25	 0.00546193	 0.00546199	 0.00546205	 0.00546212	 0.00546218	 0.00546224	 0.00546231	 0.00546237	 0.00546243	 0.00546249	 0.00546256	 0.00546262	 0.00546268
                     40	 0.00541929	 0.00541937	 0.00541945	 0.00541953	 0.00541961	 0.00541969	 0.00541977	 0.00541985	 0.00541993	 0.00542001	 0.00542009	 0.00542017	 0.00542025
                     55	 0.00538792	 0.00538802	 0.00538811	 0.00538821	 0.00538831	 0.00538840	 0.00538850	 0.00538860	 0.00538870	 0.00538879	 0.00538889	 0.00538899	 0.00538908
                     60	 0.00534524	 0.00534534	 0.00534545	 0.00534555	 0.00534565	 0.00534575	 0.00534586	 0.00534596	 0.00534606	 0.00534617	 0.00534627	 0.00534637	 0.00534647
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                    </tableData>
                </table>
            </product>
        </function>
        <function name="aero/coefficients/CMLDCLB">
            <description>DELTA CLB DUE TO 2-PLACE CANOPY</description>
            <product>
                <property>aero/beta-deg</property>
                <property>metrics/two-place-canopy</property>
                <table>
                    <independentVar lookup="row">aero/alpha-deg</independentVar>
                    <tableData>
                        -20		-0.00006000
                        -19		-0.00006000
                        -16		-0.00006000
                        -13		-0.00006000
                        -10		-0.00006000
                        -7		-0.00006000
                        -4		-0.00006000
                        -1		-0.00006000
                        2		-0.00005556
                        5		-0.00003743
                        8		-0.00001556
                        11		-0.00000118
                        14		 0.00000000
                        17		 0.00000000
                        20		 0.00000000
                        23		 0.00000000
                        30		 0.00000000
                        45		 0.00000000
                        60		 0.00000000
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                    </tableData>
                </table>
            </product>
        </function>
        <function name="aero/coefficients/CMLDRD">
            <description>ROLLING MOMENT DUE TO RUDDER DEFLECTION -(CLD)</description>
            <product>
                <property>fcs/rudder-pos-deg</property>
                <value>
                    0.85 <!-- DRFLX1 -->
                </value>
                <property>aero/coefficients/EPA43</property>
                <table>
                    <independentVar lookup="row">aero/alpha-deg</independentVar>
                    <independentVar lookup="column">fcs/rudder-pos-deg</independentVar>
                    <tableData>
                        -30	        -25	        -20	        -15	        -10	         -5	          0	          1	          2	          3	          4	          9	         14	         19	         24	         29
                        -20	 0.00003464	 0.00004739	 0.00005451	 0.00005664	 0.00005443	 0.00004851	 0.00003953	 0.00003742	 0.00003522	 0.00003294	 0.00003057	 0.00001771	 0.00000358	-0.00001116	-0.00002587	-0.00003991
                        -17	-0.00004247	-0.00002804	-0.00001924	-0.00001542	-0.00001596	-0.00002020	-0.00002750	-0.00002927	-0.00003113	-0.00003308	-0.00003511	-0.00004629	-0.00005874	-0.00007180	-0.00008483	-0.00009719
                        -14	-0.00003675	-0.00002064	-0.00001016	-0.00000466	-0.00000352	-0.00000608	-0.00001170	-0.00001313	-0.00001466	-0.00001627	-0.00001796	-0.00002747	-0.00003823	-0.00004961	-0.00006096	-0.00007164
                        -11	 0.00000044	 0.00001824	 0.00003040	 0.00003757	 0.00004040	 0.00003952	 0.00003558	 0.00003449	 0.00003330	 0.00003202	 0.00003066	 0.00002284	 0.00001376	 0.00000406	-0.00000561	-0.00001461
                        -8	 0.00003883	 0.00005831	 0.00007215	 0.00008100	 0.00008551	 0.00008631	 0.00008406	 0.00008329	 0.00008244	 0.00008150	 0.00008048	 0.00007434	 0.00006694	 0.00005892	 0.00005093	 0.00004361
                        -5	 0.00006345	 0.00008461	 0.00010013	 0.00011067	 0.00011686	 0.00011934	 0.00011877	 0.00011834	 0.00011782	 0.00011722	 0.00011653	 0.00011207	 0.00010635	 0.00010002	 0.00009371	 0.00008807
                        -2	 0.00006989	 0.00009273	 0.00010994	 0.00012215	 0.00013002	 0.00013419	 0.00013529	 0.00013520	 0.00013502	 0.00013475	 0.00013441	 0.00013162	 0.00012758	 0.00012293	 0.00011830	 0.00011435
                        1	 0.00006037	 0.00008489	 0.00010378	 0.00011767	 0.00012722	 0.00013307	 0.00013586	 0.00013610	 0.00013626	 0.00013633	 0.00013632	 0.00013522	 0.00013286	 0.00012988	 0.00012694	 0.00012466
                        4	 0.00004067	 0.00006687	 0.00008744	 0.00010301	 0.00011424	 0.00012177	 0.00012624	 0.00012682	 0.00012731	 0.00012772	 0.00012804	 0.00012862	 0.00012794	 0.00012665	 0.00012539	 0.00012479
                        7	 0.00001775	 0.00004563	 0.00006787	 0.00008513	 0.00009804	 0.00010725	 0.00011340	 0.00011432	 0.00011515	 0.00011589	 0.00011655	 0.00011881	 0.00011981	 0.00012020	 0.00012062	 0.00012170
                        10	-0.00000193	 0.00002763	 0.00005156	 0.00007050	 0.00008509	 0.00009598	 0.00010381	 0.00010507	 0.00010623	 0.00010731	 0.00010830	 0.00011225	 0.00011493	 0.00011700	 0.00011909	 0.00012186
                        13	-0.00001350	 0.00001774	 0.00004335	 0.00006397	 0.00008024	 0.00009281	 0.00010232	 0.00010391	 0.00010541	 0.00010683	 0.00010816	 0.00011378	 0.00011815	 0.00012190	 0.00012568	 0.00013012
                        16	-0.00001434	 0.00001858	 0.00004587	 0.00006818	 0.00008613	 0.00010038	 0.00011157	 0.00011350	 0.00011533	 0.00011708	 0.00011875	 0.00012606	 0.00013210	 0.00013753	 0.00014299	 0.00014912
                        19	-0.00000419	 0.00003042	 0.00005939	 0.00008337	 0.00010300	 0.00011894	 0.00013181	 0.00013407	 0.00013624	 0.00013833	 0.00014033	 0.00014932	 0.00015705	 0.00016416	 0.00017130	 0.00017911
                        22	 0.00001501	 0.00005129	 0.00008194	 0.00010761	 0.00012892	 0.00014654	 0.00016109	 0.00016369	 0.00016620	 0.00016862	 0.00017096	 0.00018163	 0.00019103	 0.00019983	 0.00020865	 0.00021814
                        25	 0.00003958	 0.00007755	 0.00010988	 0.00013722	 0.00016022	 0.00017951	 0.00019575	 0.00019868	 0.00020153	 0.00020429	 0.00020696	 0.00021931	 0.00023040	 0.00024087	 0.00025137	 0.00026255
                        40	 0.00008937	 0.00013574	 0.00017648	 0.00021223	 0.00024363	 0.00027133	 0.00029596	 0.00030058	 0.00030511	 0.00030954	 0.00031390	 0.00033465	 0.00035415	 0.00037303	 0.00039193	 0.00041151
                        55	 0.00006228	 0.00011706	 0.00016620	 0.00021035	 0.00025016	 0.00028626	 0.00031930	 0.00032560	 0.00033181	 0.00033793	 0.00034397	 0.00037312	 0.00040102	 0.00042830	 0.00045561	 0.00048359
                        60	 0.00022739	 0.00028496	 0.00033691	 0.00038386	 0.00042647	 0.00046537	 0.00050122	 0.00050807	 0.00051484	 0.00052152	 0.00052812	 0.00056008	 0.00059078	 0.00062086	 0.00065097	 0.00068175
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                    </tableData>
                </table>
            </product>
        </function>
        <function name="aero/coefficients/CMLDTD">
            <description>ROLLING MOMENT DUE TO DIFFERENTIAL TAIL DEFLECTION - CLDD</description>
            <product>
                <value>
                    0.975 <!-- DTFLX1 -->
                </value>
                <property>fcs/differential-elevator-pos-deg</property>
                <table>
                    <independentVar lookup="row">aero/alpha-deg</independentVar>
                    <independentVar lookup="column">fcs/elevator-pos-deg</independentVar>
                    <tableData>
                        -30	        -25	        -20	        -15	        -10	         -5	          0	          5	         10	         15	         20	         25	         30
                        -20	 0.00002169	 0.00036227	 0.00063181	 0.00079244	 0.00084328	 0.00080929	 0.00073001	 0.00064845	 0.00059987	 0.00060063	 0.00063696	 0.00065382	 0.00054371
                        -11	 0.00000261	 0.00029691	 0.00054624	 0.00070824	 0.00077753	 0.00077453	 0.00073428	 0.00069530	 0.00068832	 0.00072518	 0.00078762	 0.00081608	 0.00069855
                        -2	 0.00003246	 0.00025881	 0.00046545	 0.00060550	 0.00066908	 0.00067209	 0.00064507	 0.00062202	 0.00062917	 0.00067384	 0.00073327	 0.00074338	 0.00058764
                        7	 0.00037594	 0.00051888	 0.00066654	 0.00076754	 0.00080747	 0.00079773	 0.00076435	 0.00073680	 0.00073683	 0.00076723	 0.00080073	 0.00076875	 0.00055025
                        16	 0.00064718	 0.00069748	 0.00077610	 0.00082715	 0.00083170	 0.00079665	 0.00074352	 0.00069728	 0.00067514	 0.00067540	 0.00066628	 0.00057468	 0.00027505
                        25	 0.00074435	 0.00069898	 0.00070471	 0.00070111	 0.00066478	 0.00059808	 0.00051803	 0.00044509	 0.00039195	 0.00035242	 0.00029019	 0.00012766	-0.00026524
                        60	 0.00132301	 0.00099276	 0.00079428	 0.00064961	 0.00051779	 0.00038367	 0.00024671	 0.00010982	-0.00003183	-0.00020198	-0.00045450	-0.00088450	-0.00163960
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                    </tableData>
                </table>
            </product>
        </function>
        <function name="aero/coefficients/CMLP">
            <description>ROLL DAMPING DERIVATIVE - CLP</description>
            <product>
                <property>aero/pb</property>
                <table>
                    <independentVar lookup="row">aero/alpha-deg</independentVar>
                    <tableData>
                        -20		-0.08541388
                        -19		-0.09921293
                        -10		-0.16536625
                        -1		-0.24899556
                        8		-0.23373326
                        17		-0.16351086
                        30		-0.08092988
                        60		-0.32802377
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                    </tableData>
                </table>
            </product>
        </function>
        <function name="aero/coefficients/CMLR">
            <description>ROLLING MOMENT DUE TO YAW RATE - CLR</description>
            <product>
                <property>aero/rb</property>
                <table>
                    <independentVar lookup="row">aero/alpha-deg</independentVar>
                    <tableData>
                        -20		-0.05760685
                        -19		-0.08859624
                        -10		-0.02268499
                        -1		 0.02551353
                        8		 0.13849720
                        17		 0.14832098
                        30		 0.00127235
                        60		 0.02905128
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                    </tableData>
                </table>
            </product>
        </function>
        <function name="aero/coefficients/CFYB">
            <description>BASIC SIDE FORCE</description>
                <table>
                    <independentVar lookup="row">aero/alpha-deg</independentVar>
                    <independentVar lookup="column">aero/beta-deg</independentVar>
                    <independentVar lookup="table">fcs/elevator-pos-deg</independentVar>
                    <tableData breakPoint="-30">
                        -20	       -15	       -10	        -5	         0	         1	         2	         3	         4	         9	        14	        19
                        -20	 0.18323943	 0.12554427	 0.06784919	 0.01015419	 0.00000000	 0.01065652	 0.01389486	 0.01023565	 0.00130726	-0.05631019	-0.11400525	-0.17170039
                        -11	 0.24179168	 0.18319472	 0.12459783	 0.06600101	 0.00000000	-0.00566059	-0.01751880	-0.03370935	-0.05124188	-0.11287846	-0.17147533	-0.23007228
                        -2	 0.29447073	 0.23497196	 0.17547326	 0.11597463	 0.00000000	-0.02023923	-0.04559648	-0.07300276	-0.09824672	-0.16357353	-0.22307221	-0.28257097
                        7	 0.30002997	 0.23962939	 0.17922888	 0.11882845	 0.00000000	-0.02087041	-0.04691011	-0.07497729	-0.10077046	-0.16714879	-0.22754928	-0.28794985
                        16	 0.26877145	 0.20746906	 0.14616674	 0.08486449	 0.00000000	-0.01060353	-0.02731125	-0.04779214	-0.06853823	-0.13390628	-0.19520859	-0.25651096
                        25	 0.22909543	 0.16689123	 0.10468711	 0.04248305	 0.00000000	 0.00215492	-0.00293125	-0.01394035	-0.02835988	-0.09224629	-0.15445040	-0.21665459
                        60	-0.11509199	-0.18080323	-0.24651439	-0.31222548	 0.00000000	 0.10797911	 0.19973839	 0.26809984	 0.30714710	 0.25965662	 0.19394547	 0.12823425
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                    </tableData>
                    <tableData breakPoint="-25">
                        -20	       -15	       -10	        -5	         0	         1	         2	         3	         4	         9	        14	        19
                        -20	 0.18180918	 0.12366139	 0.06551368	 0.00736604	 0.00000000	 0.01158900	 0.01563278	 0.01258725	 0.00402472	-0.05388415	-0.11203184	-0.17017961
                        -11	 0.24102710	 0.18197751	 0.12292799	 0.06387854	 0.00000000	-0.00492515	-0.01615898	-0.03188495	-0.04915281	-0.11111809	-0.17016760	-0.22921718
                        -2	 0.29437182	 0.23442042	 0.17446909	 0.11451783	 0.00000000	-0.01970084	-0.04461476	-0.07170558	-0.09678605	-0.16247884	-0.22243015	-0.28238154
                        7	 0.30059674	 0.23974353	 0.17889039	 0.11803732	 0.00000000	-0.02052906	-0.04630649	-0.07420732	-0.09993818	-0.16671977	-0.22757289	-0.28842609
                        16	 0.27000389	 0.20824887	 0.14649392	 0.08473904	 0.00000000	-0.01045922	-0.02708573	-0.04754939	-0.06833434	-0.13414294	-0.19589787	-0.25765288
                        25	 0.23099355	 0.16833672	 0.10567996	 0.04302327	 0.00000000	 0.00210220	-0.00308384	-0.01422481	-0.02878440	-0.09314862	-0.15580536	-0.21846217
                        60	-0.11060515	-0.17676902	-0.24293281	-0.30909653	 0.00000000	 0.10716013	 0.19811541	 0.26576511	 0.30427883	 0.25616556	 0.19000178	 0.12383793
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                    </tableData>
                    <tableData breakPoint="-20">
                        -20	       -15	       -10	        -5	         0	         1	         2	         3	         4	         9	        14	        19
                        -20	 0.18037893	 0.12177851	 0.06317817	 0.00457790	 0.00000000	 0.01252147	 0.01737071	 0.01493886	 0.00674219	-0.05145811	-0.11005844	-0.16865884
                        -11	 0.24026252	 0.18076030	 0.12125815	 0.06175607	 0.00000000	-0.00418972	-0.01479916	-0.03006056	-0.04706374	-0.10935773	-0.16885986	-0.22836207
                        -2	 0.29427292	 0.23386889	 0.17346493	 0.11306104	 0.00000000	-0.01916244	-0.04363304	-0.07040840	-0.09532537	-0.16138414	-0.22178809	-0.28219211
                        7	 0.30116351	 0.23985767	 0.17855189	 0.11724620	 0.00000000	-0.02018770	-0.04570288	-0.07343736	-0.09910590	-0.16629075	-0.22759651	-0.28890233
                        16	 0.27123633	 0.20902868	 0.14682110	 0.08461359	 0.00000000	-0.01031490	-0.02686022	-0.04730664	-0.06813046	-0.13437959	-0.19658715	-0.25879479
                        25	 0.23289166	 0.16978220	 0.10667281	 0.04356349	 0.00000000	 0.00204948	-0.00323643	-0.01450927	-0.02920891	-0.09405094	-0.15716032	-0.22026976
                        60	-0.10611831	-0.17273481	-0.23935123	-0.30596759	 0.00000000	 0.10634114	 0.19649242	 0.26343037	 0.30141056	 0.25267451	 0.18605810	 0.11944161
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                    </tableData>
                    <tableData breakPoint="-15">
                        -20	       -15	       -10	        -5	         0	         1	         2	         3	         4	         9	        14	        19
                        -20	 0.17894867	 0.11989563	 0.06084265	 0.00178975	 0.00000000	 0.01345395	 0.01910863	 0.01729046	 0.00945965	-0.04903207	-0.10808503	-0.16713806
                        -11	 0.23949795	 0.17954309	 0.11958831	 0.05963360	 0.00000000	-0.00345428	-0.01343934	-0.02823617	-0.04497467	-0.10759736	-0.16755213	-0.22750697
                        -2	 0.29417402	 0.23331735	 0.17246076	 0.11160424	 0.00000000	-0.01862405	-0.04265132	-0.06911123	-0.09386470	-0.16028945	-0.22114603	-0.28200268
                        7	 0.30173028	 0.23997180	 0.17821340	 0.11645507	 0.00000000	-0.01984634	-0.04509926	-0.07266739	-0.09827362	-0.16586173	-0.22762012	-0.28937858
                        16	 0.27246877	 0.20980849	 0.14714827	 0.08448814	 0.00000000	-0.01017058	-0.02663471	-0.04706389	-0.06792657	-0.13461624	-0.19727644	-0.25993671
                        25	 0.23478978	 0.17122768	 0.10766566	 0.04410371	 0.00000000	 0.00199676	-0.00338902	-0.01479373	-0.02963342	-0.09495327	-0.15851527	-0.22207735
                        60	-0.10163147	-0.16870060	-0.23576965	-0.30283864	 0.00000000	 0.10552216	 0.19486944	 0.26109564	 0.29854229	 0.24918346	 0.18211441	 0.11504530
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                    </tableData>
                    <tableData breakPoint="-10">
                        -20	       -15	       -10	        -5	         0	         1	         2	         3	         4	         9	        14	        19
                        -20	 0.17751842	 0.11801275	 0.05850714	-0.00099839	 0.00000000	 0.01438642	 0.02084655	 0.01964206	 0.01217712	-0.04660603	-0.10611162	-0.16561728
                        -11	 0.23873337	 0.17832588	 0.11791847	 0.05751112	 0.00000000	-0.00271885	-0.01207952	-0.02641178	-0.04288560	-0.10583699	-0.16624439	-0.22665187
                        -2	 0.29407511	 0.23276581	 0.17145659	 0.11014744	 0.00000000	-0.01808565	-0.04166961	-0.06781405	-0.09240402	-0.15919475	-0.22050396	-0.28181325
                        7	 0.30229705	 0.24008594	 0.17787491	 0.11566394	 0.00000000	-0.01950499	-0.04449564	-0.07189743	-0.09744134	-0.16543271	-0.22764373	-0.28985482
                        16	 0.27370121	 0.21058830	 0.14747545	 0.08436268	 0.00000000	-0.01002627	-0.02640919	-0.04682113	-0.06772269	-0.13485289	-0.19796572	-0.26107862
                        25	 0.23668789	 0.17267317	 0.10865851	 0.04464393	 0.00000000	 0.00194403	-0.00354160	-0.01507819	-0.03005793	-0.09585559	-0.15987023	-0.22388494
                        60	-0.09714462	-0.16466638	-0.23218807	-0.29970969	 0.00000000	 0.10470317	 0.19324645	 0.25876091	 0.29567402	 0.24569240	 0.17817073	 0.11064898
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                    </tableData>
                    <tableData breakPoint="-5">
                        -20	       -15	       -10	        -5	         0	         1	         2	         3	         4	         9	        14	        19
                        -20	 0.17608817	 0.11612986	 0.05617163	-0.00378654	 0.00000000	 0.01531889	 0.02258448	 0.02199367	 0.01489459	-0.04417999	-0.10413821	-0.16409651
                        -11	 0.23796879	 0.17710867	 0.11624863	 0.05538865	 0.00000000	-0.00198341	-0.01071969	-0.02458739	-0.04079653	-0.10407663	-0.16493666	-0.22579676
                        -2	 0.29397621	 0.23221428	 0.17045242	 0.10869064	 0.00000000	-0.01754725	-0.04068789	-0.06651687	-0.09094335	-0.15810006	-0.21986190	-0.28162382
                        7	 0.30286381	 0.24020008	 0.17753641	 0.11487282	 0.00000000	-0.01916363	-0.04389203	-0.07112746	-0.09660906	-0.16500369	-0.22766734	-0.29033106
                        16	 0.27493365	 0.21136811	 0.14780263	 0.08423723	 0.00000000	-0.00988195	-0.02618368	-0.04657838	-0.06751880	-0.13508955	-0.19865501	-0.26222054
                        25	 0.23858601	 0.17411865	 0.10965136	 0.04518415	 0.00000000	 0.00189131	-0.00369419	-0.01536265	-0.03048244	-0.09675792	-0.16122519	-0.22569253
                        60	-0.09265778	-0.16063217	-0.22860649	-0.29658074	 0.00000000	 0.10388419	 0.19162346	 0.25642617	 0.29280575	 0.24220135	 0.17422704	 0.10625266
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                    </tableData>
                    <tableData breakPoint="0">
                        -20	       -15	       -10	        -5	         0	         1	         2	         3	         4	         9	        14	        19
                        -20	 0.17465792	 0.11424698	 0.05383611	-0.00657468	 0.00000000	 0.01625137	 0.02432240	 0.02434527	 0.01761205	-0.04175395	-0.10216480	-0.16257573
                        -11	 0.23720421	 0.17589146	 0.11457879	 0.05326618	 0.00000000	-0.00124798	-0.00935987	-0.02276300	-0.03870746	-0.10231626	-0.16362892	-0.22494166
                        -2	 0.29387730	 0.23166274	 0.16944826	 0.10723384	 0.00000000	-0.01700886	-0.03970617	-0.06521969	-0.08948267	-0.15700537	-0.21921984	-0.28143439
                        7	 0.30343058	 0.24031421	 0.17719792	 0.11408169	 0.00000000	-0.01882227	-0.04328841	-0.07035750	-0.09577678	-0.16457467	-0.22769095	-0.29080730
                        16	 0.27616610	 0.21214792	 0.14812981	 0.08411178	 0.00000000	-0.00973763	-0.02595816	-0.04633563	-0.06731492	-0.13532620	-0.19934429	-0.26336245
                        25	 0.24048412	 0.17556413	 0.11064422	 0.04572437	 0.00000000	 0.00183859	-0.00384678	-0.01564711	-0.03090695	-0.09766024	-0.16258014	-0.22750012
                        60	-0.08817094	-0.15659796	-0.22502491	-0.29345179	 0.00000000	 0.10306520	 0.19000048	 0.25409144	 0.28993748	 0.23871029	 0.17028336	 0.10185635
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                    </tableData>
                    <tableData breakPoint="5">
                        -20	       -15	       -10	        -5	         0	         1	         2	         3	         4	         9	        14	        19
                        -20	 0.17322767	 0.11236410	 0.05150060	-0.00936283	 0.00000000	 0.01718384	 0.02606032	 0.02669688	 0.02032952	-0.03932791	-0.10019139	-0.16105495
                        -11	 0.23643964	 0.17467426	 0.11290894	 0.05114371	 0.00000000	-0.00051254	-0.00800005	-0.02093860	-0.03661839	-0.10055589	-0.16232119	-0.22408656
                        -2	 0.29377840	 0.23111121	 0.16844409	 0.10577704	 0.00000000	-0.01647046	-0.03872445	-0.06392251	-0.08802200	-0.15591067	-0.21857778	-0.28124495
                        7	 0.30399735	 0.24042835	 0.17685942	 0.11329057	 0.00000000	-0.01848092	-0.04268480	-0.06958753	-0.09494450	-0.16414565	-0.22771456	-0.29128355
                        16	 0.27739854	 0.21292773	 0.14845699	 0.08398632	 0.00000000	-0.00959331	-0.02573265	-0.04609288	-0.06711104	-0.13556285	-0.20003357	-0.26450437
                        25	 0.24238224	 0.17700962	 0.11163707	 0.04626459	 0.00000000	 0.00178587	-0.00399937	-0.01593157	-0.03133146	-0.09856257	-0.16393510	-0.22930771
                        60	-0.08368409	-0.15256375	-0.22144333	-0.29032284	 0.00000000	 0.10224621	 0.18837749	 0.25175671	 0.28706921	 0.23521924	 0.16633967	 0.09746003
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                    </tableData>
                    <tableData breakPoint="10">
                        -20	       -15	       -10	        -5	         0	         1	         2	         3	         4	         9	        14	        19
                        -20	 0.17179742	 0.11048122	 0.04916509	-0.01215097	 0.00000000	 0.01811632	 0.02779825	 0.02904848	 0.02304698	-0.03690187	-0.09821799	-0.15953418
                        -11	 0.23567506	 0.17345705	 0.11123910	 0.04902124	 0.00000000	 0.00022289	-0.00664023	-0.01911421	-0.03452932	-0.09879552	-0.16101345	-0.22323145
                        -2	 0.29367949	 0.23055967	 0.16743992	 0.10432024	 0.00000000	-0.01593207	-0.03774273	-0.06262533	-0.08656132	-0.15481598	-0.21793572	-0.28105552
                        7	 0.30456412	 0.24054249	 0.17652093	 0.11249944	 0.00000000	-0.01813956	-0.04208118	-0.06881757	-0.09411222	-0.16371662	-0.22773817	-0.29175979
                        16	 0.27863098	 0.21370754	 0.14878417	 0.08386087	 0.00000000	-0.00944900	-0.02550713	-0.04585013	-0.06690715	-0.13579950	-0.20072286	-0.26564629
                        25	 0.24428035	 0.17845510	 0.11262992	 0.04680481	 0.00000000	 0.00173315	-0.00415196	-0.01621603	-0.03175597	-0.09946489	-0.16529006	-0.23111529
                        60	-0.07919725	-0.14852954	-0.21786175	-0.28719390	 0.00000000	 0.10142723	 0.18675451	 0.24942197	 0.28420094	 0.23172819	 0.16239599	 0.09306371
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                    </tableData>
                    <tableData breakPoint="15">
                        -20	       -15	       -10	        -5	         0	         1	         2	         3	         4	         9	        14	        19
                        -20	 0.17036717	 0.10859834	 0.04682957	-0.01493912	 0.00000000	 0.01904879	 0.02953617	 0.03140009	 0.02576445	-0.03447583	-0.09624458	-0.15801340
                        -11	 0.23491048	 0.17223984	 0.10956926	 0.04689876	 0.00000000	 0.00095833	-0.00528041	-0.01728982	-0.03244025	-0.09703516	-0.15970572	-0.22237635
                        -2	 0.29358059	 0.23000814	 0.16643575	 0.10286344	 0.00000000	-0.01539367	-0.03676101	-0.06132815	-0.08510065	-0.15372129	-0.21729365	-0.28086609
                        7	 0.30513089	 0.24065663	 0.17618243	 0.11170831	 0.00000000	-0.01779820	-0.04147756	-0.06804760	-0.09327994	-0.16328760	-0.22776178	-0.29223603
                        16	 0.27986342	 0.21448735	 0.14911135	 0.08373542	 0.00000000	-0.00930468	-0.02528162	-0.04560737	-0.06670327	-0.13603615	-0.20141214	-0.26678820
                        25	 0.24617846	 0.17990058	 0.11362277	 0.04734503	 0.00000000	 0.00168042	-0.00430455	-0.01650049	-0.03218048	-0.10036722	-0.16664501	-0.23292288
                        60	-0.07471041	-0.14449533	-0.21428017	-0.28406495	 0.00000000	 0.10060824	 0.18513152	 0.24708724	 0.28133267	 0.22823713	 0.15845230	 0.08866740
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                    </tableData>
                    <tableData breakPoint="20">
                        -20	       -15	       -10	        -5	         0	         1	         2	         3	         4	         9	        14	        19
                        -20	 0.16893692	 0.10671545	 0.04449406	-0.01772726	 0.00000000	 0.01998126	 0.03127409	 0.03375169	 0.02848191	-0.03204979	-0.09427117	-0.15649262
                        -11	 0.23414591	 0.17102263	 0.10789942	 0.04477629	 0.00000000	 0.00169376	-0.00392059	-0.01546543	-0.03035118	-0.09527479	-0.15839798	-0.22152124
                        -2	 0.29348169	 0.22945660	 0.16543159	 0.10140664	 0.00000000	-0.01485528	-0.03577929	-0.06003098	-0.08363997	-0.15262659	-0.21665159	-0.28067666
                        7	 0.30569766	 0.24077076	 0.17584394	 0.11091719	 0.00000000	-0.01745685	-0.04087395	-0.06727763	-0.09244766	-0.16285858	-0.22778539	-0.29271227
                        16	 0.28109586	 0.21526716	 0.14943853	 0.08360996	 0.00000000	-0.00916036	-0.02505611	-0.04536462	-0.06649938	-0.13627281	-0.20210143	-0.26793012
                        25	 0.24807658	 0.18134606	 0.11461562	 0.04788525	 0.00000000	 0.00162770	-0.00445713	-0.01678496	-0.03260499	-0.10126954	-0.16799997	-0.23473047
                        60	-0.07022356	-0.14046111	-0.21069859	-0.28093600	 0.00000000	 0.09978926	 0.18350854	 0.24475250	 0.27846440	 0.22474608	 0.15450862	 0.08427108
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                    </tableData>
                    <tableData breakPoint="25">
                        -20	       -15	       -10	        -5	         0	         1	         2	         3	         4	         9	        14	        19
                        -20	 0.16750667	 0.10483257	 0.04215855	-0.02051541	 0.00000000	 0.02091374	 0.03301202	 0.03610330	 0.03119938	-0.02962375	-0.09229776	-0.15497185
                        -11	 0.23338133	 0.16980542	 0.10622958	 0.04265382	 0.00000000	 0.00242919	-0.00256077	-0.01364104	-0.02826211	-0.09351442	-0.15709025	-0.22066614
                        -2	 0.29338278	 0.22890506	 0.16442742	 0.09994984	 0.00000000	-0.01431688	-0.03479757	-0.05873380	-0.08217930	-0.15153190	-0.21600953	-0.28048723
                        7	 0.30626443	 0.24088490	 0.17550544	 0.11012606	 0.00000000	-0.01711549	-0.04027033	-0.06650767	-0.09161538	-0.16242956	-0.22780900	-0.29318852
                        16	 0.28232830	 0.21604697	 0.14976570	 0.08348451	 0.00000000	-0.00901604	-0.02483059	-0.04512187	-0.06629550	-0.13650946	-0.20279071	-0.26907203
                        25	 0.24997469	 0.18279155	 0.11560847	 0.04842547	 0.00000000	 0.00157498	-0.00460972	-0.01706942	-0.03302950	-0.10217187	-0.16935493	-0.23653806
                        60	-0.06573672	-0.13642690	-0.20711701	-0.27780705	 0.00000000	 0.09897027	 0.18188555	 0.24241777	 0.27559613	 0.22125503	 0.15056493	 0.07987476
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                    </tableData>
                    <tableData breakPoint="30">
                        -20	       -15	       -10	        -5	         0	         1	         2	         3	         4	         9	        14	        19
                        -20	 0.16607642	 0.10294969	 0.03982303	-0.02330355	 0.00000000	 0.02184621	 0.03474994	 0.03845490	 0.03391685	-0.02719771	-0.09032435	-0.15345107
                        -11	 0.23261675	 0.16858821	 0.10455974	 0.04053135	 0.00000000	 0.00316463	-0.00120095	-0.01181665	-0.02617304	-0.09175406	-0.15578251	-0.21981104
                        -2	 0.29328388	 0.22835353	 0.16342325	 0.09849305	 0.00000000	-0.01377848	-0.03381586	-0.05743662	-0.08071862	-0.15043720	-0.21536747	-0.28029780
                        7	 0.30683120	 0.24099904	 0.17516695	 0.10933494	 0.00000000	-0.01677414	-0.03966671	-0.06573770	-0.09078310	-0.16200054	-0.22783261	-0.29366476
                        16	 0.28356075	 0.21682678	 0.15009288	 0.08335906	 0.00000000	-0.00887173	-0.02460508	-0.04487912	-0.06609161	-0.13674611	-0.20347999	-0.27021395
                        25	 0.25187281	 0.18423703	 0.11660133	 0.04896569	 0.00000000	 0.00152226	-0.00476231	-0.01735388	-0.03345402	-0.10307419	-0.17070988	-0.23834565
                        60	-0.06124988	-0.13239269	-0.20353543	-0.27467810	 0.00000000	 0.09815129	 0.18026256	 0.24008304	 0.27272786	 0.21776397	 0.14662125	 0.07547845
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                    </tableData>
                </table>
        </function>
        <function name="aero/coefficients/CFYP">
            <description>SIDE FORCE DUE TO ROLL RATE (CYP)</description>
            <product>
                <property>aero/pb</property>
                <table>
                    <independentVar lookup="row">aero/alpha-deg</independentVar>
                    <tableData>
                        -20		 0.01205991
                        -19		-0.12656627
                        -10		-0.05712140
                        -1		-0.03039054
                        8		 0.11405321
                        17		-0.01265038
                        30		 0.00235423
                        60		 0.00000000
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                    </tableData>
                </table>
            </product>
        </function>
        <function name="aero/coefficients/CFYR">
            <description>SIDE FORCE DUE TO YAW RATE (CYR)</description>
            <product>
                <property>aero/rb</property>
                <table>
                    <independentVar lookup="row">aero/alpha-deg</independentVar>
                    <tableData>
                        -20		 0.35000000
                        -19		 0.35000000
                        -10		 0.35000000
                        -1		 0.37623865
                        8		 0.21100454
                        17		 0.05283658
                        30		 0.01370411
                        60		 0.00000000
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                    </tableData>
                </table>
            </product>
        </function>
        <function name="aero/coefficients/CYDAD">
            <description>SIDE FORCE DUE TO AILERON DEFLECTION</description>
            <product>
                <property>fcs/aileron-pos-deg</property>
                <table>
                    <independentVar lookup="row">aero/alpha-deg</independentVar>
                    <tableData>
                        -20		-0.00027502
                        -19		-0.00032657
                        -10		-0.00029686
                        -1		-0.00021821
                        8		-0.00006516
                        17		 0.00012703
                        30		 0.00018884
                        60		 0.00115894
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                    </tableData>
                </table>
            </product>
        </function>
        <function name="aero/coefficients/CYDRD">
            <description>SIDE FORCE DUE TO RUDDER DEFLECTION</description>
            <product>
                <property>fcs/rudder-pos-deg</property>
                <value>
                    0.89 <!-- DRFLX5 -->
                </value>
                <property>aero/coefficients/EPA43</property>
                <table>
                    <independentVar lookup="row">aero/alpha-deg</independentVar>
                    <independentVar lookup="column">fcs/rudder-pos-deg</independentVar>
                    <tableData>
                        -30	        -25	        -20	        -15	        -10	         -5	          0	          1	          2	          3	          4	          9	         14	         19	         24	         29
                        -20	-0.00151306	 0.00018306	 0.00149969	 0.00247584	 0.00315049	 0.00356264	 0.00375129	 0.00376563	 0.00377290	 0.00377342	 0.00376749	 0.00365209	 0.00342237	 0.00311733	 0.00277595	 0.00243724
                        -11	-0.00099709	 0.00071589	 0.00204938	 0.00304239	 0.00373390	 0.00416291	 0.00436842	 0.00438613	 0.00439678	 0.00440066	 0.00439811	 0.00429957	 0.00408671	 0.00379853	 0.00347401	 0.00315216
                        -2	-0.00236730	-0.00063746	 0.00071289	 0.00172276	 0.00243113	 0.00287701	 0.00309937	 0.00312046	 0.00313447	 0.00314173	 0.00314255	 0.00306087	 0.00286487	 0.00259355	 0.00228590	 0.00198090
                        7	-0.00213462	-0.00038792	 0.00097930	 0.00200602	 0.00273126	 0.00319399	 0.00343322	 0.00345767	 0.00347506	 0.00348569	 0.00348988	 0.00342506	 0.00324593	 0.00299146	 0.00270067	 0.00241254
                        16	-0.00250637	-0.00074281	 0.00064127	 0.00168486	 0.00242695	 0.00290654	 0.00316263	 0.00319046	 0.00321122	 0.00322522	 0.00323278	 0.00318483	 0.00302255	 0.00278495	 0.00251101	 0.00223974
                        25	-0.00408563	-0.00230521	-0.00090427	 0.00015618	 0.00091513	 0.00141159	 0.00168453	 0.00171574	 0.00173987	 0.00175724	 0.00176817	 0.00173708	 0.00159166	 0.00137092	 0.00111385	 0.00085944
                        60	-0.01822570	-0.01637971	-0.01491321	-0.01378719	-0.01296267	-0.01240065	-0.01206213	-0.01201781	-0.01198057	-0.01195008	-0.01192604	-0.01189156	-0.01197141	-0.01212658	-0.01231809	-0.01250693
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                    </tableData>
                </table>
            </product>
        </function>
        <function name="aero/coefficients/CYDTD">
            <description>SIDE FORCE DUE TO DIFFERETIAL TAIL DEFLECTION - CYDTD</description>
            <product>
                <value>
                    0.975 <!-- DTFLX5 -->
                </value>
                <property>fcs/differential-elevator-pos-deg</property>
                <table>
                    <independentVar lookup="row">aero/alpha-deg</independentVar>
                    <independentVar lookup="column">fcs/elevator-pos-deg</independentVar>
                    <tableData>
                        -30	        -25	        -20	        -15	        -10	         -5	          0	          5	         10	         15	         20	         25	         30
                        -20	 0.00477977	 0.00326443	 0.00201393	 0.00111242	 0.00057204	 0.00035313	 0.00038458	 0.00058409	 0.00087848	 0.00122399	 0.00162656	 0.00216213	 0.00299694
                        -11	 0.00353334	 0.00211733	 0.00092603	 0.00004212	-0.00052379	-0.00081285	-0.00089768	-0.00086206	-0.00078068	-0.00069879	-0.00061197	-0.00044577	-0.00003546
                        -2	 0.00244019	 0.00122250	 0.00018347	-0.00059452	-0.00110116	-0.00137790	-0.00149764	-0.00154448	-0.00159339	-0.00168995	-0.00182999	-0.00193939	-0.00185370
                        7	 0.00120945	 0.00027416	-0.00052954	-0.00111936	-0.00148504	-0.00166812	-0.00174159	-0.00178962	-0.00188727	-0.00208017	-0.00236427	-0.00266549	-0.00281949
                        16	-0.00000952	-0.00059327	-0.00108859	-0.00141403	-0.00156018	-0.00156943	-0.00151560	-0.00148372	-0.00154968	-0.00175997	-0.00211137	-0.00253065	-0.00285431
                        25	-0.00075230	-0.00093028	-0.00105417	-0.00104510	-0.00089627	-0.00065265	-0.00039067	-0.00019793	-0.00015294	-0.00030476	-0.00065277	-0.00112635	-0.00156458
                        60	 0.00595406	 0.00759111	 0.00932441	 0.01118776	 0.01314288	 0.01509975	 0.01693684	 0.01852148	 0.01973010	 0.02046855	 0.02069238	 0.02042714	 0.01978867
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                    </tableData>
                </table>
            </product>
        </function>
        <function name="aero/coefficients/CyMach">
            <description>Yaw factor (NASA-TM-84643 Figure 3 Clalpha) and values for AOA derived from NASA-aaia-2000-0900 Figure 4</description>
                <table>
                    <independentVar lookup="row">velocities/mach</independentVar>
                    <tableData>
                    0.00	0.970823
                    0.05	0.986678
                    0.55	0.991244
                    1.20	2.536296
                    1.70	2.210755
                    2.20	1.881765
                    2.70	1.544357
                    3.00	1.325949
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                    </tableData>
                </table>
        </function>
        <function name="aero/coefficients/CYRB">
            <description>ASYMMETRIC CY AT HIGH ALPHA</description>
                <table>
                    <independentVar lookup="row">aero/alpha-deg</independentVar>
                    <independentVar lookup="column">aero/beta-deg</independentVar>
                    <tableData>
                        -20	        -15	        -10	         -5	          0	          1	          2	          3	          4	          9	         14	         19
                        -20	 0.00000000	 0.00000000	 0.00000000	 0.00000000	 0.00000000	 0.00000000	 0.00000000	 0.00000000	 0.00000000	 0.00000000	 0.00000000	 0.00000000
                        -11	 0.00000000	 0.00000000	 0.00000000	 0.00000000	 0.00000000	 0.00000000	 0.00000000	 0.00000000	 0.00000000	 0.00000000	 0.00000000	 0.00000000
                        -2	 0.00000000	 0.00000000	 0.00000000	 0.00000000	 0.00000000	 0.00000000	 0.00000000	 0.00000000	 0.00000000	 0.00000000	 0.00000000	 0.00000000
                        7	 0.00000000	 0.00000000	 0.00000000	 0.00000000	 0.00000000	 0.00000000	 0.00000000	 0.00000000	 0.00000000	 0.00000000	 0.00000000	 0.00000000
                        16	 0.00000000	 0.00000000	 0.00000000	 0.00000000	 0.00000000	 0.00000000	 0.00000000	 0.00000000	 0.00000000	 0.00000000	 0.00000000	 0.00000000
                        25	 0.00000000	 0.00000000	 0.00000000	 0.00000000	 0.00000000	 0.00000000	 0.00000000	 0.00000000	 0.00000000	 0.00000000	 0.00000000	 0.00000000
                        60	 0.00000000	 0.00000000	 0.00000000	 0.14792225	 0.00001110	 0.03451504	 0.07422621	 0.11133461	 0.13803006	 0.02087472	 0.00000000	 0.00000000
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                    </tableData>
                </table>
        </function>
        <function name="aero/coefficients/CMN1">
            <description>BASIC YAWING MOMENT - CN (BETA)</description>
                <table>
                    <independentVar lookup="row">aero/alpha-deg</independentVar>
                    <independentVar lookup="column">aero/beta-deg</independentVar>
                    <independentVar lookup="table">fcs/elevator-pos-deg</independentVar>
                    <tableData breakPoint="-30">
                        -20	       -15	       -10	        -5	         0	         1	         2	         3	         4	         9	        14	        19
                        -20	-0.02713148	-0.01745239	-0.00688538	 0.00461678	 0.00000000	-0.01452356	-0.01198660	-0.00949006	-0.00703358	 0.00466128	 0.01541153	 0.02526443
                        -11	-0.02477686	-0.01973297	-0.01360921	-0.00635833	 0.00000000	-0.00028564	 0.00144714	 0.00313180	 0.00476874	 0.01225071	 0.01859612	 0.02385221
                        -2	-0.02419927	-0.02313880	-0.02091794	-0.01748948	 0.00000000	 0.01384548	 0.01483309	 0.01576938	 0.01665472	 0.02033037	 0.02278897	 0.02407774
                        7	-0.01060859	-0.01287974	-0.01402147	-0.01398655	 0.00000000	 0.01307969	 0.01338116	 0.01363254	 0.01383422	 0.01411013	 0.01319995	 0.01115090
                        16	 0.01135401	 0.00640303	 0.00243903	-0.00049073	 0.00000000	 0.00205815	 0.00173251	 0.00136247	 0.00094842	-0.00176883	-0.00552976	-0.01028712
                        25	 0.03286907	 0.02589003	 0.01964410	 0.01417852	 0.00000000	-0.01039965	-0.01129339	-0.01222137	-0.01318321	-0.01848705	-0.02458068	-0.03141688
                        60	 0.06081753	 0.05214764	 0.04216397	 0.03091376	 0.00000000	-0.02103343	-0.02357535	-0.02606963	-0.02851589	-0.04001374	-0.05025450	-0.05919092
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                    </tableData>
                    <tableData breakPoint="-25">
                        -20	       -15	       -10	        -5	         0	         1	         2	         3	         4	         9	        14	        19
                        -20	-0.02723751	-0.01778155	-0.00743767	 0.00384136	 0.00000000	-0.01356964	-0.01107731	-0.00862540	-0.00621355	 0.00525819	 0.01578532	 0.02541508
                        -11	-0.02530192	-0.02022164	-0.01406148	-0.00677421	 0.00000000	 0.00010113	 0.00184119	 0.00353313	 0.00517735	 0.01269571	 0.01907751	 0.02436998
                        -2	-0.02528702	-0.02397425	-0.02150111	-0.01782035	 0.00000000	 0.01397452	 0.01501259	 0.01599933	 0.01693513	 0.02086308	 0.02357397	 0.02511503
                        7	-0.01240271	-0.01424927	-0.01496642	-0.01450692	 0.00000000	 0.01326038	 0.01364677	 0.01398307	 0.01426966	 0.01497017	 0.01448457	 0.01286011
                        16	 0.00870985	 0.00431212	 0.00090140	-0.00147510	 0.00000000	 0.00259991	 0.00238492	 0.00212554	 0.00182214	-0.00034185	-0.00354951	-0.00775361
                        25	 0.02923118	 0.02289047	 0.01728288	 0.01245563	 0.00000000	-0.00918743	-0.00995350	-0.01075381	-0.01158798	-0.01625349	-0.02170880	-0.02790666
                        60	 0.05194939	 0.04383406	 0.03440496	 0.02370931	 0.00000000	-0.01427262	-0.01670363	-0.01908700	-0.02142235	-0.03236564	-0.04205183	-0.05043369
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                    </tableData>
                    <tableData breakPoint="-20">
                        -20	       -15	       -10	        -5	         0	         1	         2	         3	         4	         9	        14	        19
                        -20	-0.02720072	-0.01796789	-0.00784714	 0.00320877	 0.00000000	-0.01275855	-0.01031084	-0.00790355	-0.00553632	 0.00571228	 0.01601628	 0.02542292
                        -11	-0.02578377	-0.02066710	-0.01447056	-0.00714690	 0.00000000	 0.00044470	 0.00219204	 0.00389126	 0.00554276	 0.01309751	 0.01951569	 0.02484456
                        -2	-0.02637335	-0.02480828	-0.02208284	-0.01814979	 0.00000000	 0.01410212	 0.01519065	 0.01622786	 0.01721411	 0.02139435	 0.02435754	 0.02615090
                        7	-0.01417934	-0.01560132	-0.01589388	-0.01500979	 0.00000000	 0.01342358	 0.01389489	 0.01431611	 0.01468762	 0.01581270	 0.01575169	 0.01455182
                        16	 0.00615708	 0.00231262	-0.00054484	-0.00236807	 0.00000000	 0.00305027	 0.00294593	 0.00279720	 0.00260445	 0.00099374	-0.00166066	-0.00531150
                        25	 0.02581644	 0.02011407	 0.01514481	 0.01095589	 0.00000000	-0.00819836	-0.00883676	-0.00950941	-0.01021591	-0.01424309	-0.01906006	-0.02461959
                        60	 0.04436660	 0.03680583	 0.02793129	 0.01779020	 0.00000000	-0.00879717	-0.01111726	-0.01338972	-0.01561416	-0.02600288	-0.03513452	-0.04296182
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                    </tableData>
                    <tableData breakPoint="-15">
                        -20	       -15	       -10	        -5	         0	         1	         2	         3	         4	         9	        14	        19
                        -20	-0.02702112	-0.01801141	-0.00811379	 0.00271899	 0.00000000	-0.01209027	-0.00968718	-0.00732452	-0.00500192	 0.00602356	 0.01610443	 0.02528794
                        -11	-0.02622242	-0.02106936	-0.01483643	-0.00747638	 0.00000000	 0.00074507	 0.00249968	 0.00420619	 0.00586496	 0.01345610	 0.01991068	 0.02527593
                        -2	-0.02745824	-0.02564088	-0.02266315	-0.01847780	 0.00000000	 0.01422830	 0.01536729	 0.01645495	 0.01749166	 0.02192420	 0.02513968	 0.02718533
                        7	-0.01593847	-0.01693586	-0.01680384	-0.01549516	 0.00000000	 0.01356929	 0.01412551	 0.01463165	 0.01508807	 0.01663775	 0.01700132	 0.01622604
                        16	 0.00369572	 0.00040453	-0.00189967	-0.00316964	 0.00000000	 0.00340922	 0.00341554	 0.00337746	 0.00329537	 0.00223792	 0.00013678	-0.00296079
                        25	 0.02262486	 0.01756082	 0.01322989	 0.00967931	 0.00000000	-0.00743243	-0.00794317	-0.00848815	-0.00906699	-0.01245583	-0.01663447	-0.02155567
                        60	 0.03806916	 0.03106295	 0.02274297	 0.01315644	 0.00000000	-0.00460706	-0.00681624	-0.00897778	-0.01109131	-0.02092548	-0.02950255	-0.03677529
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                    </tableData>
                    <tableData breakPoint="-10">
                        -20	       -15	       -10	        -5	         0	         1	         2	         3	         4	         9	        14	        19
                        -20	-0.02669870	-0.01791212	-0.00823762	 0.00237203	 0.00000000	-0.01156480	-0.00920634	-0.00688831	-0.00461033	 0.00619202	 0.01604977	 0.02501015
                        -11	-0.02661787	-0.02142842	-0.01515910	-0.00776266	 0.00000000	 0.00100224	 0.00276413	 0.00447791	 0.00614396	 0.01377149	 0.02026246	 0.02566410
                        -2	-0.02854171	-0.02647206	-0.02324203	-0.01880439	 0.00000000	 0.01435305	 0.01554250	 0.01668062	 0.01776779	 0.02245262	 0.02592039	 0.02821834
                        7	-0.01768011	-0.01825291	-0.01769631	-0.01596304	 0.00000000	 0.01369750	 0.01433864	 0.01492970	 0.01547104	 0.01744530	 0.01823346	 0.01788276
                        16	 0.00132576	-0.00141217	-0.00316310	-0.00387980	 0.00000000	 0.00367678	 0.00379374	 0.00386632	 0.00389488	 0.00339069	 0.00184283	-0.00070148
                        25	 0.01965642	 0.01523072	 0.01153812	 0.00862587	 0.00000000	-0.00688966	-0.00727274	-0.00769005	-0.00814122	-0.01089173	-0.01443204	-0.01871490
                        60	 0.03305707	 0.02660542	 0.01884000	 0.00980804	 0.00000000	-0.00170230	-0.00380057	-0.00585120	-0.00785381	-0.01713342	-0.02515593	-0.03187411
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                    </tableData>
                    <tableData breakPoint="-5">
                        -20	       -15	       -10	        -5	         0	         1	         2	         3	         4	         9	        14	        19
                        -20	-0.02623346	-0.01767001	-0.00821864	 0.00216788	 0.00000000	-0.01118215	-0.00886832	-0.00659491	-0.00436156	 0.00621766	 0.01585228	 0.02458954
                        -11	-0.02697011	-0.02174427	-0.01543856	-0.00800574	 0.00000000	 0.00121621	 0.00298537	 0.00470643	 0.00637976	 0.01404368	 0.02057103	 0.02600907
                        -2	-0.02962375	-0.02730180	-0.02381948	-0.01912954	 0.00000000	 0.01447637	 0.01571628	 0.01690486	 0.01804249	 0.02297961	 0.02669968	 0.02924992
                        7	-0.01940425	-0.01955247	-0.01857128	-0.01641343	 0.00000000	 0.01380822	 0.01453428	 0.01521025	 0.01583650	 0.01823535	 0.01944810	 0.01952198
                        16	-0.00095280	-0.00313746	-0.00433513	-0.00449856	 0.00000000	 0.00385292	 0.00408055	 0.00426377	 0.00440299	 0.00445207	 0.00345747	 0.00146643
                        25	 0.01691114	 0.01312376	 0.01006950	 0.00779558	 0.00000000	-0.00657004	-0.00682545	-0.00711509	-0.00743860	-0.00955078	-0.01245275	-0.01609728
                        60	 0.02933032	 0.02343324	 0.01622238	 0.00774497	 0.00000000	-0.00008288	-0.00207024	-0.00400996	-0.00590166	-0.01462671	-0.02209466	-0.02825827
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                    </tableData>
                    <tableData breakPoint="0">
                        -20	       -15	       -10	        -5	         0	         1	         2	         3	         4	         9	        14	        19
                        -20	-0.02562541	-0.01728509	-0.00805685	 0.00210655	 0.00000000	-0.01094232	-0.00867311	-0.00644433	-0.00425560	 0.00610049	 0.01551198	 0.02402611
                        -11	-0.02727916	-0.02201693	-0.01567483	-0.00820561	 0.00000000	 0.00138697	 0.00316341	 0.00489175	 0.00657236	 0.01427266	 0.02083641	 0.02631083
                        -2	-0.03070436	-0.02813012	-0.02439550	-0.01945327	 0.00000000	 0.01459826	 0.01588863	 0.01712767	 0.01831576	 0.02350518	 0.02747754	 0.03028007
                        7	-0.02111090	-0.02083453	-0.01942875	-0.01684632	 0.00000000	 0.01390144	 0.01471241	 0.01547330	 0.01618448	 0.01900791	 0.02064524	 0.02114371
                        16	-0.00313996	-0.00477135	-0.00541575	-0.00502592	 0.00000000	 0.00393767	 0.00427594	 0.00456983	 0.00481969	 0.00542204	 0.00498070	 0.00354293
                        25	 0.01438900	 0.01123996	 0.00882403	 0.00718845	 0.00000000	-0.00647357	-0.00660131	-0.00676329	-0.00695913	-0.00843297	-0.01069662	-0.01370281
                        60	 0.02688892	 0.02154640	 0.01489010	 0.00696726	 0.00000000	 0.00025118	-0.00162527	-0.00345407	-0.00523486	-0.01340535	-0.02031873	-0.02592779
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                    </tableData>
                    <tableData breakPoint="5">
                        -20	       -15	       -10	        -5	         0	         1	         2	         3	         4	         9	        14	        19
                        -20	-0.02487454	-0.01675734	-0.00775223	 0.00218804	 0.00000000	-0.01084531	-0.00862072	-0.00643657	-0.00429247	 0.00584050	 0.01502887	 0.02331987
                        -11	-0.02754500	-0.02224638	-0.01586789	-0.00836228	 0.00000000	 0.00151453	 0.00329825	 0.00503387	 0.00672175	 0.01445845	 0.02105858	 0.02656940
                        -2	-0.03178354	-0.02895701	-0.02497010	-0.01977557	 0.00000000	 0.01471873	 0.01605955	 0.01734905	 0.01858760	 0.02402931	 0.02825397	 0.03130880
                        7	-0.02280005	-0.02209910	-0.02026873	-0.01726171	 0.00000000	 0.01397716	 0.01487306	 0.01571886	 0.01651495	 0.01976297	 0.02182489	 0.02274795
                        16	-0.00523571	-0.00631384	-0.00640497	-0.00546188	 0.00000000	 0.00393101	 0.00437994	 0.00478448	 0.00514500	 0.00630061	 0.00641254	 0.00552803
                        25	 0.01209002	 0.00957931	 0.00780171	 0.00680446	 0.00000000	-0.00660025	-0.00660033	-0.00663464	-0.00670281	-0.00753832	-0.00916363	-0.01153150
                        60	 0.02573288	 0.02094492	 0.01484318	 0.00747490	 0.00000000	-0.00070010	-0.00246564	-0.00418353	-0.00585341	-0.01346933	-0.01982816	-0.02488265
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                    </tableData>
                    <tableData breakPoint="10">
                        -20	       -15	       -10	        -5	         0	         1	         2	         3	         4	         9	        14	        19
                        -20	-0.02398086	-0.01608679	-0.00730480	 0.00241234	 0.00000000	-0.01089111	-0.00871115	-0.00657162	-0.00447214	 0.00543770	 0.01440293	 0.02247081
                        -11	-0.02776764	-0.02243263	-0.01601775	-0.00847576	 0.00000000	 0.00159889	 0.00338989	 0.00513278	 0.00682795	 0.01460103	 0.02123756	 0.02678476
                        -2	-0.03286129	-0.02978247	-0.02554326	-0.02009645	 0.00000000	 0.01483777	 0.01622905	 0.01756901	 0.01885801	 0.02455202	 0.02902897	 0.03233609
                        7	-0.02447171	-0.02334617	-0.02109122	-0.01765961	 0.00000000	 0.01403540	 0.01501621	 0.01594693	 0.01682794	 0.02050054	 0.02298705	 0.02433469
                        16	-0.00724006	-0.00776492	-0.00730279	-0.00580643	 0.00000000	 0.00383296	 0.00439254	 0.00490772	 0.00537890	 0.00708777	 0.00775297	 0.00742173
                        25	 0.01001419	 0.00814181	 0.00700255	 0.00664363	 0.00000000	-0.00695009	-0.00682249	-0.00672914	-0.00666964	-0.00686682	-0.00785380	-0.00958333
                        60	 0.02586218	 0.02162878	 0.01608160	 0.00926788	 0.00000000	-0.00293674	-0.00459136	-0.00619834	-0.00775731	-0.01481867	-0.02062293	-0.02512287
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                    </tableData>
                    <tableData breakPoint="15">
                        -20	       -15	       -10	        -5	         0	         1	         2	         3	         4	         9	        14	        19
                        -20	-0.02294435	-0.01527341	-0.00671455	 0.00277946	 0.00000000	-0.01107972	-0.00894439	-0.00684949	-0.00479464	 0.00489207	 0.01363419	 0.02147893
                        -11	-0.02794707	-0.02257568	-0.01612441	-0.00854602	 0.00000000	 0.00164005	 0.00343833	 0.00518850	 0.00689094	 0.01470041	 0.02137333	 0.02695692
                        -2	-0.03393762	-0.03060650	-0.02611500	-0.02041589	 0.00000000	 0.01495538	 0.01639712	 0.01778753	 0.01912700	 0.02507330	 0.02980254	 0.03336196
                        7	-0.02612587	-0.02457575	-0.02189621	-0.01804002	 0.00000000	 0.01407613	 0.01514186	 0.01615750	 0.01712342	 0.02122061	 0.02413170	 0.02590393
                        16	-0.00915301	-0.00912461	-0.00810921	-0.00605959	 0.00000000	 0.00364350	 0.00431373	 0.00493957	 0.00552140	 0.00778354	 0.00900200	 0.00922402
                        25	 0.00816151	 0.00692746	 0.00642653	 0.00670594	 0.00000000	-0.00752307	-0.00726781	-0.00704679	-0.00685962	-0.00641847	-0.00676712	-0.00785832
                        60	 0.02727682	 0.02359799	 0.01860537	 0.01234621	 0.00000000	-0.00645872	-0.00800242	-0.00949850	-0.01094655	-0.01745335	-0.02270305	-0.02664843
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                    </tableData>
                    <tableData breakPoint="20">
                        -20	       -15	       -10	        -5	         0	         1	         2	         3	         4	         9	        14	        19
                        -20	-0.02176504	-0.01431722	-0.00598149	 0.00328940	 0.00000000	-0.01141116	-0.00932045	-0.00727017	-0.00525995	 0.00420364	 0.01272262	 0.02034424
                        -11	-0.02808331	-0.02267553	-0.01618787	-0.00857309	 0.00000000	 0.00163801	 0.00344356	 0.00520101	 0.00691073	 0.01475659	 0.02146590	 0.02708588
                        -2	-0.03501252	-0.03142910	-0.02668531	-0.02073391	 0.00000000	 0.01507156	 0.01656376	 0.01800463	 0.01939455	 0.02559315	 0.03057469	 0.03438640
                        7	-0.02776254	-0.02578783	-0.02268370	-0.01840293	 0.00000000	 0.01409937	 0.01525002	 0.01635057	 0.01740142	 0.02192319	 0.02525887	 0.02745568
                        16	-0.01097455	-0.01039289	-0.00882422	-0.00622133	 0.00000000	 0.00336263	 0.00414352	 0.00488001	 0.00557249	 0.00838790	 0.01015962	 0.01093491
                        25	 0.00653198	 0.00593627	 0.00607367	 0.00699141	 0.00000000	-0.00831920	-0.00793628	-0.00758759	-0.00727276	-0.00619327	-0.00590359	-0.00635645
                        60	 0.02997682	 0.02685254	 0.02241449	 0.01670989	 0.00000000	-0.01126604	-0.01269884	-0.01408400	-0.01542114	-0.02137338	-0.02606852	-0.02945934
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                    </tableData>
                    <tableData breakPoint="25">
                        -20	       -15	       -10	        -5	         0	         1	         2	         3	         4	         9	        14	        19
                        -20	-0.02044290	-0.01321821	-0.00510561	 0.00394215	 0.00000000	-0.01188541	-0.00983933	-0.00783368	-0.00586807	 0.00337238	 0.01166824	 0.01906673
                        -11	-0.02817634	-0.02273217	-0.01620812	-0.00855696	 0.00000000	 0.00159276	 0.00340559	 0.00517032	 0.00688731	 0.01476957	 0.02151526	 0.02717163
                        -2	-0.03608599	-0.03225028	-0.02725419	-0.02105049	 0.00000000	 0.01518631	 0.01672897	 0.01822030	 0.01966068	 0.02611157	 0.03134540	 0.03540941
                        7	-0.02938171	-0.02698242	-0.02345371	-0.01874834	 0.00000000	 0.01410512	 0.01534068	 0.01652615	 0.01766191	 0.02260828	 0.02636854	 0.02898994
                        16	-0.01270470	-0.01156976	-0.00944784	-0.00629168	 0.00000000	 0.00299037	 0.00388190	 0.00472905	 0.00553218	 0.00890086	 0.01122585	 0.01255440
                        25	 0.00512560	 0.00516822	 0.00594395	 0.00750003	 0.00000000	-0.00933848	-0.00882789	-0.00835154	-0.00790904	-0.00619123	-0.00526321	-0.00507774
                        60	 0.03396217	 0.03139245	 0.02750895	 0.02235892	 0.00000000	-0.01735872	-0.01868061	-0.01995485	-0.02118108	-0.02657876	-0.03071934	-0.03355559
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                    </tableData>
                    <tableData breakPoint="30">
                        -20	       -15	       -10	        -5	         0	         1	         2	         3	         4	         9	        14	        19
                        -20	-0.01897795	-0.01197639	-0.00408691	 0.00473772	 0.00000000	-0.01250248	-0.01050102	-0.00853999	-0.00661902	 0.00239831	 0.01047104	 0.01764640
                        -11	-0.02822618	-0.02274561	-0.01618517	-0.00849762	 0.00000000	 0.00150431	 0.00332442	 0.00509643	 0.00682070	 0.01473934	 0.02152143	 0.02721419
                        -2	-0.03715803	-0.03307003	-0.02782165	-0.02136565	 0.00000000	 0.01529963	 0.01689275	 0.01843454	 0.01992538	 0.02662857	 0.03211469	 0.03643099
                        7	-0.03098339	-0.02815951	-0.02420621	-0.01907626	 0.00000000	 0.01409337	 0.01541385	 0.01668424	 0.01790492	 0.02327587	 0.02746071	 0.03050670
                        16	-0.01434344	-0.01265524	-0.00998005	-0.00627062	 0.00000000	 0.00252670	 0.00352889	 0.00448669	 0.00540047	 0.00932241	 0.01220067	 0.01408249
                        25	 0.00394237	 0.00462332	 0.00603739	 0.00823180	 0.00000000	-0.01058092	-0.00994266	-0.00933864	-0.00876848	-0.00641233	-0.00484598	-0.00402218
                        60	 0.03923286	 0.03721770	 0.03388877	 0.02929329	 0.00000000	-0.02473675	-0.02594772	-0.02711105	-0.02822637	-0.03306949	-0.03665551	-0.03893720
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                    </tableData>
                </table>
        </function>
        <function name="aero/coefficients/CMNDAD">
            <description>YAWING MOMENT DUE TO AILERON DEFLECTION -CNDA</description>
            <product>
                <property>fcs/aileron-pos-deg</property>
                <table>
                    <independentVar lookup="row">aero/alpha-deg</independentVar>
                    <tableData>
                        -20		 0.00007779
                        -19		 0.00006879
                        -10		 0.00007085
                        -1		 0.00008432
                        8		 0.00003878
                        17		-0.00004250
                        30		-0.00011959
                        60		 0.00000085
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                    </tableData>
                </table>
            </product>
        </function>
        <function name="aero/coefficients/CMNDRDr">
            <description>YAWING MOMENT DUE TO RUDDER DEFLECTION -CNDR</description>
            <product>
                <property>fcs/rudder-pos-deg</property>
                <value>
                    0.89 <!-- DRFLX3 -->
                </value>
                <property>aero/coefficients/EPA43</property>
                <table>
                    <independentVar lookup="row">aero/alpha-deg</independentVar>
                    <independentVar lookup="column">aero/beta-deg</independentVar>
                    <tableData>
                        -20	        -15	        -10	         -5	          0	          1	          2	          3	          4	          9	         14	         19
                        -20	-0.00233301	-0.00229719	-0.00226137	-0.00222555	-0.00218973	-0.00218257	-0.00217541	-0.00216824	-0.00216108	-0.00212526	-0.00208944	-0.00205362
                        -11	-0.00229044	-0.00227365	-0.00225686	-0.00224007	-0.00222328	-0.00221993	-0.00221657	-0.00221321	-0.00220985	-0.00219306	-0.00217627	-0.00215948
                        -2	-0.00160773	-0.00160997	-0.00161221	-0.00161445	-0.00161669	-0.00161714	-0.00161758	-0.00161803	-0.00161848	-0.00162072	-0.00162296	-0.00162520
                        7	-0.00125784	-0.00127911	-0.00130037	-0.00132164	-0.00134291	-0.00134716	-0.00135142	-0.00135567	-0.00135992	-0.00138119	-0.00140246	-0.00142373
                        16	-0.00091681	-0.00095711	-0.00099741	-0.00103770	-0.00107800	-0.00108606	-0.00109412	-0.00110218	-0.00111024	-0.00115053	-0.00119083	-0.00123113
                        25	-0.00041214	-0.00047146	-0.00053079	-0.00059011	-0.00064944	-0.00066131	-0.00067317	-0.00068504	-0.00069690	-0.00075623	-0.00081555	-0.00087488
                        60	 0.00065481	 0.00052148	 0.00038815	 0.00025483	 0.00012150	 0.00009484	 0.00006817	 0.00004150	 0.00001484	-0.00011849	-0.00025181	-0.00038514
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                    </tableData>
                </table>
            </product>
        </function>
        <function name="aero/coefficients/CMNDTD">
            <description>YAWING MOMENT DUE TO DIFFERENTIAL TAIL DEFLECTION - CNDDT</description>
            <product>
                <value>
                    0.975 <!-- DTFLX3 -->
                </value>
                <property>fcs/differential-elevator-pos-deg</property>
                <table>
                    <independentVar lookup="row">aero/alpha-deg</independentVar>
                    <independentVar lookup="column">fcs/elevator-pos-deg</independentVar>
                    <tableData>
                        -30	        -25	        -20	        -15	        -10	         -5	          0	          5	         10	         15	         20	         25	         30
                        -20	 0.00163093	 0.00139340	 0.00116573	 0.00094789	 0.00073989	 0.00054174	 0.00035343	 0.00017496	 0.00000633	-0.00015245	-0.00030139	-0.00044049	-0.00056975
                        -11	 0.00144600	 0.00122499	 0.00101382	 0.00081250	 0.00062102	 0.00043937	 0.00026758	 0.00010562	-0.00004650	-0.00018877	-0.00032120	-0.00044379	-0.00055653
                        -2	 0.00162784	 0.00142334	 0.00122869	 0.00104387	 0.00086890	 0.00070377	 0.00054849	 0.00040304	 0.00026744	 0.00014168	 0.00002576	-0.00008032	-0.00017655
                        7	 0.00153554	 0.00134755	 0.00116940	 0.00100110	 0.00084264	 0.00069403	 0.00055525	 0.00042632	 0.00030723	 0.00019798	 0.00009857	 0.00000901	-0.00007071
                        16	 0.00109339	 0.00092191	 0.00076028	 0.00060849	 0.00046654	 0.00033444	 0.00021217	 0.00009975	-0.00000283	-0.00009556	-0.00017846	-0.00025151	-0.00031472
                        25	 0.00049259	 0.00033763	 0.00019251	 0.00005723	-0.00006821	-0.00018380	-0.00028955	-0.00038546	-0.00047153	-0.00054775	-0.00061414	-0.00067068	-0.00071737
                        60	-0.00037910	-0.00046985	-0.00055075	-0.00062182	-0.00068304	-0.00073442	-0.00077596	-0.00080766	-0.00082951	-0.00084153	-0.00084370	-0.00083602	-0.00081851
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                    </tableData>
                </table>
            </product>
        </function>
        <function name="aero/coefficients/CMNP">
            <description>YAWING MOMENT DUE TO ROLL RATE - CNP</description>
            <product>
                <property>aero/pb</property>
                <table>
                    <independentVar lookup="row">aero/alpha-deg</independentVar>
                    <tableData>
                        -20		 0.06927476
                        -19		 0.11136042
                        -10		 0.00976387
                        -1		 0.01412738
                        8		-0.03618489
                        17		-0.01251303
                        30		-0.09320734
                        60		-0.06638497
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                    </tableData>
                </table>
            </product>
        </function>
        <function name="aero/coefficients/CMNR">
            <description>YAW DAMPING DERIVATIVE - CMNR</description>
            <product>
                <property>aero/rb</property>
                <table>
                    <independentVar lookup="row">aero/alpha-deg</independentVar>
                    <tableData>
                        -20		-0.28050000
                        -19		-0.28050000
                        -10		-0.28050000
                        -1		-0.25592342
                        8		-0.24649284
                        17		-0.45795136
                        30		-0.09673448
                        60		-0.11000000
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                    </tableData>
                </table>
            </product>
        </function>
        <function name="aero/coefficients/CMNRB">
            <description>ASYMMETRIC CN AT HIGH ALPHA</description>
                <table>
                    <independentVar lookup="row">aero/alpha-deg</independentVar>
                    <independentVar lookup="column">aero/beta-deg</independentVar>
                    <tableData>
                        -20	        -15	        -10	         -5	          0	          1	          2	          3	          4	          9	         14	         19
                        -20	 0.00000000	 0.00000000	 0.00000000	 0.00000000	 0.00000000	 0.00000000	 0.00000000	 0.00000000	 0.00000000	 0.00000000	 0.00000000	 0.00000000
                        -11	 0.00000000	 0.00000000	 0.00000000	 0.00000000	 0.00000000	 0.00000000	 0.00000000	 0.00000000	 0.00000000	 0.00000000	 0.00000000	 0.00000000
                        -2	 0.00000000	 0.00000000	 0.00000000	 0.00000000	 0.00000000	 0.00000000	 0.00000000	 0.00000000	 0.00000000	 0.00000000	 0.00000000	 0.00000000
                        7	 0.00000000	 0.00000000	 0.00000000	 0.00000000	 0.00000000	 0.00000000	 0.00000000	 0.00000000	 0.00000000	 0.00000000	 0.00000000	 0.00000000
                        16	 0.00000000	 0.00000000	 0.00000000	 0.00000000	 0.00000000	 0.00000000	 0.00000000	 0.00000000	 0.00000000	 0.00000000	 0.00000000	 0.00000000
                        25	 0.00000000	 0.00000000	 0.00000000	 0.00000000	 0.00000000	 0.00000000	 0.00000000	 0.00000000	 0.00000000	 0.00000000	 0.00000000	 0.00000000
                        60	 0.00000000	 0.00000000	 0.00000000	 0.00000000	 0.00000000	 0.00000000	 0.00000000	 0.00000000	 0.00000000	 0.00000000	 0.01392576	 0.00056448
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                    </tableData>
                </table>
        </function>
        <function name="aero/coefficients/CNMach">
            <description>Yaw Mach factor (NASA-TM-84643 Figure 3 Clalpha) and values for AOA derived from NASA-aaia-2000-0900 Figure 4</description>
                <table>
                    <independentVar lookup="row">velocities/mach</independentVar>
                    <tableData>
                    0.00	0.970823
                    0.05	0.986678
                    0.55	0.991244
                    1.20	2.536296
                    1.70	2.210755
                    2.20	1.881765
                    2.70	1.544357
                    3.00	1.325949
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                    </tableData>
                </table>
        </function>

      <function name="aero/coefficients/CFXFLAPS">
        <description>DRAG INCREMENT DUE TO FLAPS</description>
        <product>
          <property>fcs/flap-pos-deg</property>
          <table>
            <independentVar lookup="row">aero/alpha-deg</independentVar>
            <independentVar lookup="column">fcs/elevator-pos-deg</independentVar>
            <tableData>
                         -30	        -25	        -20	        -15	        -10	         -5	          0	          5	         10	         15	         20	         25	         30
              -20	  -0.00209	  -0.00198	  -0.00186	  -0.00165	  -0.00144	  -0.00137	  -0.00123	  -0.00114	  -0.00108	  -0.00098	  -0.00092	  -0.00079	  -0.00063
               -2	  -0.00016	  -0.00005	   0.00002	   0.00008	   0.00019	   0.00014	   0.00019	   0.00037	   0.00047	   0.00056	   0.00063	   0.00072	   0.00083
                8	   0.00011	   0.00013	   0.00043	   0.00077	   0.00099	   0.00109	   0.00119	   0.00127	   0.00133	   0.00143	   0.00152	   0.00161	   0.00174
               18	   0.00134	   0.00163	   0.00177	   0.00191	   0.00201	   0.00209	   0.00214	   0.00219	   0.00232	   0.00246	   0.00264	   0.00274	   0.00281
               28	   0.00195	   0.00203	   0.00211	   0.00220	   0.00224	   0.00227	   0.00235	   0.00241	   0.00251	   0.00272	   0.00291	   0.00295	   0.00300
               55	   0.00103	   0.00104	   0.00106	   0.00108	   0.00115	   0.00118	   0.00120	   0.00121	   0.00121	   0.00121	   0.00122	   0.00122	   0.00124
               60	   0.00069	   0.00071	   0.00073	   0.00079	   0.00082	   0.00083	   0.00083	   0.00083	   0.00079	   0.00076	   0.00059	   0.00080	   0.00080
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            </tableData>
          </table>
        </product>
      </function>
      <function name="aero/coefficients/CFZFLAPS">
        <description>LIFT INCREMENT DUE TO FLAPS</description>
        <product>
          <property>fcs/flap-pos-deg</property>
          <table>
            <independentVar lookup="row">aero/alpha-deg</independentVar>
            <independentVar lookup="column">fcs/elevator-pos-deg</independentVar>
            <tableData>
                         -30	        -25	        -20	        -15	        -10	         -5	          0	          5	         10	         15	         20	         25	         30
              -20	   0.00713	   0.00677	   0.00645	   0.00632	   0.00605	   0.00519	   0.00447	   0.00499	   0.00548	   0.00567	   0.00539	   0.00462	   0.00415
               -2	   0.00583	   0.00580	   0.00574	   0.00488	   0.00375	   0.00321	   0.00346	   0.00335	   0.00389	   0.00362	   0.00342	   0.00403	   0.00504
                8	   0.00630	   0.00566	   0.00443	   0.00366	   0.00439	   0.00492	   0.00528	   0.00519	   0.00488	   0.00470	   0.00541	   0.00622	   0.00628
               18	   0.00115	   0.00007	  -0.00003	  -0.00004	  -0.00003	  -0.00028	  -0.00069	  -0.00091	  -0.00070	   0.00019	   0.00005	   0.00023	   0.00050
               28	  -0.00030	  -0.00019	  -0.00012	  -0.00013	  -0.00031	  -0.00049	  -0.00042	   0.00038	   0.00027	   0.00056	   0.00084	   0.00096	   0.00099
               55	   0.00022	   0.00021	   0.00035	   0.00037	   0.00030	   0.00036	   0.00039	   0.00037	   0.00038	   0.00036	   0.00034	   0.00035	   0.00037
               60	   0.00029	   0.00039	   0.00037	   0.00044	   0.00050	   0.00050	   0.00049	   0.00048	   0.00046	   0.00044	   0.00005	   0.00039	   0.00039
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            </tableData>
          </table>
        </product>
      </function>
      <function name="aero/coefficients/CMMFLAPS">
        <description>PITCHING MOMENT INCREMENT DUE TO FLAPS</description>
        <product>
          <property>fcs/flap-pos-deg</property>
          <table>
            <independentVar lookup="row">aero/alpha-deg</independentVar>
            <independentVar lookup="column">fcs/elevator-pos-deg</independentVar>
            <tableData>
                        -30	        -25	        -20	        -15	        -10	         -5	          0	          5	         10	         15	         20	         25	         30
              -20	  -0.00453	  -0.00399	  -0.00351	  -0.00333	  -0.00297	  -0.00165	  -0.00051	  -0.00127	  -0.00199	  -0.00224	  -0.00188	  -0.00093	  -0.00047
               -2	  -0.00250	  -0.00241	  -0.00237	  -0.00111	   0.00058	   0.00127	   0.00071	   0.00078	   0.00013	   0.00060	   0.00090	   0.00001	  -0.00143
                8	  -0.00328	  -0.00290	  -0.00153	  -0.00024	  -0.00103	  -0.00162	  -0.00203	  -0.00178	  -0.00123	  -0.00093	  -0.00196	  -0.00317	  -0.00320
               18	  -0.00100	   0.00009	   0.00002	  -0.00010	  -0.00028	  -0.00013	   0.00039	   0.00070	   0.00035	  -0.00104	  -0.00083	  -0.00113	  -0.00150
               28	  -0.00020	  -0.00037	  -0.00048	  -0.00047	  -0.00013	   0.00021	   0.00034	  -0.00087	  -0.00063	  -0.00107	  -0.00145	  -0.00157	  -0.00171
               55	  -0.00052	  -0.00051	  -0.00067	  -0.00065	  -0.00081	  -0.00091	  -0.00097	  -0.00095	  -0.00098	  -0.00097	  -0.00096	  -0.00099	  -0.00107
               60	  -0.00040	  -0.00052	  -0.00047	  -0.00059	  -0.00069	  -0.00069	  -0.00070	  -0.00070	  -0.00066	  -0.00062	  -0.00041	  -0.00067	  -0.00069
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            </tableData>
          </table>
        </product>
      </function>

      <function name="aero/coefficients/CFXGEAR">
        <description>DRAG INCREMENT DUE TO GEAR</description>
        <product>
          <property>gear/gear-position-norm</property>
          <table>
            <independentVar lookup="row">aero/alpha-deg</independentVar>
            <independentVar lookup="column">aero/beta-deg</independentVar>
            <tableData>
              -20	        -10	         -5	         -2	          0	          2	          5	         10	         20
              -20	   0.00109	   0.00108	   0.00107	   0.00112	   0.00112	   0.00111	   0.00115	   0.00109	   0.00110
              -2	   0.00107	   0.00107	   0.00107	   0.00107	   0.00107	   0.00107	   0.00107	   0.00107	   0.00107
              8	   0.00107	   0.00105	   0.00108	   0.00107	   0.00106	   0.00106	   0.00105	   0.00105	   0.00106
              18	   0.00092	   0.00111	   0.00114	   0.00120	   0.00118	   0.00122	   0.00115	   0.00111	   0.00093
              28	  -0.00045	   0.00201	   0.00133	   0.00068	   0.00041	   0.00067	   0.00156	   0.00206	  -0.00042
              55	   0.00197	   0.00181	   0.00196	   0.00165	   0.00159	   0.00161	   0.00170	   0.00164	   0.00180
              60	   0.00171	   0.00185	   0.00171	   0.00160	   0.00161	   0.00160	   0.00172	   0.00180	   0.00162
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            </tableData>
          </table>
        </product>
      </function>

      <function name="aero/coefficients/CFYGEAR">
        <description>SIDEFORCE INCREMENT DUE TO GEAR</description>
        <product>
          <property>gear/gear-position-norm</property>
          <table>
            <independentVar lookup="row">aero/alpha-deg</independentVar>
            <independentVar lookup="column">aero/beta-deg</independentVar>
            <tableData>
              -20	        -10	         -5	         -2	          0	          2	          5	         10	         20
              -20	   0.00099	   0.00044	   0.00016	   0.00003	   0.00001	   0.00000	  -0.00006	  -0.00045	  -0.00102
              -2	   0.00089	   0.00024	   0.00010	   0.00001	   0.00000	   0.00000	  -0.00008	  -0.00024	  -0.00088
              8	   0.00097	   0.00030	  -0.00003	  -0.00005	   0.00001	   0.00005	  -0.00002	  -0.00006	  -0.00082
              18	   0.00048	  -0.00094	  -0.00006	   0.00012	  -0.00004	  -0.00021	  -0.00001	   0.00103	  -0.00063
              28	   0.00001	  -0.00001	  -0.00031	  -0.00164	  -0.00011	   0.00146	   0.00013	  -0.00020	  -0.00006
              55	   0.00037	  -0.00057	   0.00140	   0.00017	  -0.00005	  -0.00004	   0.00017	   0.00021	  -0.00018
              60	   0.00010	   0.00004	   0.00005	  -0.00010	  -0.00005	  -0.00005	  -0.00010	  -0.00009	  -0.00011
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            </tableData>
          </table>
        </product>
      </function>

      <function name="aero/coefficients/CFZGEAR">
        <description>LIFT INCREMENT DUE TO GEAR</description>
        <product>
          <property>gear/gear-position-norm</property>
          <table>
            <independentVar lookup="row">aero/alpha-deg</independentVar>
            <independentVar lookup="column">aero/beta-deg</independentVar>
            <tableData>
              -20	        -10	         -5	         -2	          0	          2	          5	         10	         20
              -20	  -0.00028	  -0.00042	  -0.00047	  -0.00067	  -0.00070	  -0.00037	  -0.00074	  -0.00044	  -0.00028
              -2	   0.00000	   0.00011	   0.00006	   0.00000	   0.00005	   0.00005	  -0.00001	   0.00011	  -0.00003
              8	  -0.00017	  -0.00022	   0.00008	   0.00000	  -0.00004	  -0.00009	  -0.00020	   0.00003	  -0.00001
              18	   0.00059	   0.00088	   0.00031	  -0.00014	  -0.00023	  -0.00006	   0.00039	   0.00115	   0.00050
              28	   0.00150	   0.00173	   0.00152	   0.00259	   0.00306	   0.00263	   0.00213	   0.00205	   0.00156
              55	   0.00137	   0.00119	   0.00068	   0.00116	   0.00096	   0.00109	   0.00147	   0.00099	   0.00139
              60	   0.00153	   0.00188	   0.00195	   0.00180	   0.00175	   0.00180	   0.00191	   0.00173	   0.00142
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            </tableData>
          </table>
        </product>
      </function>


      <function name="aero/coefficients/CMLGEAR">
        <description>ROLLING MOMENT INCREMENT DUE TO GEAR</description>
        <product>
          <property>gear/gear-position-norm</property>
          <table>
            <independentVar lookup="row">aero/alpha-deg</independentVar>
            <independentVar lookup="column">aero/beta-deg</independentVar>
            <tableData>
              -20	        -10	         -5	         -2	          0	          2	          5	         10	         20
              -20	  -0.00012	  -0.00006	  -0.00003	  -0.00001	   0.00000	  -0.00009	   0.00001	   0.00007	   0.00007
              -2	   0.00004	  -0.00002	  -0.00002	   0.00000	   0.00000	   0.00001	   0.00001	   0.00002	  -0.00004
              8	   0.00005	  -0.00004	  -0.00002	  -0.00003	   0.00000	   0.00002	   0.00006	  -0.00002	  -0.00007
              18	   0.00011	  -0.00022	  -0.00007	  -0.00005	   0.00000	   0.00004	   0.00007	   0.00015	  -0.00007
              28	   0.00000	   0.00016	   0.00012	  -0.00019	  -0.00001	   0.00017	  -0.00010	  -0.00017	   0.00000
              55	   0.00009	   0.00006	  -0.00009	  -0.00004	   0.00002	   0.00004	   0.00001	  -0.00003	  -0.00015
              60	   0.00015	   0.00006	   0.00003	   0.00003	   0.00000	  -0.00002	  -0.00003	  -0.00006	  -0.00016
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            </tableData>
          </table>
        </product>
      </function>

      <function name="aero/coefficients/CMMGEAR">
        <description>PITCHING MOMENT INCREMENT DUE TO GEAR</description>
        <product>
          <property>gear/gear-position-norm</property>
          <table>
            <independentVar lookup="row">aero/alpha-deg</independentVar>
            <independentVar lookup="column">aero/beta-deg</independentVar>
            <tableData>
              -20	        -10	         -5	         -2	          0	          2	          5	         10	         20
              -20	  -0.00123	  -0.00153	  -0.00156	  -0.00119	  -0.00113	  -0.00170	  -0.00111	  -0.00153	  -0.00130
              -2	  -0.00002	  -0.00015	  -0.00017	  -0.00016	  -0.00016	  -0.00016	  -0.00017	  -0.00013	   0.00001
              8	   0.00079	   0.00082	   0.00060	   0.00077	   0.00079	   0.00088	   0.00099	   0.00059	   0.00061
              18	   0.00073	   0.00124	   0.00146	   0.00140	   0.00140	   0.00125	   0.00131	   0.00087	   0.00082
              28	   0.00265	   0.00156	   0.00145	   0.00182	   0.00191	   0.00176	   0.00075	   0.00106	   0.00258
              55	   0.00236	   0.00271	   0.00308	   0.00266	   0.00290	   0.00280	   0.00244	   0.00277	   0.00229
              60	   0.00240	   0.00221	   0.00222	   0.00243	   0.00241	   0.00243	   0.00225	   0.00234	   0.00246
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            </tableData>
          </table>
        </product>
      </function>

      <function name="aero/coefficients/CMNGEAR">
        <description>YAWING MOMENT INCREMENT DUE TO GEAR</description>
        <product>
          <property>gear/gear-position-norm</property>
          <table>
            <independentVar lookup="row">aero/alpha-deg</independentVar>
            <independentVar lookup="column">aero/beta-deg</independentVar>
            <tableData>
              -20	        -10	         -5	         -2	          0	          2	          5	         10	         20
              -20	  -0.00081	  -0.00038	  -0.00021	  -0.00009	   0.00000	   0.00010	   0.00023	   0.00038	   0.00078
              -2	  -0.00088	  -0.00048	  -0.00022	  -0.00010	   0.00000	   0.00009	   0.00024	   0.00047	   0.00088
              8	  -0.00076	  -0.00049	  -0.00026	  -0.00010	   0.00000	   0.00012	   0.00026	   0.00058	   0.00084
              18	  -0.00096	  -0.00026	  -0.00029	  -0.00009	  -0.00002	   0.00005	   0.00026	   0.00027	   0.00090
              28	  -0.00090	  -0.00046	  -0.00078	  -0.00057	  -0.00005	   0.00048	   0.00048	   0.00032	   0.00087
              55	  -0.00033	  -0.00046	   0.00049	   0.00004	  -0.00001	   0.00006	   0.00012	   0.00031	   0.00041
              60	  -0.00043	  -0.00016	  -0.00005	  -0.00008	  -0.00001	   0.00004	   0.00007	   0.00017	   0.00042
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            </tableData>
          </table>
        </product>
      </function>

      <function name="aero/coefficients/CLIFT">
            <sum>
                <property>aero/coefficients/CFZB</property>
                <property>aero/coefficients/CFZTNK</property>
                <property>aero/coefficients/CFZAIM</property>
                <property>aero/coefficients/CFZFLAPS</property>
                <property>aero/coefficients/CFZGEAR</property>
                <property>aero/coefficients/DClRamp</property>
                <property>aero/coefficients/DClGE</property>
            </sum>
        </function>
        <axis name="LIFT">
            <function name="aero/force/LIFT">
                <product>
                    <property>aero/qbar-psf</property>
                    <property>metrics/Sw-sqft</property>
                    <property>aero/coefficients/CLIFT</property>
                    <property>aero/coefficients/ClMach</property>
                </product>
            </function>
        </axis>
        <function name="aero/coefficients/CDRAG">
                <sum>
                    <property>aero/coefficients/CFXB</property>
                    <property>aero/coefficients/CFXTNK</property>
                    <property>aero/coefficients/CFXAIM</property>
                    <property>aero/coefficients/CdDBRK</property>
                    <property>aero/coefficients/CFXFLAPS</property>
                  <property>aero/coefficients/CFXGEAR</property>
                  <property>aero/coefficients/DCdRamp</property>
                    <property>aero/coefficients/DCdGE</property>
                    <property>aero/coefficients/DCdCFT</property>
                </sum>
        </function>
        <axis name="DRAG">
            <function name="aero/force/DRAG">
                <product>
                    <property>aero/qbar-psf</property>
                    <property>metrics/Sw-sqft</property>
                    <property>aero/coefficients/CDRAG</property>
                    <property>aero/coefficients/CdMach</property>
                </product>
            </function>
        </axis>
        <function name="aero/coefficients/CSIDE">
            <sum>
                <property>aero/coefficients/CFYB</property>
                <property>aero/coefficients/CFYP</property>
                <property>aero/coefficients/CFYR</property>
                <property>aero/coefficients/CYDAD</property>
                <property>aero/coefficients/CYDRD</property>
                <property>aero/coefficients/CYDTD</property>
                <property>aero/coefficients/CYRB</property>
                <property>aero/coefficients/CFYTNK</property>
                <property>aero/coefficients/CFYAIM</property>
                <property>aero/coefficients/CFYGEAR</property>
            </sum>
        </function>
        <axis name="SIDE">
            <function name="aero/force/SIDE">
                <product>
                    <property>aero/qbar-psf</property>
                    <property>metrics/Sw-sqft</property>
                    <property>aero/coefficients/CSIDE</property>
                    <property>aero/coefficients/CyMach</property>
                </product>
            </function>
        </axis>
        <function name="aero/coefficients/CROLL">
            <sum>
                <property>aero/coefficients/CML1</property>
                <property>aero/coefficients/CMLP</property>
                <property>aero/coefficients/CMLR</property>
                <property>aero/coefficients/CMLDAD</property>
                <property>aero/coefficients/CMLDRD</property>
                <property>aero/coefficients/CMLDTD</property>
                <property>aero/coefficients/CMLDCLB</property>
                <property>aero/coefficients/CMLTNK</property>
                <property>aero/coefficients/CMLAIM</property>
                <property>aero/coefficients/CMLGEAR</property>
            </sum>
        </function>
        <axis name="ROLL">
            <function name="aero/force/ROLL">
                <product>
                    <property>aero/qbar-psf</property>
                    <property>metrics/Sw-sqft</property>
                    <property>metrics/bw-ft</property>
                    <property>aero/coefficients/CROLL</property>
                    <property>aero/coefficients/CLMach</property>
                </product>
            </function>
        </axis>
        <function name="aero/coefficients/CPITCH">
            <sum>
                <property>aero/coefficients/CMM1</property>
                <property>aero/coefficients/CMMQ</property>
                <property>aero/coefficients/DCMRamp</property>
                <property>aero/coefficients/CMMTNK</property>
                <property>aero/coefficients/DCMGE</property>
                <property>aero/coefficients/CMMAIM</property>
              <property>aero/coefficients/CMMFLAPS</property>
              <property>aero/coefficients/CMMGEAR</property>
            </sum>
        </function>
        <axis name="PITCH">
            <function name="aero/force/PITCH">
                <product>
                    <property>aero/qbar-psf</property>
                    <property>metrics/Sw-sqft</property>
                    <property>metrics/cbarw-ft</property>
                    <property>aero/coefficients/CPITCH</property>
                    <property>aero/coefficients/CMMach</property>
                </product>
            </function>
        </axis>
        <function name="aero/coefficients/CYAW">
            <sum>
                <property>aero/coefficients/CMN1</property>
                <property>aero/coefficients/CMNDRDr</property>
                <property>aero/coefficients/CMNP</property>
                <property>aero/coefficients/CMNR</property>
                <property>aero/coefficients/CMNDTD</property>
                <property>aero/coefficients/CMNDAD</property>
                <property>aero/coefficients/CMNRB</property>
                <property>aero/coefficients/CMNTNK</property>
                <property>aero/coefficients/CMNAIM</property>
                <property>aero/coefficients/CMNGEAR</property>
            </sum>
        </function>
        <axis name="YAW">
            <function name="aero/force/YAW">
                <product>
                    <property>aero/qbar-psf</property>
                    <property>metrics/Sw-sqft</property>
                    <property>metrics/bw-ft</property>
                    <property>aero/coefficients/CYAW</property>
                    <property>aero/coefficients/CNMach</property>
                </product>
            </function>
        </axis>
    </aerodynamics>

        <output name="c:/temp/F-15-JSBOut.csv" type="CSV" rate="10">
        <property caption="AccelError">cas/pitch/accel-error</property>
        <property caption="PilotGdamped">/accelerations/pilot-gdamped</property>
        <property caption="AccelLeadlag">cas/pitch/accel-leadlag</property>
        <property caption="AccelLeadlagV">cas/pitch/accel-leadlag-v</property>
        <property caption="AccelFeel">cas/pitch/accel-feel</property>
        <property caption="AccelDemand">cas/pitch/accel-demand</property>
        <property caption="AccelFixed">cas/pitch/accel-fixed</property>
        <property caption="ElapsedSec">/sim/time/elapsed-sec</property>
        <property caption="VcKts">velocities/vc-kts</property>
        <property caption="ElevonAeroDeg">fcs/elevator-pos-deg</property>
        <property caption="Weightlbs">inertia/weight-lbs</property>
        <property caption="Mach">velocities/mach</property>
        <property caption="AltitudeFeet">position/h-sl-ft</property>
        <property caption="Augmentation">propulsion/engine/augmentation-alight</property>
        <property caption="ThrustLbs">propulsion/engine/thrust-lbs</property>
        <property caption="N2">propulsion/engine/n2</property>
        <property caption="CgXMACPercent">inertia/cg-x-mac-percent</property>
        <property caption="Flap">fcs/flap-pos-norm</property>
        <property caption="Gear">gear/gear-dmd-norm</property>
        <property caption="PtcFeedbackG">cas/ptc-feedback-g</property>
        <property caption="Pb">aero/pb</property>
        <property caption="Qb">aero/qb</property>
        <property caption="Rb">aero/rb</property>
        <property caption="Ax">accelerations/a-pilot-x-ft_sec2</property>
        <property caption="Ay">accelerations/a-pilot-y-ft_sec2</property>
        <property caption="Az">accelerations/a-pilot-z-ft_sec2</property>
        <property caption="alpha">aero/alpha-deg</property>
        <property caption="drag">aero/force/DRAG</property>
        <property caption="lift">aero/force/LIFT</property>
        <property caption="side">aero/force/SIDE</property>
        <property caption="pitch">aero/force/PITCH</property>
        <property caption="roll">aero/force/ROLL</property>
        <property caption="yaw">aero/force/YAW</property>
        <property caption="qbar-UV">aero/qbar-UV-psf</property>
        <property caption="qbar-UW">aero/qbar-UW-psf</property>
        <property caption="yaw-damper-sum-v0">fcs/yaw-damper-sum-v0</property>
        <property caption="yaw-damper-sum-v0">fcs/yaw-damper-sum-v</property>
        <property caption="yaw-damper-factor">fcs/yaw-damper-factor</property>
        <property caption="yaw-damper-factor-c1">fcs/yaw-damper-factor-c1</property>

    </output>
<!--
     <output name="c:/users/richard/dev/flightgear/aircraft/f-14b/JSBOut.csv" type="CSV" rate="10">
        <property>position/aircraft-on-ground</property>
        <property>velocities/h-dot-fps</property>
        <property>velocities/u-aero-fps</property>
        <property>velocities/v-aero-fps</property>
        <property>velocities/w-aero-fps</property>

        <property>gear/unit[0]/compression-ft</property>
        <property>gear/unit[1]/compression-ft</property>
        <property>gear/unit[2]/compression-ft</property>

        <property>gear/unit[0]/damaged</property>
        <property>gear/unit[0]/WOW</property>

        <property>gear/unit[1]/damaged</property>
        <property>gear/unit[1]/WOW</property>

        <property>gear/unit[2]/damaged</property>
        <property>gear/unit[2]/WOW</property>
</output>-->
</fdm_config>
