<?xml version="1.0"?>
<!--
  Name:     F110-GE-400
  File:     F110-GE-400.xml
  Author:   Richard Harrison (rjh@zaretto.com)
  Date:     20 September 2014
  Description:
    Two-shaft turbofan engine with afterburner and convergent/divergent nozzle
    Type: Afterburning turbofan
    Length: 182.3 - 232.3 in (463 - 590 cm)
    Diameter: 46.5 in (118 cm)
    Dry weight: 3,920 - 4,400 lb (1,778 - 1,996 kg)
    Compressor: 2 spool: 3 fan and 9 high pressure compressor stages
    Combustors: annular
    Turbine: 2 low-pressure and 1 high-pressure stages
    Maximum thrust: F110-GE-400:
    Turbine inlet temperature: 2750F (1510C)[4]

  Engine Thrust tables are based on NASA-TM-104326 tables 4-6 normalized and adjusted
  for altitude. These figures are derived mainly from table 6 (as the altitude is constant)
  normalized throttle position against mach (to give max thrust) and then altitude factor added
  using a basic atmosphere model.

  Augmentation figures the same as mil thrust - it is just the difference between milthrust and maxthrust
  in the definition that defines the thrust. I believe this is correct as the mass flow / gas characteristics
  of the turbine aren't  altered when augmented so the assumption is that the values will be close in shape to the milthrust ones.
  See the table here: http://adg.stanford.edu/aa241/propulsion/images/tvsv.gif - the ratio of Thrust to AB increases by
  0.26 from 0 to mach 1.0 - which in the abscence of F110 AB performance figures means that it is close enough to the trend.

  The values for Mach > 0.955 are constant as the airframe has inlet ramps to slow the incoming air and this is
  a simple way to model it; for a more complete model there should be a data table that takes into account ramp
  position and mach to provide inlet airflow.

  Future enhancements of the model would be to
  1. Model inlet airflow rate
  2. Flameout engines when insufficient air mass
  3. Adverse effects when inlet airflow too high and would compressor stalls,  and/or stagnation and/or
  Refs:
        Flight and Static Exhaust Flow  Properties of an F110-GE-129  Engine in an F-16XL Airplane  During Acoustic Tests
        Jon K. Holzman, Lannie D. Webb, and Frank W. Burcham,
        November 1996
        NASA-TM-104326

        Real-Time Simulation of an F 110/STOVL Turbofan Engine
        Colin K. Drummond and Peter J. Ouzts
        October 16-17, 1989
        NASA-TM-102409

   http://www.jet-engine.net/miltfspec.html
   http://www.geaviation.com/military/engines/f110/
   http://www.stardestroyer.net/Armour/ShepStuff/Website/Statistics/Engines.htm
-->

<turbine_engine name="F110-GE-400">
    <milthrust> 16800.0 </milthrust>
    <maxthrust> 27080 </maxthrust>
    <bypassratio>     0.87  </bypassratio>
    <tsfc>            0.675 </tsfc>
    <atsfc>           2.01  </atsfc>
    <!-- kg/(kNH) http://www.anft.net/f-14/f14-detail-engine.htm -->
    <bleed>           0.03</bleed>
    <idlen1>         30.0 </idlen1>
    <idlen2>         60.0 </idlen2>
    <maxn1>         100.0 </maxn1>
    <maxn2>         100.0 </maxn2>
    <augmented>         1 </augmented>
    <augmethod>         2 </augmethod>
    <!-- acceleration from 0 -> 15% (at which point the start logic takes over in FGTurbine using 1.2 and 2.0 for N1/N2 acceleration rate) -->
    <n1spinup>1</n1spinup>
    <n2spinup>3</n2spinup>

    <injected>          0 </injected>

    <function name="IdleThrust">
        <table>
            <independentVar lookup="row">velocities/mach</independentVar>
            <independentVar lookup="column">atmosphere/density-altitude</independentVar>
            <tableData>
                            0      5000     10000     15000     20000     25000     30000     35000     40000     45000     50000     55000     60000     65000     70000     75000
              0.000  0.028890  0.024852  0.021241  0.018029  0.015191  0.012699  0.010526  0.008644  0.006815  0.005359  0.004214  0.003314  0.002606  0.002049  0.001611  0.001267
              0.282  0.028890  0.024852  0.021241  0.018029  0.015191  0.012699  0.010526  0.008644  0.006815  0.005359  0.004214  0.003314  0.002606  0.002049  0.001611  0.001267
              0.300  0.028746  0.024728  0.021134  0.017939  0.015115  0.012636  0.010473  0.008601  0.006781  0.005332  0.004193  0.003297  0.002593  0.002039  0.001603  0.001261
              0.308  0.028453  0.024476  0.020919  0.017756  0.014961  0.012507  0.010367  0.008513  0.006711  0.005278  0.004150  0.003264  0.002566  0.002018  0.001587  0.001248
              0.601  0.042800  0.036818  0.031467  0.026710  0.022506  0.018814  0.015594  0.012806  0.010096  0.007939  0.006243  0.004909  0.003861  0.003036  0.002387  0.001877
              0.603  0.042714  0.036743  0.031404  0.026656  0.022460  0.018776  0.015562  0.012780  0.010075  0.007923  0.006230  0.004899  0.003853  0.003030  0.002383  0.001874
              0.605  0.042658  0.036695  0.031363  0.026621  0.022431  0.018751  0.015542  0.012764  0.010062  0.007913  0.006222  0.004893  0.003848  0.003026  0.002379  0.001871
              0.793  0.054850  0.047183  0.040327  0.034230  0.028842  0.024110  0.019984  0.016412  0.012938  0.010174  0.008001  0.006292  0.004947  0.003891  0.003059  0.002406
              0.804  0.055525  0.047763  0.040822  0.034651  0.029196  0.024407  0.020230  0.016614  0.013097  0.010299  0.008099  0.006369  0.005008  0.003938  0.003097  0.002435
              0.814  0.056021  0.048190  0.041187  0.034960  0.029457  0.024625  0.020410  0.016762  0.013214  0.010391  0.008171  0.006426  0.005053  0.003974  0.003125  0.002457
              0.946  0.065140  0.056034  0.047891  0.040651  0.034252  0.028633  0.023733  0.019490  0.015365  0.012083  0.009501  0.007472  0.005876  0.004620  0.003633  0.002857
              0.955  0.065976  0.056754  0.048506  0.041173  0.034692  0.029001  0.024038  0.019741  0.015562  0.012238  0.009623  0.007568  0.005951  0.004680  0.003680  0.002894
              1.200  0.065976  0.056754  0.048506  0.041173  0.034692  0.029001  0.024038  0.019741  0.015562  0.012238  0.009623  0.007568  0.005951  0.004680  0.003680  0.002894
              1.600  0.065976  0.056754  0.048506  0.041173  0.034692  0.029001  0.024038  0.019741  0.015562  0.012238  0.009623  0.007568  0.005951  0.004680  0.003680  0.002894
              1.800  0.065976  0.056754  0.048506  0.041173  0.034692  0.029001  0.024038  0.019741  0.015562  0.012238  0.009623  0.007568  0.005951  0.004680  0.003680  0.002894
            </tableData>
        </table>
    </function>

    <function name="MilThrust">
        <table>
            <independentVar lookup="row">velocities/mach</independentVar>
            <independentVar lookup="column">atmosphere/density-altitude</independentVar>
            <tableData>
                           0     5000    10000    15000    20000    25000    30000    35000    40000    45000    50000    55000    60000    65000    70000    75000
              0.000   1.0053   0.8648   0.7391   0.6274   0.5286   0.4419   0.3663   0.3008   0.2371   0.1865   0.1466   0.1153   0.0907   0.0713   0.0561   0.0441
              0.282   1.0053   0.8648   0.7391   0.6274   0.5286   0.4419   0.3663   0.3008   0.2371   0.1865   0.1466   0.1153   0.0907   0.0713   0.0089   0.0011
              0.300   1.0003   0.8604   0.7354   0.6242   0.5260   0.4397   0.3644   0.2993   0.2359   0.1855   0.1459   0.1147   0.0902   0.0709   0.0558   0.0070
              0.308   0.9901   0.8517   0.7279   0.6179   0.5206   0.4352   0.3607   0.2962   0.2335   0.1836   0.1444   0.1136   0.0893   0.0702   0.0552   0.0069
              0.601   1.4893   1.2811   1.0950   0.9294   0.7831   0.6547   0.5426   0.4456   0.3513   0.2763   0.2172   0.1708   0.1343   0.1056   0.0831   0.0104
              0.603   1.4863   1.2786   1.0928   0.9276   0.7815   0.6533   0.5415   0.4447   0.3506   0.2757   0.2168   0.1705   0.1341   0.1054   0.0829   0.0104
              0.605   1.4844   1.2769   1.0913   0.9263   0.7805   0.6525   0.5408   0.4441   0.3501   0.2753   0.2165   0.1703   0.1339   0.1053   0.0828   0.0103
              0.793   1.9086   1.6418   1.4032   1.1911   1.0036   0.8390   0.6954   0.5711   0.4502   0.3540   0.2784   0.2189   0.1722   0.1354   0.1065   0.0133
              0.804   1.9321   1.6620   1.4205   1.2057   1.0159   0.8493   0.7039   0.5781   0.4557   0.3584   0.2818   0.2216   0.1743   0.1370   0.1078   0.0135
              0.814   1.9493   1.6769   1.4332   1.2165   1.0250   0.8569   0.7102   0.5833   0.4598   0.3616   0.2843   0.2236   0.1758   0.1383   0.1087   0.0136
              0.946   2.2667   1.9498   1.6665   1.4145   1.1919   0.9963   0.8258   0.6782   0.5347   0.4204   0.3306   0.2600   0.2045   0.1608   0.1264   0.0158
              0.955   2.2958   1.9749   1.6879   1.4327   1.2072   1.0091   0.8364   0.6869   0.5415   0.4258   0.3349   0.2633   0.2071   0.1628   0.1281   0.0160
              1.200   2.2958   1.9749   1.6879   1.4327   1.2072   1.0091   0.8364   0.6869   0.5415   0.4258   0.3349   0.2633   0.2071   0.1628   0.1281   0.0160
              1.600   2.2958   1.9749   1.6879   1.4327   1.2072   1.0091   0.8364   0.6869   0.5415   0.4258   0.3349   0.2633   0.2071   0.1628   0.1281   0.0160
              1.800   2.2958   1.9749   1.6879   1.4327   1.2072   1.0091   0.8364   0.6869   0.5415   0.4258   0.3349   0.2633   0.2071   0.1628   0.1281   0.0160
            </tableData>
        </table>
    </function>

    <function name="AugThrust">
        <table>
            <independentVar lookup="row">velocities/mach</independentVar>
            <independentVar lookup="column">atmosphere/density-altitude</independentVar>
            <tableData>
                           0     5000    10000    15000    20000    25000    30000    35000    40000    45000    50000    55000    60000    65000    70000    75000
              0.000   1.0053   0.8648   0.7391   0.6274   0.5286   0.4419   0.3663   0.3008   0.2371   0.1865   0.1466   0.1153   0.0907   0.0713   0.0561   0.0441
              0.282   1.0053   0.8648   0.7391   0.6274   0.5286   0.4419   0.3663   0.3008   0.2371   0.1865   0.1466   0.1153   0.0907   0.0713   0.0089   0.0011
              0.300   1.0003   0.8604   0.7354   0.6242   0.5260   0.4397   0.3644   0.2993   0.2359   0.1855   0.1459   0.1147   0.0902   0.0709   0.0558   0.0070
              0.308   0.9901   0.8517   0.7279   0.6179   0.5206   0.4352   0.3607   0.2962   0.2335   0.1836   0.1444   0.1136   0.0893   0.0702   0.0552   0.0069
              0.601   1.4893   1.2811   1.0950   0.9294   0.7831   0.6547   0.5426   0.4456   0.3513   0.2763   0.2172   0.1708   0.1343   0.1056   0.0831   0.0104
              0.603   1.4863   1.2786   1.0928   0.9276   0.7815   0.6533   0.5415   0.4447   0.3506   0.2757   0.2168   0.1705   0.1341   0.1054   0.0829   0.0104
              0.605   1.4844   1.2769   1.0913   0.9263   0.7805   0.6525   0.5408   0.4441   0.3501   0.2753   0.2165   0.1703   0.1339   0.1053   0.0828   0.0103
              0.793   1.9086   1.6418   1.4032   1.1911   1.0036   0.8390   0.6954   0.5711   0.4502   0.3540   0.2784   0.2189   0.1722   0.1354   0.1065   0.0133
              0.804   1.9321   1.6620   1.4205   1.2057   1.0159   0.8493   0.7039   0.5781   0.4557   0.3584   0.2818   0.2216   0.1743   0.1370   0.1078   0.0135
              0.814   1.9493   1.6769   1.4332   1.2165   1.0250   0.8569   0.7102   0.5833   0.4598   0.3616   0.2843   0.2236   0.1758   0.1383   0.1087   0.0136
              0.946   2.2667   1.9498   1.6665   1.4145   1.1919   0.9963   0.8258   0.6782   0.5347   0.4204   0.3306   0.2600   0.2045   0.1608   0.1264   0.0158
              0.955   2.2958   1.9749   1.6879   1.4327   1.2072   1.0091   0.8364   0.6869   0.5415   0.4258   0.3349   0.2633   0.2071   0.1628   0.1281   0.0160
              1.200   2.2958   1.9749   1.6879   1.4327   1.2072   1.0091   0.8364   0.6869   0.5415   0.4258   0.3349   0.2633   0.2071   0.1628   0.1281   0.0160
              1.600   2.2958   1.9749   1.6879   1.4327   1.2072   1.0091   0.8364   0.6869   0.5415   0.4258   0.3349   0.2633   0.2071   0.1628   0.1281   0.0160
              1.800   2.2958   1.9749   1.6879   1.4327   1.2072   1.0091   0.8364   0.6869   0.5415   0.4258   0.3349   0.2633   0.2071   0.1628   0.1281   0.0160
            </tableData>
        </table>
    </function>

</turbine_engine>
