<?xml version="1.0"?>
<?xml-stylesheet type="text/xsl" href="http://raw.githubusercontent.com/JSBSim-Team/jsbsim/master/JSBSimScript.xsl"?>
<fdm_config name="F-14B" version="2.0" release="PRODUCTION"
   xmlns:xsi="http://www.w3.org/2001/XMLSchema-instance"
   xsi:noNamespaceSchemaLocation="http://raw.githubusercontent.com/JSBSim-Team/jsbsim/master/JSBSim.xsd">

    <fileheader>
        <author>Richard Harrison</author>
        <filecreationdate>2014-08-02</filecreationdate>
        <version>1.0</version>
        <description>
            Models an F14-B with GE engines. The aerodata used is from
            ref[1] volumes 1 and 2 is only for sweep of 22degrees, positive
            alpha, clean, low speed so various data have been extrapolated
            estimated based on best available data where I cannot find specific
            details for F14 other aero models that I can find (often using NASA
            CR-1756 as guidance for general trends) are guidance or starting point for each value.
            The estimation of negative alpha values follows CR-1756 trends with values based on
            F14 data for positive values.

            Engine Thrust are based on NASA-TM-104326 tables 4-6 adjusted for altitude and with
            augmentation figures based on that of the mil thrust.

            The flaps and auxiliary flaps coefficients are modelled based on tuning to meet F-14AAD-1 as no data
            is currently available. The proportions assigned are relative to their surface area
            (as measured roughly 64% main, 36% aux) - the values assigned are 0.7 and 0.3 based on this
            and this applies to ClDFM, CdDFM and CMDFM

        </description>
        <note>Aircraft origin for measurements is the nose.</note>
        <note>Low speed clean should be exactly as an F-14 as this model is based on accurate aerodata (see limitations below).</note>
        <limitation>Spoilers, sweep, speedbrake, flaps, gear aerodata not modelled in ADA101648 - figured out values are be used</limitation>
        <reference
            refID="http://zaretto.com/f-14b"
            author="Richard Harrison"
            title="Grummnan F-14B Model for flightgear"
            date="October 24, 2014"
        />
        <reference
            refID="AFWAL-TR-80-3141"
            author="Donald E. Johnston, David G. Mitchell, Thomas T. Myers"
            title="Investigation of High-Angle-of-Attack Maneuver-limiting factors, Part I: Anaylsis and simulation"
            date="1980"
        />
        <reference
            refID="AFWAL-TR-80-3141"
            author="Donald E. Johnston, David G. Mitchell, Thomas T. Myers"
            title="Investigation of High-Angle-of-Attack Maneuver-limiting factors, Part III: Appendices aerodynamic models"
            date="1980"
        />
        <reference
            refID="NASA TN D-6909"
            author="Sue B. Grafton and Ernie L. Anglin"
            title="DYNAMIC STABILITY DERIVATIVES AT ANGLES OF ATTACK FROM -5deg TO 90deg FOR A VARIABLE-SWEEP FIGHTER CONFIGURATION WITH TWIN VERTICAL TAILS"
            date="1972"
        />
        <reference
            refID="NASA-TP-3253"
            author="Gary E. Erickson and Lawrence W. Rogers"
            title="Effects of Forebody Strakes an Mach number on overall aerodynamic characterisitcs of configuration with 55degree cropped delta wing"
            date="November 1992"
        />
        <reference
            refID="NASA-TM-81833"
            title="Simulator results of an F-14A airplane utilizing an aileron-rudder interconnect during carrier approaches and landings"
            author="Kelly, W. W. and Brown, P. W. (NASA Langley Research Center Hampton, VA, United States)"
            date="May 1, 1980"
            URL="https://ntrs.nasa.gov/citations/19800020867"
        />
        <reference
            refID="NASA-TM-84643"
            author="M. Leroy Spearman"
            title="Effects of Wing and tail location on the aerodynamic characteristics of an airplane for mach numbers from 0.25 to 4.63"
            date="March 1983"
        />
        <reference
            refID="NASA-aaia-2000-0900"
            title="Aerodynamic characteristics, database development and flight simulation of the X-34 vehicle"
            author="Bandu Pamadi, Gregory Brauckmann, Michael Ruth and Henri Fuhrmann"
            date="22 Aug 2012"
            URL="https://doi.org/10.2514/6.2000-900"
        />
        <reference
            refID="NASA-TM-104326"
            title="Flight and Static Exhaust Flow  Properties of an F110-GE-129  Engine in an F-16XL Airplane  During Acoustic Tests"
            author="Jon K. Holzman, Lannie D. Webb, and Frank W. Burcham, JR."
            date="November 1996"
        />
        <reference
            refID="NASA-TM-101717"
            title="Flutter clearance to the F-14A Variable-Sweep Transition Flight Expirement Airplane - Phase 2"
            author="Lawrence C. Freudinger and Michael W. Kehoe"
            date="July 1990"
        />
        <reference
            refID="NASA-TM-102409"
            author="Colin K. Drummond and Peter J. Ouzts"
            title="Real-Time Simulation of an F 110/STOVL Turbofan Engine"
            date="October 16-17, 1989"
        />
        <reference
            refID="http://www.ssdl.gatech.edu/papers/mastersProjects/MillerJ-8900.pdf"
            title="Investigation of Transonic Drag Computations in Aerodynamic Preliminary Analysis System (APAS)"
            author="Jeff Miller"
            date="April 26, 2002"
        />
        <reference
            refID="NASA TM-X-62244"
            URL="https://ntrs.nasa.gov/search.jsp?R=19730023208"
            title="Low-speed wind-tunnel investigation of the longitudinal characteristics of a large-scale variable wing-sweep fighter model in the high-lift configuration"
            author="William T. Eckert and Ralph L. Maki"
            date="August 1, 1973"
            />
    </fileheader>

    <!--
Notes:

1. possibly need to consider differential spoiler deflection on yaw moments

2. Surface positions
Cockpit control	Stabilizer Surface	Parallel Trim
Actuation	Mode	Motion	Authority	Rate	Authority	Rate
Control Stick	Manual	4 Inches forward
5.5 inches AFT	12deg TED
33deg TEU	36deg/second	9deg TEU
18deg TEU	1 deg/second
AFCS	Series (SAS)	NONE	+/- 3deg	20deg/second	-	-
	Parallel
(ACL Only)	4 Inches forward
5.5 inches AFT	12deg TED
33deg TEU	36deg/second	9deg TEU
18deg TEU	0.1 deg/second
Maneuver FLAP (ITS) AND DLC Thumbwheel	Series	+45 deg DLC Thumbwheel mode	8.4 TED maximum	36deg/second	-	-
		+45deg maneuver flap mode	+/- 3deg	3deg/sec	-	-
-->

    <!-- <system file="f-14a-engines"/> -->
    <!-- <system file="jt9d"/> -->
    <system file="f-14b-hydraulic"/>
    <system file="f-14b-electrics"/>
    <system file="f-14b-cadc"/>
    <system file="f-14b-ecs.xml"/>
    <system file="f-14b-engines"/>
    <system file="hook"/>
    <system file="catapult"/>
    <system file="holdback"/>
    <system file="f-14b-landing-gear"/>

    <metrics>
        <wingarea       unit="FT2">   565 </wingarea>
        <wingspan       unit="FT" >    64 </wingspan>
        <wing_incidence unit="DEG">     2 </wing_incidence>

        <chord     unit="FT" >    9.82 </chord>
        <htailarea unit="FT2">  140.00 </htailarea>
        <htailarm  unit="FT" >   25.10 </htailarm>
        <vtailarea unit="FT2">  118.00 </vtailarea>
        <!-- 59ft2 each -->
        <vtailarm  unit="FT" >   25.10 </vtailarm>

        <location name="EYEPOINT" unit="IN">
            <x> 197 </x>
            <y>   0.00 </y>
            <z>  -3.94 </z>
        </location>
        <location name="VRP" unit="IN">
            <x>  386</x>
            <y>  0 </y>
            <z>  31 </z>
        </location>
        <location name="AERORP" unit="IN">
            <x> 419 </x>
            <y>   0.00 </y>
            <z>   0.00 </z>
        </location>
    </metrics>

    <mass_balance>
        <ixx unit="SLUG*FT2">     58950 </ixx>
        <iyy unit="SLUG*FT2">    225600 </iyy>
        <izz unit="SLUG*FT2">    285000 </izz>
        <!-- using GE F110 engines but aero is for F14A -->
        <!-- left to right; 01 pylons, 2 left tank, 3456 centre rails, 7 right tank, 89 right  pylons -->
        <emptywt unit="LBS" >     42104 </emptywt>
        <location name="CG" unit="IN">
            <x> 407</x>
            <y>   0.00 </y>
            <z>   0.00 </z>
        </location>
        <pointmass name="Left Pylon0">
            <weight unit="LBS"> 0 </weight>
            <location name="POINTMASS" unit="IN">
                <x> 403 </x>
                <y> -100 </y>
                <z> -13 </z>
            </location>
        </pointmass>
        <pointmass name="Left Pylon1">
            <weight unit="LBS"> 0 </weight>
            <location name="POINTMASS" unit="IN">
                <x> 403 </x>
                <y> -95 </y>
                <z> -10 </z>
            </location>
        </pointmass>
        <pointmass name="Left External Tank2">
            <weight unit="LBS"> 0 </weight>
            <location name="POINTMASS" unit="IN">
                <x>416</x>
                <y>-55</y>
                <z>-110</z>
            </location>
        </pointmass>

        <pointmass name="Centre Left Front3">
            <weight unit="LBS"> 0 </weight>
            <location name="POINTMASS" unit="IN">
                <x> 316 </x>
                <y> -5 </y>
                <z> -3 </z>
            </location>
        </pointmass>

        <pointmass name="Centre Left Rear4">
            <weight unit="LBS"> 0 </weight>
            <location name="POINTMASS" unit="IN">
                <x> 500 </x>
                <y> -5 </y>
                <z> -3 </z>
            </location>
        </pointmass>
        <pointmass name="Centre Right Front5">
            <weight unit="LBS"> 0 </weight>
            <location name="POINTMASS" unit="IN">
                <x> 316 </x>
                <y>   5 </y>
                <z>  -3 </z>
            </location>
        </pointmass>

        <pointmass name="Centre Right Rear6">
            <weight unit="LBS"> 0 </weight>
            <location name="POINTMASS" unit="IN">
                <x> 500 </x>
                <y>   5 </y>
                <z>  -3 </z>
            </location>
        </pointmass>

        <pointmass name="Right External Tank7">
            <weight unit="LBS"> 0 </weight>
            <location name="POINTMASS" unit="IN">
                <x>416</x>
                <y> 55</y>
                <z>-110</z>
            </location>
        </pointmass>

        <pointmass name="Right Pylon8">
            <weight unit="LBS"> 0 </weight>
            <location name="POINTMASS" unit="IN">
                <x> 403 </x>
                <y> 100 </y>
                <z> -13 </z>
            </location>
        </pointmass>
        <pointmass name="Right Pylon9">
            <weight unit="LBS"> 0 </weight>
            <location name="POINTMASS" unit="IN">
                <x> 403 </x>
                <y> 95 </y>
                <z> -10 </z>
            </location>
        </pointmass>
    </mass_balance>

    <!-- 0 -->
    <ground_reactions>
        <contact type="BOGEY" name="NOSE_LG">
            <location unit="IN">
                <x> 197 </x>
                <y> 0 </y>
                <z> -94.01 </z>
            </location>
            <static_friction> 0.8 </static_friction>
            <dynamic_friction> 0.5 </dynamic_friction>
            <rolling_friction> 0.02 </rolling_friction>
            <spring_coeff unit="LBS/FT"> 42500 </spring_coeff>
            <damping_coeff unit="LBS/FT/SEC"> 2000 </damping_coeff>
            <max_steer unit="DEG"> 89 </max_steer>
            <brake_group> NOSE </brake_group>
            <retractable>1</retractable>
            <base-compression-norm>
              <property>gear/kneel-compression-norm</property>
            </base-compression-norm>
        </contact>
        <!-- 1 -->
        <contact type="BOGEY" name="LEFT_MLG">
            <location unit="IN">
                <x> 451 </x>
                <y> -98 </y>
                <z> -102.1  </z>
            </location>
            <static_friction> 0.8 </static_friction>
            <dynamic_friction> 0.5 </dynamic_friction>
            <rolling_friction> 0.02 </rolling_friction>
            <spring_coeff unit="LBS/FT"> 42500 </spring_coeff>
            <damping_coeff unit="LBS/FT/SEC"> 2000 </damping_coeff>
            <max_steer unit="DEG"> 0.0 </max_steer>
            <brake_group> LEFT </brake_group>
            <retractable>1</retractable>
        </contact>
        <!-- 2 -->
        <contact type="BOGEY" name="RIGHT_MLG">
            <location unit="IN">
                <x> 451 </x>
                <y> 98 </y>
                <z> -102.1 </z>
            </location>
            <static_friction> 0.8 </static_friction>
            <dynamic_friction> 0.5 </dynamic_friction>
            <rolling_friction> 0.02 </rolling_friction>
            <spring_coeff unit="LBS/FT"> 42500 </spring_coeff>
            <damping_coeff unit="LBS/FT/SEC"> 2000 </damping_coeff>
            <max_steer unit="DEG"> 0.0 </max_steer>
            <brake_group> RIGHT </brake_group>
            <retractable>1</retractable>
        </contact>
       <!-- 3 -->
       <contact type="STRUCTURE" name="LEFT_WING_TIP">
            <location unit="IN">
                <x> 472 </x>
                <y> -300 </y>
                <z>   13 </z>
            </location>
            <static_friction> 1.2 </static_friction>
            <dynamic_friction> 1.212 </dynamic_friction>
            <rolling_friction> 1.413 </rolling_friction>
            <spring_coeff unit="LBS/FT"> 10000 </spring_coeff>
            <damping_coeff unit="LBS/FT/SEC"> 2000 </damping_coeff>
        </contact>

          <!--4-->
        <contact type="STRUCTURE" name="RIGHT_WING_TIP">
            <location unit="IN">
                <x> 472 </x>
                <y> 300 </y>
                <z> 13 </z>
            </location>
            <static_friction> 1.2 </static_friction>
            <dynamic_friction> 1.212 </dynamic_friction>
            <rolling_friction> 1.413 </rolling_friction>
            <spring_coeff unit="LBS/FT"> 10000 </spring_coeff>
            <damping_coeff unit="LBS/FT/SEC"> 2000 </damping_coeff>
        </contact>


        <!--  5 -->
        <contact type="STRUCTURE" name="FRONT_BODY">
            <location unit="IN">
                <x> 110 </x>
                <y> 0 </y>
                <z> -47 </z>
            </location>
            <static_friction> 1.2 </static_friction>
            <dynamic_friction> 1.212 </dynamic_friction>
            <rolling_friction> 1.413 </rolling_friction>
            <spring_coeff unit="LBS/FT"> 41300 </spring_coeff>
            <damping_coeff unit="LBS/FT/SEC"> 8600 </damping_coeff>
        </contact>

        <!--  8 -->
        <contact type="STRUCTURE" name="CANOPY">
            <location unit="IN">
                <x> 214 </x>
                <y>  0 </y>
                <z> 10 </z>
            </location>
            <static_friction> 1.2 </static_friction>
            <dynamic_friction> 1.212 </dynamic_friction>
            <rolling_friction> 1.413 </rolling_friction>
            <spring_coeff unit="LBS/FT"> 41300 </spring_coeff>
            <damping_coeff unit="LBS/FT/SEC"> 8600 </damping_coeff>
        </contact>

        <!--  9 -->
        <!--<contact type="STRUCTURE" name="RADOME_FRONT">
            <location unit="IN">
                <x>  20 </x>
                <y>  0 </y>
                <z>  -18 </z>
            </location>
            <static_friction> 1.2 </static_friction>
            <dynamic_friction> 1.212 </dynamic_friction>
            <rolling_friction> 1.413 </rolling_friction>
           <spring_coeff unit="LBS/FT"> 24000 </spring_coeff>
            <damping_coeff unit="LBS/FT/SEC"> 20000 </damping_coeff>
        </contact>-->

        <!--  10 -->
        <contact type="STRUCTURE" name="LEFT_VERTICAL_TAIL">
            <location unit="IN">
                <x> 744 </x>
                <y> -98 </y>
                <z> 60 </z>
            </location>
            <static_friction> 1.2 </static_friction>
            <dynamic_friction> 1.212 </dynamic_friction>
            <rolling_friction> 1.413 </rolling_friction>
            <spring_coeff unit="LBS/FT"> 41300 </spring_coeff>
            <damping_coeff unit="LBS/FT/SEC"> 8600 </damping_coeff>
        </contact>

        <!--  11 -->
        <contact type="STRUCTURE" name="RIGHT_VERTICAL_TAIL">
            <location unit="IN">
                <x> 744 </x>
                <y>  98 </y>
                <z> 60 </z>
            </location>
            <static_friction> 1.2 </static_friction>
            <dynamic_friction> 1.212 </dynamic_friction>
            <rolling_friction> 1.413 </rolling_friction>
            <spring_coeff unit="LBS/FT"> 41300 </spring_coeff>
            <damping_coeff unit="LBS/FT/SEC"> 8600 </damping_coeff>
        </contact>
        <!-- 12 -->
        <contact type="STRUCTURE" name="REAR_BODY_LEFT">
            <location unit="IN">
                <x> 713 </x>
                <y> -58 </y>
                <z> -40 </z>
            </location>
            <static_friction> 1.2 </static_friction>
            <dynamic_friction> 1.212 </dynamic_friction>
            <rolling_friction> 1.413 </rolling_friction>
            <spring_coeff unit="LBS/FT"> 41300 </spring_coeff>
            <damping_coeff unit="LBS/FT/SEC"> 8600 </damping_coeff>
        </contact>

        <!--  13 -->
        <contact type="STRUCTURE" name="REAR_BODY_RIGHT">
            <location unit="IN">
                <x> 713 </x>
                <y>  58 </y>
                <z> -40 </z>
            </location>
            <static_friction> 1.2 </static_friction>
            <dynamic_friction> 1.212 </dynamic_friction>
            <rolling_friction> 1.413 </rolling_friction>
            <spring_coeff unit="LBS/FT"> 41300 </spring_coeff>
            <damping_coeff unit="LBS/FT/SEC"> 8600 </damping_coeff>
        </contact>
<!-- 14 -->
        <contact type="STRUCTURE" name="NOSE_CONE">
            <location unit="IN">
                <x>  0 </x>
                <y>  0 </y>
                <z>  -15 </z>
            </location>
            <static_friction> 1.2 </static_friction>
            <dynamic_friction> 1.212 </dynamic_friction>
            <rolling_friction> 1.413 </rolling_friction>
            <spring_coeff unit="LBS/FT"> 10000 </spring_coeff>
            <damping_coeff unit="LBS/FT/SEC"> 2000 </damping_coeff>
        </contact>
    </ground_reactions>
<!--<strut_force>
    <function>
        <sum>
            <product>
                <value>-1</value>
                <property>inertia/weight-lbs</property>
                <property> contact/unit[5]/compression-ft </property>
            </product>
        </sum>
    </function>
    <ifthen>
        <ge>
            <property> contact/unit[5]/compression-velocity-fps </property>
            <value> 0.0 </value>
        </ge>
        <product>
            <value> -24000. </value>
            <property> contact/unit[5]/compression-velocity-fps </property>
        </product>
        <product>
            <value> 0. </value>
            <property> contact/unit[5]/compression-velocity-fps </property>
        </product>
    </ifthen>
    <clipto>
        <min>-inertia/weight-lbs</min>
        <max>inertia/weight-lbs</max>
    </clipto>
</strut_force>-->
    <propulsion>
        <engine file="F110-GE-400">
            <location unit="IN">
                <x> 652.75591 </x>
                <y> -58.26772 </y>
                <z> -7.66</z>
            </location>
            <orient unit="DEG">
                <roll> 0 </roll>
                <pitch> 0 </pitch>
                <yaw> 0 </yaw>
            </orient>
            <feed>1</feed>
            <feed>2</feed>
            <feed>3</feed>
            <feed>6</feed>
            <feed>8</feed>
            <feed>10</feed>
            <thruster file="direct">
                <location unit="IN">
                <x> 652.75591 </x>
                <y> -58.26772 </y>
                <z> -7.66</z>
                </location>
                <orient unit="DEG">
                    <roll> 0 </roll>
                    <pitch> 0 </pitch>
                    <yaw> 0 </yaw>
                </orient>
            </thruster>
        </engine>
        <engine file="F110-GE-400">
            <location unit="IN">
                <x> 652.75591 </x>
                <y> 58.26772 </y>
                <z> -7.66</z>
            </location>
            <orient unit="DEG">
                <roll> 0 </roll>
                <pitch> 0 </pitch>
                <yaw> 0 </yaw>
            </orient>
            <feed>0</feed>
            <feed>4</feed>
            <feed>5</feed>
            <feed>7</feed>
            <feed>9</feed>
            <feed>11</feed>

            <thruster file="direct">
                <location unit="IN">
                <x> 652.75591 </x>
                <y> 58.26772 </y>
                <z> -7.66</z>
                </location>
                <orient unit="DEG">
                    <roll> 0 </roll>
                    <pitch> 0 </pitch>
                    <yaw> 0 </yaw>
                </orient>
            </thruster>
        </engine>
        <!-- Fuel tank positions are hard to determine - so the values here are based on Figure 8-2 F14AAD-1
             for the fore / aft tanks - with the other tanks moved from my original estimated position
             so that the CG remains in the range of no more than 18%.
             I also had to move the MLG forwards slightly from the diagram otherwise it was impossible to take off a
             fully laden aircraft with flaps until over 210kts (which has to be wrong and as the contact point of the
             gear isn't defined (in AFWAL-TR-80-3141) and I can only assume that those measurements are from the end of the
             radome excluding the probe. (about 20 inches according to my diagram)
        -->
        <!--  FWD Fuselage -->
        <tank type="FUEL">
            <location unit="IN">
                <x>382</x>
                <y>0</y>
                <z>-51.77165354</z>
            </location>
            <priority>4</priority>
            <capacity unit="LBS">4700</capacity>
            <contents unit="LBS">4700</contents>
        </tank>
        <!-- AFT Fuselage -->
        <tank type="FUEL">
            <location unit="IN">
                <x>592</x>
                <y>0</y>
                <z>-47.83464567</z>
            </location>
            <capacity unit="LBS">4400</capacity>
            <contents unit="LBS">4400</contents>
            <priority>4</priority>
        </tank>
        <!-- Left Beam Box - Feed Group   -->
        <tank type="FUEL">
            <location unit="IN">
                <x>396</x>
                <y>-47.95275591</y>
                <z>-45.07874016</z>
            </location>
            <capacity unit="LBS">1300</capacity>
            <contents unit="LBS">1300</contents>
            <priority>3</priority>
        </tank>
        <!--  Left Sump - Feed Group    -->
        <tank type="FUEL">
            <location unit="IN">
                <x>396</x>
                <y>-38.58267717</y>
                <z>-47.83464567</z>
            </location>
            <capacity unit="LBS">300</capacity>
            <contents unit="LBS">300</contents>
            <priority>5</priority>
        </tank>
        <!-- Right Beam Box - Feed Group    -->
        <tank type="FUEL">
            <location unit="IN">
                <x>396</x>
                <y>47.95275591</y>
                <z>-45.07874016</z>
            </location>
            <capacity unit="LBS">1300</capacity>
            <contents unit="LBS">1300</contents>
            <priority>3</priority>
        </tank>
        <!-- Right Sump - Feed Group   -->
        <tank type="FUEL">
            <location unit="IN">
                <x>396</x>
                <y>38.58267717</y>
                <z>-47.83464567</z>
            </location>
            <capacity unit="LBS">300</capacity>
            <contents unit="LBS">300</contents>
            <priority>5</priority>
        </tank>
        <!-- Left wing    -->
        <tank type="FUEL">
            <location unit="IN">
                <x> 462</x>
                <y> -38.5826772</y>
                <z> -27</z>
            </location>
            <capacity unit="LBS">2000</capacity>
            <contents unit="LBS">2000</contents>
            <priority>2</priority>
        </tank>
        <!-- Right Wing -->
        <tank type="FUEL">
            <location unit="IN">
                <x> 462</x>
                <y> 38.5826772</y>
                <z> -27</z>
            </location>
            <capacity unit="LBS">2000</capacity>
            <contents unit="LBS">2000</contents>
            <priority>2</priority>
        </tank>
        <!-- Left External -->
        <tank type="FUEL">
            <location unit="IN">
                <x>403</x>
                <y>-55.51181102</y>
                <z>-110.8267717</z>
            </location>
            <capacity unit="LBS">1600</capacity>
            <contents unit="LBS">1600</contents>
            <priority>1</priority>
        </tank>
        <!-- Right External -->
        <tank type="FUEL">
            <location unit="IN">
                <x>403</x>
                <y>55.51181102</y>
                <z>-110.8267717</z>
            </location>
            <capacity unit="LBS">1600</capacity>
            <contents unit="LBS">1600</contents>
            <priority>1</priority>
        </tank>
        <!-- Left Feed line -->
        <tank type="FUEL">
            <location unit="IN">
                <x>454</x>
                <y>-38.58267717</y>
                <z>-47.83464567</z>
            </location>
            <capacity unit="LBS">10</capacity>
            <contents unit="LBS">10</contents>
            <priority>6</priority>
        </tank>
        <!-- Right Feed line -->
        <tank type="FUEL">
            <location unit="IN">
                <x>454</x>
                <y>38.58267717</y>
                <z>-47.83464567</z>
            </location>
            <capacity unit="LBS">10</capacity>
            <contents unit="LBS">10</contents>
            <priority>6</priority>
        </tank>
    </propulsion>


    <flight_control name="FCS F14">

        <property>fcs/hook-engage</property>
        <property>fcs/wing-sweep-pilot-dmd</property>
        <property>fcs/wing-sweep-mode</property>
        <property>fcs/spoiler-ground-brake-armed</property>
        <property>fcs/flap-cmd-sum</property>
        <property value="1">fcs/dfcs-active</property>

        <!-- wing sweep normalization is 0.01470588235294117647058823529412 per degree (1/range)== 1/68 -->
        <channel name="Wing Sweep">
            <pure_gain name="fcs/wing-sweep-pos-deg">
                <input>fcs/wing-sweep-norm</input>
                <gain>68</gain>
                <clipto>
                    <min> 20 </min>
                    <max> 82 </max>
                </clipto>
            </pure_gain>

            <kinematic name="Sweep Position">
                <noscale/>
                <input>fcs/wing-sweep-dmd-flap-limit</input>
                <traverse>
                    <setting>
                        <position>0.294117647</position>
                        <time>16</time>
                        <!-- F14AAD-1 15 deg/sec sweep rate, (68-20)/15 -->
                    </setting>
                    <setting>
                        <position>1</position>
                        <time>16</time>
                    </setting>
                    <setting>
                        <position>1.102941176</position>
                        <time>5</time>
                    </setting>
                </traverse>
                <!--<output>fcs/wing-sweep-cmd</output>-->
                <output>fcs/wing-sweep-norm</output>
            </kinematic>


            <!-- manual sweep; it is only permitted to sweep the wings more back than the CADC requires so effectively
                we limit the sweep to the computed wing-sweep-cadc-pos -->
            <switch name="fcs/wing-sweep-dmd">
                <default value="fcs/wing-sweep-cadc-dmd"/>

                <test value="fcs/wing-sweep-dmd">
                    systems/hydraulics/combined-system-pressure ne 1
                </test>
                <test value="fcs/wing-sweep-pilot-dmd">
                    fcs/wing-sweep-pilot-dmd ge fcs/wing-sweep-cadc-dmd
                    fcs/wing-sweep-mode eq 1
                </test>
                <test value="1.2">
                    fcs/wing-sweep-mode eq 4
                </test>
            </switch>

            <switch name="fcs/wing-sweep-dmd-flap-limit">
                <default value="0.2941176470588235"/>
                <test value="0.3088235294117647">
                    fcs/aux-flap-pos-deg ne 0
                    fcs/wing-sweep-dmd ge 0.3088235294117647
                    fcs/wing-sweep-dmd lt 0.3235294117647059
                </test>
                <test value="0.3235294117647059">
                    fcs/aux-flap-pos-deg ne 0
                    fcs/wing-sweep-dmd ge 0.3235294117647059
                    fcs/wing-sweep-dmd lt 0.3382352941176471
                </test>
                <test value="fcs/wing-sweep-dmd">
                    fcs/flap-pos-deg ne 0
                    fcs/wing-sweep-dmd le 0.7352941176470588
                </test>
                <test value=".7352941176470588">
                    fcs/flap-pos-deg ne 0
                    fcs/wing-sweep-dmd gt 0.7352941176470588
                </test>
                <test value="fcs/wing-sweep-dmd">
                    fcs/flap-pos-deg eq 0
                </test>
                <output>fcs/wing-sweep-dmd-flap-limit</output>
            </switch>

        </channel>

        <channel name="Pitch">
<!--
Figure 2-54.  Longitudinal System Authority
+===========================================================================================+===========================+===============================+
|                            COCKPIT CONTROL                                                |     STABILIZER SURFACE    |        PARALLEL TRIM          |
+===========================================================================================+===========================+===============================+
|ACTUATION                     |MODE                      |MOTION                           |AUTHORITY         |RATE    |AUTHORITY       |AVERAGE RATE  |
+==============================+==========================+=================================+==================+========+================+==============+
|Control Stick                 |Manual                    |4 inches forward 5.5 inches aft  |10° TED, 33° TEU  |36°/sec |9° TED, 18° TEU |1/second      |
+==============================+==========================+=================================+==================+========+================+==============+
| DFCS                         |Series (SAS)              |None                             |±3°               |20°/sec |     =          |      =       |
|                              |Parallel                  |4 inches, forward 5.5 inches aft |10° TED 33° TEU   |36°/sec |9° TED 18° TEU  |0.1°/second   |
|                              |Automatic Carrier Landing |                                 |                  |        |                |              |
|                              |(ACL only)                |                                 |                  |        |                |              |
+==============================+==========================+=================================+==================+========+================+==============+
| Maneuver Flap                |Series                    |±45° DLC Thumbwheel Mode         |8.4° TED Maximum  |36°/sec |                |              |
| Integrated Trim System (ITS) |                          |                                 |                  |        |                |              |
| and DLC Thumbwheel           |                          |                                 |                  |        |                |              |
+==============================+==========================+=================================+==================+========+================+==============+
|                              |                          |±45° Maneuver Flap Mode          |±3°               |3°/sec  |                |              |
+==============================+==========================+=================================+==================+========+================+==============+
 -->

            <fcs_function name="fcs/its-pitch-slats-norm">
                <description>F-14-AAP-1 Figure 2-56 Integrated Trim Schedules - MANEUVER FLAPS - TEU</description>
                <function>
                    <table>
                        <independentVar lookup="row">fcs/flap-pos-deg</independentVar>
                        <tableData>
                             0  0.0000
                            15 -0.0787
                            35 -0.0787
                        </tableData>
                    </table>
                </function>
                <clipto>
                    <min>-0.1</min>
                    <max>0</max>
                </clipto>
            </fcs_function>

            <fcs_function name="fcs/its-pitch-flaps-norm">
                <description>F-14-AAP-1 Figure 2-56 Integrated Trim Schedules - LANDING FLAPS - TEU</description>
                <function>
                    <table>
                        <independentVar lookup="row">fcs/flap-pos-deg</independentVar>
                        <tableData>
                             0.0  0.0000
                             7.4  0.0000
                            27.0 -0.0909
                        </tableData>
                    </table>
                </function>
                <clipto>
                    <min>-0.1</min>
                    <max>0</max>
                </clipto>
            </fcs_function>

            <summer name="Pitch Trim Sum">
                <input>fcs/elevator-cmd-norm</input>
                <input>fcs/pitch-trim-cmd-norm</input>
                <input>fcs/pitch-damper-rate</input>
                <input>-systems/afcs/elevator-cmd-delta</input>
                <input>fcs/its-pitch-flaps-norm</input>
                <input>fcs/its-pitch-slats-norm</input>
                <input>fcs/pitch-damper-rate</input>
                <clipto>
                    <min> -1 </min>
                    <max>  1 </max>
                </clipto>
            </summer>


            <switch name="position/aircraft-on-ground">
                <description>Aircraft on ground</description>
                <default value="0"/>
                <test value="1" logic="OR">
                    gear/unit[0]/WOW ne 0
                    gear/unit[1]/WOW ne 0
                    gear/unit[2]/WOW ne 0
                </test>
            </switch>

            <!-- spoilers -4deg when flaps deployed more than 25 deg -->
            <switch name="fcs/spoilers-zeropos">
                <default value="0"/>
                <test value="-0.081">
                    fcs/flap-pos-norm ge 0.7142857142857143
                </test>
            </switch>

            <switch name="fcs/pitch-trim-actuator">
                <default value="fcs/pitch-trim-sum"/>
                <test value="fcs/pitch-trim-actuator">
                    systems/hydraulics/flight-system-pressure ne 1
                </test>
            </switch>

            <aerosurface_scale name="Elevator Control">
                <input>fcs/pitch-trim-actuator</input>
                <!-- maybe this should take into account the trim limits from the AAP -->
                <range>
                    <min> -0.57895 </min>
                    <max>  0.2105 </max>
                </range>
                <output>fcs/elevator-pos-demand</output>
            </aerosurface_scale>

            <switch name="fcs/spoiler-differential-cmd">
                <description>Differential spoiler due to stick deflection</description>
                <default value="0"/>

                <test value="fcs/roll-trim-actuator">
                    fcs/wing-sweep-dmd le 0.9117647058823529
                    systems/hydraulics/combined-system-pressure ne 0
                </test>
            </switch>

            <switch name="fcs/spoiler-ground-brake-deployed">
                <description>Ground braking spoilers</description>
                <default value="0"/>

                <test value="fcs/spoiler-ground-brake-deployed">
                    systems/hydraulics/combined-system-pressure eq 0
                </test>

                <test value="1">
                    systems/hydraulics/combined-system-pressure ne 0
                    fcs/wing-sweep-pos-deg lt 55.0
                    fcs/spoiler-ground-brake-armed ne 0.0
                    fcs/throttle-cmd-norm[0] le 0.15
                    fcs/throttle-cmd-norm[1] le 0.15
                    position/aircraft-on-ground ne 0
                </test>
            </switch>

            <kinematic name="fcs/spoiler-differential-pos">
                <input>fcs/spoiler-differential-cmd</input>
                <traverse>
                    <setting>
                        <position>-1</position>
                        <time>0.22</time>
                        <!-- F14AAD-1 Figure 2-61 250 deg/sec sweep rate -->
                    </setting>
                    <setting>
                        <position>1</position>
                        <time>0.22</time>
                        <!-- F14AAD-1 Figure 2-61 15 deg/sec sweep rate  -->
                    </setting>
                </traverse>
            </kinematic>

            <switch name="fcs/spoiler-left-cmd">
                <description>Left wing spoiler deflection</description>
                <default value="fcs/spoilers-zeropos"/>

                <test value="0">
                    systems/flyt/wing-asymmetry lt  0
                </test>

                <test value="1">
                    fcs/spoiler-ground-brake-deployed eq 1
                </test>

                <test value="-fcs/spoiler-differential-pos">
                    fcs/spoiler-differential-pos le 0
                </test>
            </switch>

            <kinematic name="fcs/spoiler-left-pos">
                <input>fcs/spoiler-left-cmd</input>
                <traverse>
                    <setting>
                        <position>-0.0818181818181819</position>
                        <time>0.22</time>
                        <!-- F14AAD-1 Figure 2-61 250 deg/sec sweep rate -->
                    </setting>
                    <setting>
                        <position>1</position>
                        <time>0.22</time>
                        <!-- F14AAD-1 Figure 2-61 15 deg/sec sweep rate  -->
                    </setting>
                </traverse>
            </kinematic>

            <switch name="fcs/spoiler-right-cmd">
                <description>Right  wing spoiler deflection</description>
                <default value="fcs/spoilers-zeropos"/>

                <test value="0">
                    systems/flyt/wing-asymmetry gt  0
                </test>

                <test value="1">
                    fcs/spoiler-ground-brake-deployed eq 1
                </test>

                <test value="fcs/spoiler-differential-pos">
                    fcs/spoiler-differential-pos ge 0
                </test>
            </switch>

            <kinematic name="fcs/spoiler-right-pos">
                <input>fcs/spoiler-right-cmd</input>
                <traverse>
                    <setting>
                        <position>-0.0818181818181819</position>
                        <time>0.22</time>
                        <!-- F14AAD-1 Figure 2-61 250 deg/sec sweep rate -->
                    </setting>
                    <setting>
                        <position>1</position>
                        <time>0.22</time>
                        <!-- F14AAD-1 Figure 2-61 15 deg/sec sweep rate  -->
                    </setting>
                </traverse>
            </kinematic>

            <aerosurface_scale name="fcs/spoiler-left-pos-deg">
                <input>fcs/spoiler-left-pos</input>
                <range>
                    <min> -4 </min>
                    <max> 55 </max>
                </range>
            </aerosurface_scale>
            <aerosurface_scale name="fcs/spoiler-right-pos-deg">
                <input>fcs/spoiler-right-pos</input>
                <range>
                    <min> -4 </min>
                    <max> 55 </max>
                </range>
            </aerosurface_scale>

            <!-- F14a stabilizer: +/- 7deg : +/- 30 deg/sec -->
            <kinematic name="elevator position">
                <input>fcs/elevator-pos-demand</input>
                <traverse>
                    <setting>
                        <position>-1</position>
                        <time>1.75</time>
                    </setting>
                    <setting>
                        <position>1</position>
                        <time>0.90</time>
                        <!-- based on 30 deg/sec -->
                    </setting>
                </traverse>
                <output>fcs/elevator-pos-rad</output>
            </kinematic>


            <summer name="Left elevator normalization">
                <input>fcs/elevator-pos-deg</input>
                <input>fcs/left-aileron-pos-deg</input>
                <output>fcs/left-elevator-pos-deg</output>
            </summer>
            <summer name="Right elevator normalization">
                <input>fcs/elevator-pos-deg</input>
                <input>-fcs/right-aileron-pos-deg</input>
                <output>fcs/right-elevator-pos-deg</output>
            </summer>

            <aerosurface_scale name="elevator normalization">
                <input>fcs/elevator-pos-rad</input>
                <domain>
                    <min>  -0.57895 </min>
                    <max>   0.21053 </max>
                </domain>
                <range>
                    <min> -1 </min>
                    <max>  1 </max>
                </range>
                <output>fcs/elevator-pos-norm</output>
            </aerosurface_scale>

            <switch name="fcs/stabilizer-1p-factor">
                <default value="0"/>
                <test logic="AND" value="1">
                    fcs/elevator-pos-rad ge -0.17453
                </test>
            </switch>
            <switch name="fcs/stabilizer-2p-factor">
                <default value="0.0"/>
                <test logic="AND" value="1">
                    fcs/elevator-pos-rad lt -0.17453
                </test>
            </switch>
        </channel>

        <property>systems/NWS/engaged</property>

        <channel name="Nose Wheel Steering">
            <switch name="systems/NWS/engaged">
                <default value="0"/>
                <test value="1">
                    gear/unit[0]/wheel-speed-fps le 135
                    systems/hydraulics/combined-system-pressure ne 0
                    position/aircraft-on-ground ne 0
                    systems/holdback/launchbar-engaged eq 0
                </test>
                <output>systems/NWS/engaged</output>
            </switch>

            <scheduled_gain name="fcs/scheduled-steer-pos-deg">
                <input>fcs/steer-cmd-norm</input>
                <table>
                    <independentVar lookup="row">gear/unit[0]/wheel-speed-fps</independentVar>
                    <independentVar lookup="column">systems/NWS/engaged</independentVar>
                    <tableData>
                               0    1
                          0    0   87
                         80    0   15
                        135    0    0
                    </tableData>
                </table>
                <output>fcs/steer-pos-deg</output>
            </scheduled_gain>
        </channel>

        <channel name="SoundFX">
            <fcs_function name="fcs/flap-windfx-volume">
                <function>
                    <product>
                        <property>velocities/ve-kts</property>
                        <property>fcs/flap-pos-norm</property>
                    </product>
                </function>
                <output>fcs/flap-windfx-volume</output>
            </fcs_function>
            <fcs_function name="fcs/gear-windfx-volume">
                <function>
                    <product>
                        <property>velocities/ve-kts</property>
                        <property>gear/gear-pos-norm</property>
                    </product>
                </function>
                <output>fcs/gear-windfx-volume</output>
            </fcs_function>
        </channel>

        <!-- aileron: +/- 5deg : +/- 33 deg/sec -->
        <channel name="Roll">
            <fcs_function  name="fcs/roll-trim-sum">
                <function>
                    <ifthen>
                        <eq>
                            <property>fcs/roll-sas-active</property>
                            <value>0</value>
                        </eq>
                        <sum>
                            <property>fcs/aileron-cmd-norm</property>
                            <property>fcs/roll-trim-cmd-norm</property>
                            <property>/controls/flight/SAS-roll</property>
                        </sum>
                        <sum>
                            <property>/controls/flight/SAS-roll</property>
                            <property>sas/roll-sas-output</property>
                        </sum>
                    </ifthen>
                </function>
                <clipto>
                    <min> -1 </min>
                    <max>  1 </max>
                </clipto>
            </fcs_function>

            <switch name="fcs/roll-trim-actuator">
                <default value="fcs/roll-trim-sum"/>
                <test value="fcs/roll-trim-actuator">
                    systems/hydraulics/flight-system-pressure ne 1
                </test>
            </switch>
            <aerosurface_scale name="Left Aileron Control">
                <input>fcs/roll-trim-actuator</input>
                <range>
                    <min> -0.22807 </min>
                    <max>  0.22807 </max>
                </range>
                <output>fcs/left-aileron-pos-rad</output>
            </aerosurface_scale>

            <aerosurface_scale name="Right Aileron Control">
                <input>fcs/roll-trim-actuator</input>
                <range>
                    <min> -0.22807 </min>
                    <max>  0.22807 </max>
                </range>
                <output>fcs/right-aileron-pos-rad</output>
            </aerosurface_scale>

            <aerosurface_scale name="left aileron normalization">
                <input>fcs/left-aileron-pos-rad</input>
                <domain>
                    <min> -0.22807 </min>
                    <max>  0.22807 </max>
                </domain>
                <range>
                    <min> -1 </min>
                    <max>  1 </max>
                </range>
                <output>fcs/left-aileron-pos-norm</output>
            </aerosurface_scale>

            <aerosurface_scale name="right aileron normalization">
                <input>fcs/right-aileron-pos-rad</input>
                <domain>
                    <min> -0.22807 </min>
                    <max>  0.22807 </max>
                </domain>
                <range>
                    <min> -1 </min>
                    <max>  1 </max>
                </range>
                <output>fcs/right-aileron-pos-norm</output>
            </aerosurface_scale>

        </channel>

        <property value="0">fcs/yaw-damper-enable</property>
        <property value="0">fcs/pitch-damper-enable</property>
        <property value="0">fcs/roll-sas-enable</property>
        <property value="0">fcs/external-tanks-fitted</property>
        <property value="0">fcs/aim-fitted</property>
        <property value="0">fcs/slat-cmd</property>


	<!-- SAS YAW Channel configuration -->
    <property value="0.5">sas/rudder-power-actuator-cval</property>

	<!-- yaw-sas-2-v1-stkr-factor is 2.60 for System B and 3.19 for System C
	     this is the only difference between the two systems.
	     The described High-Alpha ARI system is the same as System B
	     Figure 20 from [1] below for YAW SAS
	     Figure 21 from [1] below for ROLL SAS
	     see https://ntrs.nasa.gov/citations/19800020867
	     and https://ntrs.nasa.gov/citations/19820005275
	     -->
    <property value="3.19">sas/yaw-sas-2-v1-stkr-factor</property>
    <property value="0">sas/yaw-sas-2-v3-c1</property>
    <property value="1">sas/yaw-sas-2-v3-c2</property>
    <property value="0.125">sas/yaw-sas-2-v3-c3</property>
    <property value="1">sas/yaw-sas-2-v3-c4</property>

    <property value="2">sas/yaw-sas-3-r-c1</property>
    <property value="0">sas/yaw-sas-3-r-c2</property>
    <property value="2">sas/yaw-sas-3-r-c3</property>
    <property value="1">sas/yaw-sas-3-r-c4</property>

    <property value="0.05">sas/yaw-sas-3-ay-c3</property>

    <channel name="Yaw">

            <!--
                 * NOTES:
                 *
                 * In the DMS model the static yawing moment coefficient was treated as
                 * a function of three variables: alpha, beta, and stab deflection.
                 * The unusual influence of stabilator deflection on directional stability arises from
                 * an interaction between the engine inlet shed vortex and the vertical and
                 * horizontal stabilizers, [Ref. 10].
                 * Examination of the data indicated that this effect could be modeled as a yawing
                 * moment increment which was a function of alpha and stab deflection with a lookup
                 * table using sin(8.2 beta). (See DCNDS)
                 *
                 * Pedal travel +/- 3 inches. deflection +/- 30deg (max)
                 *-->
            <fcs_function name="aero/cn-sin-82beta">
                <function>
                    <sin>
                        <product>
                            <property>aero/beta-rad</property>
                            <value>8.2</value>
                        </product>
                    </sin>
                </function>
                <output>aero/cn-sin-82beta</output>
            </fcs_function>

        <!--
         | yaw SAS (based on channel C) - NASA TM-81833, Figure 21
         -->
        <switch name="fcs/yaw-damper-active">
            <default value="0.0" />
            <test logic="AND" value="1">
                    fcs/yaw-damper-enable ne 0.0
                    simulation/sim-time-sec gt 2.0
                    gear/wow eq 0
                    aero/alpha-deg gt -10
                    aero/alpha-deg lt  25
                </test>
            <output>fcs/yaw-damper-active</output>
        </switch>


        <fcs_function name="sas/yaw-sas-2-stkr">
            <function>
                <product>
                    <property>-sas/roll-sas-1-input</property>
                    <property>sas/yaw-sas-2-v1-stkr-factor</property>
                </product>
            </function>
        </fcs_function>

        <fcs_function name="sas/yaw-sas-2-p">
            <function>
                <product>
                    <property>velocities/p-aero-rad_sec</property>
                    <!-- <value>57.3</value> -->
                    <ifthen>
                        <and>
                            <lt>
                                <property>aero/alpha-indicated-deg</property>
                                <value>44</value>
                            </lt>
                            <lt>
                                <property>velocities/mach</property>
                                <value>0.55</value>
                            </lt>
                        </and>
                        <value>0.2</value>
                        <value>0</value>
                    </ifthen>
                </product>
            </function>
            <clipto>
                <min>-1.052</min>
                <max>1.052</max>
            </clipto>
        </fcs_function>

        <fcs_function name="sas/yaw-sas-2-sum">
            <function>
                <sum>
                    <property>sas/yaw-sas-2-p</property>
                    <property>sas/yaw-sas-2-stkr</property>
                </sum>
            </function>
        </fcs_function>
        <lead_lag_filter name="sas/yaw-sas-2-v3">
            <input>sas/yaw-sas-2-sum</input>
            <c1>sas/yaw-sas-2-v3-c1</c1>
            <c2>sas/yaw-sas-2-v3-c2</c2>
            <c3>sas/yaw-sas-2-v3-c3</c3>
            <c4>sas/yaw-sas-2-v3-c4</c4>
        </lead_lag_filter>

        <fcs_function name="sas/yaw-sas-2-output">
            <function>
                <product>
                    <property>sas/yaw-sas-2-v3</property>
                    <table>
                        <independentVar lookup="row">aero/alpha-indicated-deg</independentVar>
                        <independentVar lookup="column">velocities/mach</independentVar>
                        <tableData>
                                0.000  0.550  0.551
                            10    0.0    0.0    0.0
                            12    0.2    0.2    0.0
                            20    1.0    1.0    0.8
                            22    1.0    1.0    1.0
                        </tableData>
                    </table>
                </product>
            </function>
        </fcs_function>

        <lead_lag_filter name="sas/yaw-sas-3-r">
            <input>velocities/r-aero-rad_sec</input>
            <c1>sas/yaw-sas-3-r-c1</c1>
            <c2>sas/yaw-sas-3-r-c2</c2>
            <c3>sas/yaw-sas-3-r-c3</c3>
            <c4>sas/yaw-sas-3-r-c4</c4>
            <clipto>
                <min>-0.877</min>
                <max>0.877</max>
            </clipto>
        </lead_lag_filter>

        <fcs_function name="sas/yaw-sas-3-ay-0">
            <function>
                <product>
                    <property>accelerations/Ny</property>
                    <ifthen>
                        <or>
                            <lt>
                                <property>fcs/roll-trim-cmd-norm</property>
                                <value>-0.2</value>
                            </lt>
                            <gt>
                                <property>fcs/roll-trim-cmd-norm</property>
                                <value>0.2</value>
                            </gt>
                        </or>
                        <value>0.38859649122807017543859649122807</value>
                        <value>0.16052631578947368421052631578947</value>
                    </ifthen>
                </product>
            </function>
        </fcs_function>

        <lead_lag_filter name="sas/yaw-sas-3-ay-1">
            <input>sas/yaw-sas-3-ay-0</input>
            <c1>0</c1>
            <c2>1</c2>
            <c3>sas/yaw-sas-3-ay-c3</c3>
            <c4>1</c4>
            <clipto>
                <min>-0.7167</min>
                <max>0.7167</max>
            </clipto>
        </lead_lag_filter>

        <summer name="sas/yaw-sas-3-output">
            <input>sas/yaw-sas-3-r</input>
            <input>sas/yaw-sas-3-ay-1</input>
        </summer>

        <fcs_function name="sas/yaw-output">
            <function>
                <ifthen>
                    <eq>
                        <property>fcs/yaw-damper-active</property>
                        <value>0</value>
                    </eq>
                    <value>0</value>
                    <sum>
                        <ifthen>
                            <nq>
                                <property>fcs/dfcs-active</property>
                                <value>0</value>
                            </nq>
                            <property>sas/yaw-sas-2-output</property>
                            <value>0</value>
                        </ifthen>
                        <property>sas/yaw-sas-3-output</property>
                    </sum>
                </ifthen>
            </function>
            <clipto>
                <min>-0.63</min>
                <max>0.63</max>
            </clipto>
        </fcs_function>
    </channel>

    <channel name="Roll">
            <switch name="fcs/roll-sas-active">
                <default value="0.0" />
                <test logic="AND" value="1">
                    fcs/roll-sas-enable ne 0.0
                    simulation/sim-time-sec gt 2.0
                </test>
                <output>fcs/roll-sas-active</output>
            </switch>
<!---        ROLL SAS 1      NASA TM-81833, Figure 21    -->
            <fcs_function name="sas/roll-sas-1-input-0">
                <description>Sum of all stick inputs (stick, trim)</description>
                <function>
                    <sum>
                        <property>fcs/aileron-cmd-norm</property>
                        <property>fcs/roll-trim-cmd-norm</property>
                    </sum>
                </function>
            </fcs_function>
            <fcs_function name="sas/roll-sas-1-input">
                <description>
                    Stick position force simulation -
                    ref: NAVAIR 01-F14AAP-1, 2.22.3.1 Lateral  Feel.
                    An  artificial  feel  system provides the pilot with force cues and feedback.
                    The lateral feel mechanism is a spring roller cam assembly with a neutral
                    stick position detent and a constant stick deflection force gradient.
                </description>
                <function>
                    <ifthen>
                        <lt>
                            <property>sas/roll-sas-1-input-0</property>
                            <value>0</value>
                        </lt>
                        <product>
                            <value>-1</value>
                            <sum>
                                <product>
                                    <property>-sas/roll-sas-1-input-0</property>
                                    <value>0.4696</value>
                                </product>
                                <product>
                                    <property>sas/roll-sas-1-input-0</property>
                                    <property>sas/roll-sas-1-input-0</property>
                                    <value>0.5457</value>
                                </product>
                            </sum>
                        </product>
                        <sum>
                            <product>
                                <property>sas/roll-sas-1-input-0</property>
                                <value>0.4696</value>
                            </product>
                            <product>
                                <property>sas/roll-sas-1-input-0</property>
                                <property>sas/roll-sas-1-input-0</property>
                                <value>0.5457</value>
                            </product>
                        </sum>
                    </ifthen>
                </function>
                <clipto>
                    <min>-1</min>
                    <max>1</max>
                </clipto>
            </fcs_function>

            <fcs_function name="sas/roll-sas-1-stkr-limit">
                <function>
                    <product>
                        <value>9</value>
                        <property>sas/roll-sas-1-input</property>
                    </product>
                </function>
                <clipto>
                    <min>-8.89</min>
                    <max>8.89</max>
                </clipto>
            </fcs_function>

            <fcs_function name="sas/roll-sas-1">
                <function>
                    <product>
                        <property>sas/roll-sas-1-stkr-limit</property>
                        <value>0.7874</value>
                    </product>
                </function>
            </fcs_function>

<!---        ROLL SAS 2          -->

<!-- sas-2-ha-# High Alpha Roll Augment -->
            <fcs_function name="sas/roll-sas-2-ha-v1">
                <function>
                    <product>
                        <property>sas/roll-sas-1-stkr-limit</property>
                        <value>-2</value>
                    </product>
                </function>
                <clipto>
                    <min>-7</min>
                    <max>7</max>
                </clipto>
            </fcs_function>

            <fcs_function name="sas/roll-sas-2-ha-v2-alpha-mach">
                <function>
                    <interpolate1d>
                        <property>velocities/mach</property>
                        <value>0.5</value>
                        <table name="sas/roll-sas-2-ha-v2-alpha-mach-0.55">
                            <independentVar lookup="row">aero/alpha-indicated-deg</independentVar>
                            <tableData>
                                 9         0
                                10         0
                                21         1
                                22         1
                                </tableData>
                        </table>
                        <value>1.0</value>
                        <table name="sas/roll-sas-2-ha-v2-alpha-mach-1.00">
                            <independentVar lookup="row">aero/alpha-indicated-deg</independentVar>
                            <tableData>
                                16         0
                                17         0
                                43         1
                                44         1
                            </tableData>
                        </table>
                    </interpolate1d>
                </function>
            </fcs_function>

            <fcs_function name="sas/roll-sas-2-ha-v2">
                <function>
                    <product>
                        <property>fcs/dfcs-active</property>
                        <property>sas/roll-sas-2-ha-v1</property>
                        <property>sas/roll-sas-2-ha-v2-alpha-mach</property>
                    </product>
                </function>
            </fcs_function>

<!-- sas-2-v3..4 Normal alpha roll augment  -->
            <lead_lag_filter name="sas/roll-sas-2-v3">
                <input>sas/roll-sas-1-stkr-limit</input>
                <c1>0</c1>
                <c2>-1.685</c2>
                <c3>0.5</c3>
                <c4>1</c4>
                <clipto>
                    <min>-10</min>
                    <max>10</max>
                </clipto>
            </lead_lag_filter>

            <fcs_function name="sas/roll-sas-2-v4-alpha-mach">
                <function>
                    <interpolate1d>
                        <property>velocities/mach</property>
                        <value>0.5</value>
                        <table name="sas/roll-sas-2-v4-alpha-mach-0.55">
                            <independentVar lookup="row">aero/alpha-indicated-deg</independentVar>
                            <tableData>
                                16    1
                                17    1
                                43    0
                                44    0
                            </tableData>
                        </table>
                        <value>1.0</value>
                        <table name="sas/roll-sas-2-v4-alpha-mach-1.00">
                            <independentVar lookup="row">aero/alpha-indicated-deg</independentVar>
                            <tableData>
                                 9    1
                                10    1
                                21    0
                                22    0
                            </tableData>
                        </table>
                    </interpolate1d>
                </function>
            </fcs_function>

        <fcs_function name="sas/roll-sas-2-v4">
            <function>
                <ifthen>
                    <nq>
                        <property>fcs/dfcs-active</property>
                        <value>0</value>
                    </nq>
                    <product>
                        <property>sas/roll-sas-2-v3</property>
                        <property>sas/roll-sas-2-v4-alpha-mach</property>
                    </product>
                    <property>sas/roll-sas-2-v3</property>
                </ifthen>
                </function>
            </fcs_function>

            <!-- schedulded static roll augmentation, static in that it just references stick position -->
            <fcs_function name="sas/roll-sas-2">
                <function>
                    <sum>
                        <property>-sas/roll-sas-2-ha-v2</property>
                        <property>-sas/roll-sas-2-v4</property>
                    </sum>
                </function>
            </fcs_function>

<!---        ROLL SAS 3          -->
            <fcs_function name="sas/roll-sas-3-p-deg-sec">
                <function>
                    <product>
                        <value>-57.32</value>
                        <property>velocities/p-aero-rad_sec</property>
                    </product>
                </function>
                <clipto>
                    <min>-250</min>
                    <max>250</max>
                </clipto>
            </fcs_function>

            <fcs_function name="sas/roll-sas-3-v1-f">
                <function>
                        <ifthen>
                            <le>
                                <abs>
                                    <property>sas/roll-sas-3-p-deg-sec</property>
                                </abs>
                                <value>135</value>
                            </le>
                            <value>0.04</value>
                            <value>0.15</value>
                        </ifthen>
                </function>
            </fcs_function>

            <fcs_function name="sas/roll-sas-3-v1">
                <function>
                    <product>
                        <property>sas/roll-sas-3-p-deg-sec</property>
                        <property>sas/roll-sas-3-v1-f</property>
                    </product>
                </function>
            </fcs_function>

            <fcs_function name="sas/roll-sas-3-v2">
                <function>
                    <product>
                        <property>sas/roll-sas-3-v1</property>
                        <value>5</value>
                        <table name="sas/roll-sas-3-v2-mach">
                            <independentVar lookup="row">velocities/mach</independentVar>
                            <tableData>
                               0.0      1
                               0.6      1
                               0.7      0
                        </tableData>
                        </table>
                    </product>
                </function>
            </fcs_function>

            <fcs_function name="sas/roll-sas-3-v3">
                <function>
                    <product>
                        <property>sas/roll-sas-3-v2</property>
                        <table name="sas/roll-sas-3-v3-ped">
                            <independentVar lookup="row">fcs/rudder-cmd-norm</independentVar>
                            <tableData>
                             -0.110      0
                             -0.109      1
                              0.000      1
                              0.109      1
                              0.110      0
                        </tableData>
                        </table>
                    </product>
                </function>
            </fcs_function>

            <fcs_function name="sas/roll-sas-3-v4">
                <function>
                    <product>
                        <ifthen>
                            <ge>
                                <property>aero/alpha-indicated-deg</property>
                                <value>0</value>
                            </ge>
                            <property>sas/roll-sas-3-v3</property>
                            <property>sas/roll-sas-3-v1</property>
                        </ifthen>
                        <table name="sas/roll-sas-3-v4-ae">
                            <independentVar lookup="row">aero/alpha-indicated-deg</independentVar>
                            <tableData>
                                 0      1
                                36      1
                                39      0
                            </tableData>
                        </table>
                    </product>
                </function>
            </fcs_function>

            <fcs_function name="sas/roll-sas-3-v5">
                <function>
                    <ifthen>
                        <ge>
                            <property>aero/alpha-indicated-deg</property>
                            <value>44</value>
                        </ge>
                        <product>
                            <value>57.32</value>
                            <property>velocities/r-aero-rad_sec</property>
                        </product>
                        <value>0</value>
                    </ifthen>
                </function>
                <clipto>
                    <min>-20</min>
                    <max>20</max>
                </clipto>
            </fcs_function>

            <fcs_function name="sas/roll-sas-3">
                <function>
                    <ifthen>
                        <nq>
                            <property>fcs/dfcs-active</property>
                            <value>0</value>
                        </nq>
                        <sum>
                            <property>sas/roll-sas-3-v4</property>
                            <property>sas/roll-sas-3-v5</property>
                        </sum>
                        <property>sas/roll-sas-3-v1</property>
                    </ifthen>
                </function>
            </fcs_function>

<!---        ROLL SAS 4          -->
            <fcs_function name="sas/roll-sas-4">
                <function>
                    <sum>
                        <property>sas/roll-sas-3</property>
                        <property>sas/roll-sas-2</property>
                    </sum>
                </function>
                <clipto>
                    <min>-5</min>
                    <max>5</max>
                </clipto>
            </fcs_function>

            <fcs_function name="sas/roll-sas-5-v1">
                <function>
                    <sum>
                        <property>sas/roll-sas-1</property>
                        <property>sas/roll-sas-4</property>
                    </sum>
                </function>
            </fcs_function>

<!---        ROLL SAS 5 - combine all          -->
            <lead_lag_filter name="sas/roll-sas-5-v2">
                <input>sas/roll-sas-5-v1</input>
                <c1>0</c1>
                <c2>1</c2>
                <c3>0.5</c3>
                <c4>1</c4>
                <clipto>
                    <min>-12</min>
                    <max>12</max>
                </clipto>
            </lead_lag_filter>

            <fcs_function name="sas/roll-sas-output">
                <function>
                    <product>
                        <property>sas/roll-sas-5-v2</property>
                        <value>0.11</value>
                    </product>
                </function>
            </fcs_function>
<!---        END OF ROLL SAS          -->

            <!-- rudder limits +/-30deg 40 deg/sec-->
            <!-- stabilizer limits +/7deg 30 deg/sec-->

            <pure_gain name="Pilot G">
                <input>accelerations/n-pilot-z-norm</input>
                <gain>-1</gain>
                <output>/accelerations/pilot-gdamped</output>
            </pure_gain>

            <switch name="fcs/pitch-damper-active">
                <default value="0.0"/>
                <test logic="AND" value="1">
                    aero/alpha-rad ge -0.175438596491228
                    aero/alpha-rad le  0.2631578947368421
                    fcs/elevator-cmd-norm ge -0.15
                    fcs/elevator-cmd-norm le 0.15
                    fcs/pitch-damper-enable ne 0.0
                    simulation/sim-time-sec gt 2.0
                </test>
                <output>fcs/pitch-damper-active</output>
            </switch>

            <scheduled_gain name="Pitch Damper Rate">
                <!-- Figure 2-57 F14AAD-1  -->
                <input>velocities/q-aero-rad_sec</input>
                <table>
                    <independentVar lookup="row">velocities/ve-kts</independentVar>
                    <tableData>
                        30    0
                        60    1
                    </tableData>
                </table>
                <gain>fcs/pitch-damper-active</gain>
                <clipto>
                    <min> -0.2857142857142857 </min>
                    <max>  0.2857142857142857 </max>
                </clipto>
            </scheduled_gain>

            <summer name="Rudder Command Sum">
                <input>fcs/rudder-cmd-norm</input>
                <input>fcs/yaw-trim-cmd-norm</input>
                <clipto>
                    <min> -1 </min>
                    <max>  1 </max>
                </clipto>
            </summer>

            <summer name="Rudder Sum">
                <input>fcs/rudder-command-sum</input>
                <input>sas/yaw-output</input>
                <clipto>
                    <min> -1.1 </min>
                    <max>  1.1 </max>
                </clipto>
            </summer>

            <!-- rate limit 106 deg/s -->
            <lead_lag_filter name="sas/rudder-power-actuator">
                <input>sas/yaw-output</input>
                <c1>0</c1>
                <c2>1</c2>
                <c3>sas/rudder-power-actuator-cval</c3>
                <c4>1</c4>
            </lead_lag_filter>

            <switch name="fcs/rudder-actuator-pos">
                <default value="fcs/rudder-sum"/>
                <test value="fcs/rudder-actuator-pos">
                    systems/hydraulics/flight-system-pressure ne 1
                </test>
            </switch>
            <kinematic name="Rudder Control">
                <input>fcs/rudder-actuator-pos</input>
                <traverse>
                    <setting>
                        <position>-0.35</position>
                        <time>0.90</time>
                        <!-- based on 30 deg/sec -->
                    </setting>
                    <setting>
                        <position>0.35</position>
                        <time>0.90</time>
                        <!-- based on 30 deg/sec -->
                    </setting>
                </traverse>
                <output>fcs/rudder-pos-rad</output>
            </kinematic>

            <aerosurface_scale name="rudder normalization">
                <input>fcs/rudder-pos-rad</input>
                <domain>
                    <min> -0.35 </min>
                    <max>  0.35 </max>
                </domain>
                <range>
                    <min> -1 </min>
                    <max>  1 </max>
                </range>
                <output>fcs/rudder-pos-norm</output>
            </aerosurface_scale>


        </channel>

        <channel name="Flaps">

            <switch name="fcs/flap-total-dmd">
                <default value="0"/>
                <test value="fcs/flap-total-dmd">
                    systems/hydraulics/combined-system-pressure ne 1
                </test>
                <test value="fcs/flap-cmd-norm">
                    fcs/flap-cmd-norm ne 0
                    systems/hydraulics/combined-system-pressure ne 0
                    fcs/wing-sweep-pos-deg le 50
                </test>
                <test value="systems/cadc/manuv-flap-extension-cmd">
                    systems/cadc/manuv-flap-extension-cmd ne 0
                    systems/hydraulics/combined-system-pressure ne 0
                    fcs/wing-sweep-pos-deg le 50
                </test>
                <clipto>
                    <min> 0 </min>
                    <max>  1 </max>
                </clipto>
                <output>fcs/flap-total-dmd</output>
            </switch>

            <switch name="fcs/aux-flap-total-dmd">
                <default value="0"/>
                <test value="fcs/aux-flap-total-dmd">
                    systems/hydraulics/combined-system-pressure ne 1
                </test>
                <test value="fcs/flap-cmd-norm">
                    fcs/flap-cmd-norm ge 0.1428571
                    systems/hydraulics/combined-system-pressure ne 0
                    fcs/wing-sweep-pos-deg le 22
                </test>
                <clipto>
                    <min> 0 </min>
                    <max>  1 </max>
                </clipto>
                <output>fcs/aux-flap-total-dmd</output>
            </switch>

            <pure_gain name="Flap Slat gain">
                <input>fcs/flap-total-dmd</input>
                <gain>2.33333348888889925925995061733</gain>
                <clipto>
                    <min>  0 </min>
                    <max>  1 </max>
                </clipto>
            </pure_gain>
            <switch name="fcs/slat-total-dmd">
                <default value="0"/>
                <test value="fcs/slat-total-dmd">
                    systems/hydraulics/combined-system-pressure ne 1
                </test>

                <test value="fcs/flap-slat-gain">
                    fcs/flap-total-dmd gt 0
                    systems/hydraulics/combined-system-pressure ne 0
                    fcs/wing-sweep-pos-deg le 50
                </test>

                <test value="fcs/slat-cmd">
                    fcs/slat-cmd ne 0
                    systems/hydraulics/combined-system-pressure ne 0
                    fcs/wing-sweep-pos-deg le 50
                </test>
                <test value="systems/cadc/manuv-slat-extension-cmd">
                    systems/cadc/manuv-slat-extension-cmd ne 0
                    systems/hydraulics/combined-system-pressure ne 0
                    fcs/wing-sweep-pos-deg le 50
                </test>
                <clipto>
                    <min> 0 </min>
                    <max>  1 </max>
                </clipto>
                <output>fcs/slat-total-dmd</output>
            </switch>


            <kinematic name="Flaps Control">
                <input>fcs/flap-total-dmd</input>
                <traverse>
                    <setting>
                        <position>  0 </position>
                        <time>      0 </time>
                    </setting>
                    <setting>
                        <position> 10 </position>
                        <time>    0.4 </time>
                    </setting>
                    <setting>
                        <!-- 01-F14AAD-1 figure 2-50 35 degrees  -->
                        <position> 25 </position>
                        <time>    1.0 </time>
                    </setting>
                    <setting>
                        <!-- 01-F14AAD-1 figure 2-50 35 degrees  -->
                        <position> 35 </position>
                        <time>    1.5 </time>
                    </setting>
                </traverse>
                <output>fcs/flap-pos-deg</output>
            </kinematic>
            <kinematic name="Flaps Control">
                <input>fcs/aux-flap-total-dmd</input>
                <traverse>
                    <setting>
                        <position>  0 </position>
                        <time>      0 </time>
                    </setting>
                    <setting>
                        <position> 10 </position>
                        <time>    0.4 </time>
                    </setting>
                    <setting>
                        <!-- 01-F14AAD-1 figure 2-50 35 degrees  -->
                        <position> 25 </position>
                        <time>    1.0 </time>
                    </setting>
                    <setting>
                        <!-- 01-F14AAD-1 figure 2-50 35 degrees  -->
                        <position> 35 </position>
                        <time>    1.5 </time>
                    </setting>
                </traverse>
                <output>fcs/aux-flap-pos-deg</output>
            </kinematic>

            <aerosurface_scale name="flap normalization">
                <input>fcs/flap-pos-deg</input>
                <domain>
                    <min>  0 </min>
                    <max> 35 </max>
                </domain>
                <range>
                    <min> 0 </min>
                    <max> 1 </max>
                </range>
                <output>fcs/flap-pos-norm</output>
            </aerosurface_scale>

            <aerosurface_scale name="aux flap normalization">
                <input>fcs/aux-flap-pos-deg</input>
                <domain>
                    <min>  0 </min>
                    <max> 35 </max>
                </domain>
                <range>
                    <min> 0 </min>
                    <max> 1 </max>
                </range>
                <output>fcs/aux-flap-pos-norm</output>
            </aerosurface_scale>

        </channel>

        <channel name="Slats">
            <kinematic name="Slats Control">
                <input>fcs/slat-total-dmd</input>
                <traverse>
                    <setting>
                        <position>  0 </position>
                        <time>      0 </time>
                    </setting>
                    <setting>
                        <position>  1 </position>
                        <time>      1 </time>
                    </setting>
                </traverse>
                <output>fcs/slat-cmd-norm</output>
            </kinematic>

            <aerosurface_scale name="Slat normalization">
                <input>fcs/slat-cmd-norm</input>
                <domain>
                    <min>  0 </min>
                    <max>  1 </max>
                </domain>
                <range>
                    <min> 0 </min>
                    <max> 17 </max>
                </range>
                <output>fcs/slat-pos-norm-deg</output>
            </aerosurface_scale>
        </channel>


        <channel name="Landing Gear">
            <switch name="gear/gear-dmd-norm">
                <default value="1"/>
                <test value="1">
                    <!-- always force gear down when on ground - to prevent inadvertant retraction -->
                    position/aircraft-on-ground ne 0
                </test>
                <test value="gear/gear-dmd-norm">
                    systems/hydraulics/combined-system-pressure ne 1
                </test>
                <test value="gear/gear-cmd-norm">
                    systems/hydraulics/combined-system-pressure ne 0
                </test>
                <clipto>
                    <min> 0 </min>
                    <max>  1 </max>
                </clipto>
                <output>gear/gear-dmd-norm</output>
            </switch>
            <kinematic name="Gear Control">
                <input>gear/gear-dmd-norm</input>
                <traverse>
                    <setting>
                        <position> 0 </position>
                        <time>     0 </time>
                    </setting>
                    <setting>
                        <position> 1 </position>
                        <time>     5 </time>
                    </setting>
                </traverse>
                <output>gear/gear-pos-norm</output>
            </kinematic>

        </channel>

        <channel name="Speedbrake">
            <switch name="fcs/speedbrake-dmd-norm">
                <default value="0"/>
                <test value="fcs/speedbrake-dmd-norm">
                    systems/hydraulics/combined-system-pressure ne 1
                </test>
                <test value="fcs/speedbrake-cmd-norm">
                    systems/hydraulics/combined-system-pressure ne 0
                </test>
                <clipto>
                    <min> 0 </min>
                    <max>  1 </max>
                </clipto>
                <output>fcs/speedbrake-dmd-norm</output>
            </switch>

            <kinematic name="Speedbrake Control">
                <input>fcs/speedbrake-dmd-norm</input>
                <traverse>
                    <setting>
                        <position> 0 </position>
                        <time>     0 </time>
                    </setting>
                    <!--<setting>
          <position> 0.3 </position>
          <time>     0.5 </time>
       </setting>
       <setting>
          <position> 0.6 </position>
          <time>     0.5 </time>
       </setting>-->
                    <setting>
                        <position> 1 </position>
                        <time>     1.5 </time>
                    </setting>
                </traverse>
                <output>fcs/speedbrake-pos-norm</output>
            </kinematic>
        </channel>

        <channel name="Hook">

            <kinematic name="fcs/hook-control">
                <input>fcs/hook-engage</input>
                <traverse>
                    <setting>
                        <position>0</position>
                        <time>0</time>
                    </setting>
                    <setting>
                        <position>1</position>
                        <time>2.5</time>
                    </setting>
                </traverse>
                <output>fcs/hook-pos-norm</output>
            </kinematic>

        </channel>

        <channel name="extra-aero">

            <fcs_function name="aero/alpha-indicated-deg">
                <description>NASA TM-81833, page 56, Figure 17; converted to linear function</description>
                <function>
                    <product>
                        <sum>
                            <property> aero/alpha-deg </property>
                            <value> 0.1 </value>
                        </sum>
                            <property> tuning/alpha-mx </property>

                    </product>
                </function>
            </fcs_function>


<!--
                        <value>1.40162500000</value>
            <fcs_function name="aero/alpha-indicated-deg">
                <description>ARI nose probe; ref ADA101648 p84; alpha_true = .8122 * alphaNOSEPROBE + .797deg</description>
                <function>
                    <product>
                        <sum>
                            <property> aero/alpha-deg </property>
                            <value> 0.797 </value>
                        </sum>
                        <value>1.231223836</value>
                    </product>
                </function>
            </fcs_function>
-->            <fcs_function name="aero/aero-rp-x-in">
                <function>
                    <description>Centre of pressure due to mach and wingsweep angle</description>
                    <!-- MAC is 16% cbar . cbar is 9.8ft giving us 18.81in as offset to %MAC -->
                        <table>
                            <independentVar lookup="row">velocities/mach</independentVar>
                            <independentVar lookup="column">fcs/wing-sweep-dmd</independentVar>
                            <!-- mach 2.40 with wingsweep 22deg isn't in the envelope -->
                            <tableData>
                                      0.294117647    1.000000000
                               0.0          419.0          429.1
                               2.4          421.0          449.6
                            </tableData>
                        </table>
                </function>
                <output>metrics/aero-rp-x-in</output>
            </fcs_function>

            <fcs_function name="aero/cadc-control-effectivity-factor">
                <function>
                    <description>High speeds CADC control effectivity limitation of rudder and stabilator</description>
                        <table>
                            <independentVar lookup="row">velocities/mach</independentVar>
                            <!-- mach 2.40 with wingsweep 22deg isn't in the envelope -->
                            <tableData>
                               0.0   1.0
                               1.0   0.6
                               2.4   0.3
                            </tableData>
                        </table>
                </function>
            </fcs_function>

            <!-- need %Cg in chord for moments [Xcg - Xref)/100] -->
            <summer name="cg-x-offset-chord-in">
                <input> inertia/cg-x-in</input>
                <input> -metrics/aero-rp-x-in</input>
                <output>inertia/cg-x-offset-chord-in</output>
            </summer>

            <pure_gain name="cg-x-chord-percent">
                <description>Percent offset of the CoP from the CG</description>
                <input>inertia/cg-x-offset-chord-in</input>
                <gain> -0.01</gain>
                <clipto>
                    <min> -1 </min>
                    <max> 1 </max>
                </clipto>
                <output> inertia/cg-x-mac-percent </output>
            </pure_gain>

            <fcs_function name="cbarq-2vo">
                <description>For denormalization</description>
                <function>
                    <quotient>
                        <product>
                            <property>metrics/cbarw-ft</property>
                            <property>velocities/q-aero-rad_sec</property>
                        </product>
                        <!-- over -->
                        <product>
                            <value>2</value>
                            <property>velocities/vt-fps</property>
                        </product>
                    </quotient>
                </function>
                <clipto>
                    <min> -2.01 </min>
                    <max>  2.01 </max>
                </clipto>
                <output>aero/cbarq-2vo</output>
            </fcs_function>


            <fcs_function name="aero-cos-alpha">
                <function>
                        <cos>
                            <property>aero/alpha-rad</property>
                        </cos>
                </function>
                <output>aero/cos-alpha</output>
            </fcs_function>

            <fcs_function name="aero-sin-alpha">
                <function>
                        <sin>
                            <property>aero/alpha-rad</property>
                        </sin>
                </function>
                <output>aero/sin-alpha</output>
            </fcs_function>
        </channel>
        <channel name="throttles">
          <pure_gain name="fcs/throttle-input-pos[0]">
            <input>fcs/throttle-pos-norm[0]</input>
            <gain>1</gain>
          </pure_gain>
          <pure_gain name="fcs/throttle-input-pos[1]">
            <input>fcs/throttle-pos-norm[1]</input>
            <gain>1</gain>
          </pure_gain>
        </channel>

    </flight_control>
    <!--The roll(L) and yaw(N) moments are due to aerodynamics only, while
   the pitch(Z), includes a thrust term. These are given by.
   L = dynamic pressure * Wing Area * Reference Span * CL
   M = dynamic pressure * Wing Area * chord * CM + ZjT
   N = dynamic pressure * Wing Area * Reference Span * CN
   -->
    <aerodynamics>

        <function name="fcs/wing-sweep-cadc-dmd">
            <description>Wing autosweep</description>
            <!-- based on what I can figure out from NAVAIR 01-F14AAD-1 Figure 2-48: p. 2-87
                 using a 2d lookup table so we have no sweep when flaps are out
             -->
                <table>
                    <independentVar lookup="row">velocities/mach</independentVar>
                    <independentVar lookup="column">fcs/flap-pos-deg</independentVar>
                    <tableData>
                                       0            5           50
                      0.000  0.294117647  0.294117647  0.294117647
                      0.448  0.294117647  0.294117647  0.294117647
                      0.650  0.294117647  0.294117647  0.294117647
                      0.711  0.308823529  0.294117647  0.294117647
                      0.913  1.000000000  0.735294117  0.735294117
                    </tableData>
                </table>
        </function>


        <function name="aero/coefficients/Cmach">
            <!--    <description>Mach factor (all except drag) (NASA-TM-84643 Figure 3)</description> -->
            <description>Mach factor (all except drag) (NASA-TM-84643 Figure 3 Clalpha) and values for AOA derived from NASA-aaia-2000-0900 Figure 4</description>
                <table>
                    <independentVar lookup="row">aero/alpha-deg</independentVar>
                    <independentVar lookup="column">velocities/mach</independentVar>
                    <tableData>
                                   0.0         0.2         0.6         0.9         1.1         1.3         1.5         1.8         2.1         2.6         3.0
                       -20  1.00000000  1.00000000  0.96610485  1.23950808  1.41632259  1.34327421  1.13294356  0.93062904  0.76851372  0.58968226  0.51614275
                       -15  1.00000000  1.00000000  0.96116198  1.23316641  1.40907629  1.33640164  1.12714710  0.92586768  0.76458179  0.58666528  0.51350202
                       -10  1.00000000  1.00000000  0.99142346  1.27199174  1.45344001  1.37847726  1.16263449  0.95501794  0.78865408  0.60513601  0.52966925
                        -5  1.00000000  1.00000000  0.96759116  1.24141501  1.41850155  1.34534078  1.13468655  0.93206078  0.76969605  0.59058947  0.51693681
                         4  1.00000000  1.00000000  0.95837601  1.22959201  1.40499202  1.33252801  1.12388001  0.92318401  0.76236561  0.58496481  0.51201361
                         8  1.00000000  1.00000000  0.99142346  1.27199174  1.45344001  1.37847726  1.16263449  0.95501794  0.78865408  0.60513601  0.52966925
                        12  1.00000000  1.00000000  0.96759116  1.24141501  1.41850155  1.34534078  1.13468655  0.93206078  0.76969605  0.59058947  0.51693681
                        16  1.00000000  1.00000000  0.98015728  1.25753729  1.43692365  1.36281274  1.14942274  0.94416546  0.77969210  0.59825946  0.52365028
                        20  1.00000000  1.00000000  0.96074823  1.23263556  1.40846972  1.33582635  1.12666189  0.92546912  0.76425265  0.58641274  0.51328097
                        24  1.00000000  1.00000000  0.96503140  1.23813085  1.41474891  1.34178168  1.13168474  0.92959501  0.76765981  0.58902706  0.51556926
                        28  1.00000000  1.00000000  0.96044147  1.23224199  1.40802001  1.33539984  1.12630217  0.92517363  0.76400864  0.58622551  0.51311708
                        32  1.00000000  1.00000000  0.96642959  1.23992472  1.41679867  1.34372573  1.13332438  0.93094186  0.76877204  0.58988048  0.51631624
                        40  1.00000000  1.00000000  0.95223257  1.22171001  1.39598566  1.32398617  1.11667565  0.91726616  0.75747865  0.58121503  0.50873147
                        45  1.00000000  1.00000000  0.95617790  1.22677185  1.40176956  1.32947176  1.12130231  0.92106662  0.76061706  0.58362314  0.51083926
                        50  1.00000000  1.00000000  0.95837601  1.22959201  1.40499202  1.33252801  1.12388001  0.92318401  0.76236561  0.58496481  0.51201361
                    </tableData>
                </table>
        </function>
        <function name="aero/coefficients/CdTNK">
            <description>Incremental Cd due to external tanks</description>
            <product>
                <property>fcs/external-tanks-fitted</property>
                <table>
                    <independentVar lookup="row">velocities/mach</independentVar>
                    <tableData>
                        0.40  0.0005
                        0.60  0.0005
                        0.70  0.0005
                        0.80  0.0005
                        0.85  0.0011
                        0.90  0.0065
                        0.94  0.0074
                        0.98  0.0077
                        1.00  0.0078
                        1.10  0.0079
                        1.20  0.0080
                        2.00  0.0081
                    </tableData>
                </table>
            </product>
        </function>

        <function name="aero/coefficients/ClSweepFactor">
            <description>Wing sweep factor from norm of 22 (NASA-TM-D-6909)</description>
                <table>
                    <independentVar lookup="row">aero/alpha-deg</independentVar>
                    <independentVar lookup="column">fcs/wing-sweep-pos-deg</independentVar>
                    <tableData>
                                   0        22        50        58
                         0  1.000000  1.000000  0.791274  0.653661
                        10  1.000000  1.000000  0.829267  0.700928
                        15  1.000000  1.000000  0.953910  0.860083
                        20  1.000000  1.000000  0.960603  0.910701
                        25  1.000000  1.000000  0.958058  0.969330
                        30  1.000000  1.000000  1.027476  0.955345
                        35  1.000000  1.000000  1.088021  0.994762
                        40  1.000000  1.000000  1.083636  1.049773
                        45  1.000000  1.000000  1.066517  1.066517
                        50  1.000000  1.000000  0.910848  0.936149
                        55  1.000000  1.000000  0.921275  0.914270
                    </tableData>
                </table>
        </function>
        <function name="aero/coefficients/ClBAS">
            <description>Cl BASIC AFWAL-TR-80-3141 PartIII - Figure 36 </description>
                <table>
                    <independentVar lookup="row">aero/alpha-deg</independentVar>
                    <independentVar lookup="column">aero/beta-deg</independentVar>
                    <tableData>
                                  -20        -15        -10         -5          0          5         10         15         20
                       -55 -1.3463540 -1.3852470 -1.3945640 -1.4176920 -1.4273690 -1.4176920 -1.3945640 -1.3852470 -1.3463540
                       -50 -1.4760110 -1.4999080 -1.5213490 -1.5467930 -1.5809450 -1.5467930 -1.5213190 -1.4999080 -1.4760110
                       -45 -1.5671970 -1.6102240 -1.6171880 -1.6520130 -1.6689840 -1.6520130 -1.6171880 -1.6102240 -1.5671970
                       -40 -1.6664090 -1.6917280 -1.7122880 -1.7481220 -1.7718120 -1.7481220 -1.7122880 -1.6917280 -1.6664090
                       -35 -1.7330310 -1.7703260 -1.8407520 -1.8705200 -1.9301090 -1.8705200 -1.8407520 -1.7703260 -1.7330310
                       -30 -1.7201080 -1.7904460 -1.8528920 -1.8981360 -1.9270530 -1.8981360 -1.8528920 -1.7904460 -1.7201080
                       -25 -1.6404500 -1.6989470 -1.7400030 -1.7662890 -1.7744220 -1.7662890 -1.7400030 -1.6989470 -1.6404500
                       -20 -1.4394210 -1.5154020 -1.5632960 -1.5696730 -1.6031600 -1.5696730 -1.5632960 -1.5154020 -1.4394210
                       -15 -1.2135860 -1.2448890 -1.2844040 -1.2762190 -1.2789460 -1.2762190 -1.2844040 -1.2448890 -1.2135860
                       -10 -0.9215569 -0.9808749 -1.0017560 -1.0194540 -1.0129430 -1.0194540 -1.0017560 -0.9808749 -0.9215569
                        -5 -0.5286301 -0.5746194 -0.6024052 -0.6185578 -0.5813407 -0.6185578 -0.6024052 -0.5746194 -0.5286301
                         0  0.0614500  0.1470500  0.1098500  0.1455500  0.0776000  0.1455500  0.1098500  0.1470500  0.0614500
                         5  0.5286301  0.5746194  0.6024052  0.6185578  0.5813407  0.6185578  0.6024052  0.5746194  0.5286301
                        10  0.9215569  0.9808749  1.0017560  1.0194540  1.0129430  1.0194540  1.0017560  0.9808749  0.9215569
                        15  1.2135860  1.2448890  1.2844040  1.2762190  1.2789460  1.2762190  1.2844040  1.2448890  1.2135860
                        20  1.4394210  1.5154020  1.5632960  1.5696730  1.6031600  1.5696730  1.5632960  1.5154020  1.4394210
                        25  1.6404500  1.6989470  1.7400030  1.7662890  1.7744220  1.7662890  1.7400030  1.6989470  1.6404500
                        30  1.7201080  1.7904460  1.8528920  1.8981360  1.9270530  1.8981360  1.8528920  1.7904460  1.7201080
                        35  1.7330310  1.7703260  1.8407520  1.8705200  1.9301090  1.8705200  1.8407520  1.7703260  1.7330310
                        40  1.6664090  1.6917280  1.7122880  1.7481220  1.7718120  1.7481220  1.7122880  1.6917280  1.6664090
                        45  1.5671970  1.6102240  1.6171880  1.6520130  1.6689840  1.6520130  1.6171880  1.6102240  1.5671970
                        50  1.4760110  1.4999080  1.5213490  1.5467930  1.5809450  1.5467930  1.5213190  1.4999080  1.4760110
                        55  1.3463540  1.3852470  1.3945640  1.4176920  1.4273690  1.4176920  1.3945640  1.3852470  1.3463540
                    </tableData>
                </table>
        </function>

        <function name="aero/coefficients/DClSLM">
            <description>Delta Cl due to mean slat position</description>
            <product>
                <property>tuning/DClSLM</property>
                <table>
                    <independentVar lookup="row">aero/alpha-deg</independentVar>
                    <independentVar lookup="column">fcs/slat-pos-norm-deg</independentVar>
                    <tableData>
                                     0           8          17
                       -20  0.00000000 -0.03550000 -0.05100818
                       -15  0.00000000 -0.03210000 -0.04067942
                       -10  0.00000000 -0.02560000 -0.03225751
                        -5  0.00000000 -0.02030000 -0.01843286
                         0  0.00000000 -0.01160000  0.00254246
                         5  0.00000000  0.00160000  0.01843286
                        10  0.00000000  0.01160000  0.03225751
                        15  0.00000000  0.02030000  0.04067942
                        20  0.00000000  0.02560000  0.05100818
                        25  0.00000000  0.03210000  0.05641092
                        30  0.00000000  0.03550000  0.06117804
                        35  0.00000000  0.03850000  0.06133694
                        40  0.00000000  0.03860000  0.05625202
                        45  0.00000000  0.03540000  0.05307394
                        50  0.00000000  0.03340000  0.05021366
                        55  0.00000000  0.03160000  0.04528764
                    </tableData>
                </table>
            </product>
        </function>
        <function name="aero/coefficients/ClDFM">
            <description>Delta Cl due to mean flap position</description>
            <product>
                <property>tuning/ClDFM</property>
                    <table>
                        <independentVar lookup="row">aero/alpha-deg</independentVar>
                        <independentVar lookup="column">fcs/flap-pos-deg</independentVar>
                        <tableData>
                                         0          20          35
                           -10  0.00000000  0.22283000  0.34775705
                            -5  0.00000000  0.25918000  0.38172134
                            -2  0.00000000  0.27830000  0.40201901
                             0  0.00000000  0.29178000  0.41855377
                             1  0.00000000  0.29783000  0.43077405
                             2  0.00000000  0.30296000  0.43836117
                             3  0.00000000  0.30691000  0.43826311
                             4  0.00000000  0.30953000  0.42986703
                             5  0.00000000  0.31287000  0.42338305
                             6  0.00000000  0.31305000  0.41240074
                             7  0.00000000  0.30644000  0.39938375
                             8  0.00000000  0.29084000  0.38338830
                             9  0.00000000  0.26762000  0.36507626
                            10  0.00000000  0.24161000  0.34400639
                            11  0.00000000  0.21800000  0.32481185
                            12  0.00000000  0.19550000  0.30549474
                            13  0.00000000  0.17113000  0.28424101
                            14  0.00000000  0.16196000  0.27814926
                            15  0.00000000  0.15991000  0.28012264
                            16  0.00000000  0.15903000  0.28361590
                            17  0.00000000  0.15966000  0.28764847
                            18  0.00000000  0.15957000  0.28867806
                            19  0.00000000  0.16015000  0.28758719
                            20  0.00000000  0.15870000  0.28377524
                            22  0.00000000  0.15710000  0.27328321
                            24  0.00000000  0.15008000  0.25721421
                            25  0.00000000  0.14157000  0.24661186
                            28  0.00000000  0.11244000  0.21273338
                            30  0.00000000  0.09685000  0.19487485
                            35  0.00000000  0.08773000  0.19214153
                            45  0.00000000  0.07119000  0.18554724
                            50  0.00000000  0.07007000  0.19565930
                            55  0.00000000  0.06970000  0.20360187
                            60  0.00000000  0.06466000  0.20624940
                        </tableData>
                    </table>
                </product>
            </function>

        <function name="aero/coefficients/ClDAFM">
            <description>Delta Cl due to mean aux flap position</description>
            <product>
                <property>tuning/ClDAFM</property>
                <table>
                    <independentVar lookup="row">aero/alpha-deg</independentVar>
                    <independentVar lookup="column">fcs/aux-flap-pos-deg</independentVar>
                    <tableData>
                                     0          20          35
                       -10  0.00000000  0.09080000  0.18370891
                        -5  0.00000000  0.10561000  0.20164918
                        -2  0.00000000  0.11340000  0.21237520
                         0  0.00000000  0.11889000  0.22109903
                         1  0.00000000  0.12135000  0.22756642
                         2  0.00000000  0.12345000  0.23157080
                         3  0.00000000  0.12506000  0.23150724
                         4  0.00000000  0.12613000  0.22707382
                         5  0.00000000  0.12749000  0.22365738
                         6  0.00000000  0.12756000  0.21785738
                         7  0.00000000  0.12487000  0.21097684
                         8  0.00000000  0.11851000  0.20252315
                         9  0.00000000  0.10905000  0.19286178
                        10  0.00000000  0.09845000  0.18172261
                        11  0.00000000  0.08883000  0.17158454
                        12  0.00000000  0.07966000  0.16138290
                        13  0.00000000  0.06973000  0.15014839
                        14  0.00000000  0.06599000  0.14693853
                        15  0.00000000  0.06516000  0.14798730
                        16  0.00000000  0.06480000  0.14981469
                        17  0.00000000  0.06506000  0.15195990
                        18  0.00000000  0.06502000  0.15250017
                        19  0.00000000  0.06526000  0.15191222
                        20  0.00000000  0.06467000  0.14991003
                        22  0.00000000  0.06401000  0.14436428
                        24  0.00000000  0.06116000  0.13587881
                        25  0.00000000  0.05769000  0.13026950
                        28  0.00000000  0.04582000  0.11237691
                        30  0.00000000  0.03946000  0.10293801
                        35  0.00000000  0.03575000  0.10150788
                        45  0.00000000  0.02901000  0.09801199
                        50  0.00000000  0.02855000  0.10335116
                        55  0.00000000  0.02840000  0.10754623
                        60  0.00000000  0.02635000  0.10896047
                    </tableData>
                </table>
            </product>
        </function>

        <function name="aero/coefficients/ClDSpL">
    <description>LIFT INCREMENT DUE TO LEFT SPOILER DEFLECTION</description>
    <product>
          <property>fcs/spoiler-left-pos-deg</property>
          <property>aero/coefficients/CSPL</property>
          <table>
            <independentVar lookup="row">aero/alpha-deg</independentVar>
            <tableData>
               -10 -0.00620975
                -5 -0.00585775
                -2 -0.00549425
                 0 -0.00525050
                 1 -0.00517925
                 2 -0.00500400
                 3 -0.00480800
                 4 -0.00453175
                 5 -0.00415850
                 6 -0.00372725
                 7 -0.00332550
                 8 -0.00289175
                 9 -0.00242275
                10 -0.00193875
                11 -0.00152050
                12 -0.00110075
                13 -0.00065500
                14 -0.00028350
                15 -0.00048375
                16 -0.00036750
                17 -0.00030575
                18 -0.00028000
                19 -0.00031225
                20  0.00021425
                22 -0.00026325
                24 -0.00022325
                25 -0.00020525
                28 -0.00017575
                30  0.00005625
                35  0.00008125
                45  0.00003550
                50  0.00003400
                55 -0.00008400
                60  0.00001275
            </tableData>
          </table>
       </product>
    </function>

        <function name="aero/coefficients/ClDSpR">
    <product>
          <property>fcs/spoiler-right-pos-deg</property>
          <property>aero/coefficients/CSPL</property>
          <table>
            <independentVar lookup="row">aero/alpha-deg</independentVar>
            <tableData>
               -10 -0.00620975
                -5 -0.00585775
                -2 -0.00549425
                 0 -0.00525050
                 1 -0.00517925
                 2 -0.00500400
                 3 -0.00480800
                 4 -0.00453175
                 5 -0.00415850
                 6 -0.00372725
                 7 -0.00332550
                 8 -0.00289175
                 9 -0.00242275
                10 -0.00193875
                11 -0.00152050
                12 -0.00110075
                13 -0.00065500
                14 -0.00028350
                15 -0.00048375
                16 -0.00036750
                17 -0.00030575
                18 -0.00028000
                19 -0.00031225
                20  0.00021425
                22 -0.00026325
                24 -0.00022325
                25 -0.00020525
                28 -0.00017575
                30  0.00005625
                35  0.00008125
                45  0.00003550
                50  0.00003400
                55 -0.00008400
                60  0.00001275
            </tableData>
          </table>
       </product>
    </function>

        <function name="aero/coefficients/ClDasym">
            <description>Delta Cl due to wing asymmetry</description>
            <product>
                <property>systems/flyt/wing-asymmetry</property> <!-- sqr to remove the sign (value either -1, 0 or 1 -->
                <property>systems/flyt/wing-asymmetry</property>
                <property>aero/coefficients/ClBAS</property>
                <value>-0.3</value>
            </product>
        </function>

        <function name="aero/coefficients/ClUC">
            <description>Cl increment due to gear</description>
            <product>
                <property>gear/gear-pos-norm</property>
                <table>
                    <independentVar lookup="row">aero/alpha-deg</independentVar>
                    <tableData>
                       -10    0.0000
                         0   -0.0012
                         8   -0.0010
                        12   -0.0004
                        14   -0.0002
                        16   -0.0001
                        18    0.0000
                    </tableData>
                </table>
            </product>
        </function>

        <function name="aero/coefficients/ClDS1">
            <description>ClDS1 AFWAL-TR-80-3141 PartIII - Figure 38</description>
            <product>
                <property>aero/cadc-control-effectivity-factor</property>
                <table>
                    <independentVar lookup="row">aero/alpha-deg</independentVar>
                    <tableData>
                       -65  0.0065
                       -55  0.0065
                       -50  0.0070
                       -45  0.0060
                       -40  0.0045
                       -35  0.0115
                       -30  0.0130
                       -25  0.0145
                       -20  0.0165
                       -15  0.0150
                       -10  0.0135
                        -5  0.0125
                         0  0.0165
                         5  0.0125
                        10  0.0135
                        15  0.0150
                        20  0.0165
                        25  0.0145
                        30  0.0130
                        35  0.0115
                        40  0.0045
                        45  0.0060
                        50  0.0070
                        55  0.0065
                    </tableData>
                </table>
            </product>
        </function>

        <function name="aero/coefficients/ClDS2">
            <description>ClDS2 AFWAL-TR-80-3141 PartIII - Figure 39</description>
            <product>
                <property>aero/cadc-control-effectivity-factor</property>
                <table>
                    <independentVar lookup="row">aero/alpha-deg</independentVar>
                    <tableData>
                       -60 -0.0055
                       -55 -0.0055
                       -50 -0.0080
                       -45 -0.0110
                       -40 -0.0120
                       -30  0.0125
                       -10 -0.0115
                        -5 -0.0035
                         0  0.0065
                         5  0.0095
                        10  0.0115
                        15  0.0125
                        20  0.0120
                        25  0.0125
                        30  0.0125
                        35  0.0135
                        40  0.0120
                        45  0.0110
                        50  0.0080
                        55  0.0055
                    </tableData>
                </table>
            </product>
        </function>
        <function name="aero/coefficients/DClDS1">
            <description>DClDS1</description>
            <product>
                <property>fcs/stabilizer-1p-factor</property>
                <property>aero/coefficients/ClDS1</property>
                <property>fcs/elevator-pos-deg</property>
            </product>
        </function>
        <function name="aero/coefficients/DClDS2">
            <description>DClDS2</description>
            <product>
                <property>fcs/stabilizer-2p-factor</property>
                <sum>
                    <product>
                        <value>-10</value>
                        <property>aero/coefficients/ClDS1</property>
                    </product>
                    <product>
                        <sum>
                            <value>10</value>
                            <property>fcs/elevator-pos-deg</property>
                        </sum>
                        <property>aero/coefficients/ClDS2</property>
                    </product>
                </sum>
            </product>
        </function>
        <function name="aero/coefficients/Cl">
            <sum>
                <property>aero/coefficients/ClBAS</property>
                <property>aero/coefficients/DClDS1</property>
                <property>aero/coefficients/DClDS2</property>
                <property>aero/coefficients/ClUC</property>
                <property>aero/coefficients/ClDFM</property>
                <property>aero/coefficients/ClDAFM</property>
                <property>aero/coefficients/DClSLM</property>
                <property>aero/coefficients/ClDSpL</property>
                <property>aero/coefficients/ClDSpR</property>
                <property>aero/coefficients/ClDasym</property>
            </sum>
        </function>
        <function name="aero/coefficients/CdUC">
            <description>Cd increment due to gear</description>
            <product>
                <property>gear/gear-pos-norm</property>
                <table>
                    <independentVar lookup="row">aero/alpha-deg</independentVar>
                    <tableData>
                       -10    0.00000
                        -5    0.00017
                         0    0.00001
                         5    0.00005
                        10    0.00000
                    </tableData>
                </table>
            </product>
        </function>
        <function name="aero/coefficients/CdDSp">
            <description>DRAG INCREMENT DUE TO SPOILER DEFLECTION</description>
            <product>
                <sum>
                    <property>fcs/spoiler-left-pos-deg</property>
                    <property>fcs/spoiler-right-pos-deg</property>
          <property>aero/coefficients/CSPL</property>
                </sum>
          <table>
            <independentVar lookup="row">aero/alpha-deg</independentVar>
            <tableData>
               -10  0.00028225
                -5 -0.00004075
                -2 -0.00023050
                 0 -0.00034900
                 1 -0.00040950
                 2 -0.00045975
                 3 -0.00051175
                 4 -0.00054675
                 5 -0.00056675
                 6 -0.00057625
                 7 -0.00058750
                 8 -0.00057450
                 9 -0.00055350
                10 -0.00052500
                11 -0.00049475
                12 -0.00046550
                13 -0.00043725
                14 -0.00039825
                15 -0.00043175
                16 -0.00037175
                17 -0.00037675
                18 -0.00035525
                19 -0.00035100
                20 -0.00014525
                22 -0.00033100
                24 -0.00027550
                25 -0.00025725
                28 -0.00018275
                30 -0.00012775
                35 -0.00001950
                45  0.00001575
                50  0.00005900
                55 -0.00672250
                60  0.00002100
            </tableData>
          </table>
       </product>
        </function>

        <function name="aero/coefficients/CdDBRK">
            <description>Drag due to speedbrakes</description>
            <product>
                <property>fcs/speedbrake-pos-norm</property>
                <table>
                    <independentVar lookup="row">aero/alpha-deg</independentVar>
                    <tableData>
                       -10    0.02013
                        -5    0.02183
                        -2    0.02370
                         0    0.02378
                         1    0.02578
                         2    0.02537
                         3    0.02532
                         4    0.02690
                         5    0.02726
                         6    0.02839
                         7    0.02971
                         8    0.03055
                         9    0.03142
                        10    0.03178
                        11    0.03352
                        12    0.03433
                        13    0.03497
                        14    0.03718
                        15    0.03602
                        16    0.03826
                        17    0.03835
                        18    0.03819
                        19    0.03785
                        20    0.04139
                        22    0.03926
                        24    0.02865
                        25    0.02662
                        28    0.01376
                        30    0.00236
                        35    0.00000
                    </tableData>
                </table>
            </product>
        </function>
        <!-- <function name="aero/coefficients/CdMach">
            <description>Drag increment due to mach (NASA-TP-2580 Figure 16)</description>
                <table>
                    <independentVar lookup="row">velocities/mach</independentVar>
                    <tableData> -->
                        <!-- This follows the basic shape to provide a factor that has been
                             tuned to match known performance characteristics and may well be wrong
                             based on tp2580 but tuned to meet F14-AAD-1 -->
                      <!-- 0.20  0.00000
                      0.80  0.02472
                      0.84  0.02772
                      0.90  0.02520
                      0.94  0.05736
                      0.98  0.07676
                      0.99  0.08288
                      1.00  0.08495
                      1.03  0.05483
                      1.20  0.05102
                      1.25  0.03375
                      1.70  0.02500
                      2.00  0.02260
                      2.17  0.02190
                      2.47  0.02179
                   </tableData>
                </table>
        </function> -->

        <function name="aero/coefficients/CdMach">
            <description>DRAG DUE TO MACH AND WINGSWEEP</description>
            <product>
                <property>tuning/CMBRK</property>
            <table>
                <independentVar lookup="row">velocities/mach</independentVar>
                <independentVar lookup="column">aero/alpha-deg</independentVar>
                <independentVar lookup="table">fcs/wing-sweep-pos-deg</independentVar>
                <tableData breakPoint="20">
                    -15	-10	0	10	15
                0.20	0.00000	0.00000	0.00000	0.00000	0.00000
                0.40	0.00000	0.00000	0.00000	0.00000	0.00000
                0.60	0.00000	0.00000	0.00000	0.00000	0.00000
                0.80	0.03735	0.01165	0.02241	0.03317	0.06043
                0.90	0.05973	0.01912	0.03583	0.05254	0.08956
                0.94	0.20353	0.07172	0.10596	0.14020	0.19890
                1.05	0.60457	0.35993	0.40589	0.45185	0.67596
                1.10	0.19079	0.12711	0.11777	0.10843	0.18283
                1.20	0.07924	0.05217	0.05176	0.05135	0.09366
                1.30	0.06076	0.03646	0.04127	0.04608	0.08509
                1.80	0.06702	0.03979	0.04541	0.05103	0.09826
                2.50	0.03947	0.02362	0.02445	0.02527	0.05227
                </tableData>
                <tableData breakPoint="45">
                    -15	-10	0	10	15
                0.20	0.00000	0.00000	0.00000	0.00000	0.00000
                0.40	0.00000	0.00000	0.00000	0.00000	0.00000
                0.60	0.00000	0.00000	0.00000	0.00000	0.00000
                0.80	0.02311	0.00726	0.01253	0.01780	0.02817
                0.90	0.03336	0.01108	0.01758	0.02407	0.03842
                0.94	0.10884	0.04090	0.04437	0.04784	0.06215
                1.05	0.40537	0.22989	0.28925	0.34862	0.63077
                1.10	0.14576	0.08522	0.09692	0.10862	0.18324
                1.20	0.13373	0.07642	0.08539	0.09435	0.16593
                1.30	0.11643	0.06993	0.08400	0.09808	0.18076
                1.80	0.11305	0.05998	0.07194	0.08391	0.15928
                2.50	0.06231	0.03497	0.03878	0.04259	0.08769
                </tableData>
                <tableData breakPoint="68">
                    -15	-10	0	10	15
                0.20	0.00000	0.00000	0.00000	0.00000	0.00000
                0.40	0.00000	0.00000	0.00000	0.00000	0.00000
                0.60	0.00000	0.00000	0.00000	0.00000	0.00000
                0.80	0.01616	0.00530	0.00965	0.01399	0.02681
                0.90	0.02450	0.00857	0.01473	0.02089	0.03790
                0.94	0.08469	0.03295	0.04492	0.05689	0.08850
                1.05	0.15133	0.10011	0.11320	0.12629	0.30554
                1.10	0.05603	0.04325	0.04570	0.04815	0.08968
                1.20	0.05455	0.04190	0.04431	0.04673	0.08138
                1.30	0.04105	0.02814	0.03216	0.03618	0.08293
                1.80	0.05272	0.03414	0.03953	0.04491	0.09641
                2.50	0.03955	0.02780	0.03018	0.03257	0.06680
                </tableData>

            </table>
        </product>
    </function>
        <function name="aero/coefficients/CdBAS">
            <description>CdBAS</description>
                <table>
                    <independentVar lookup="row">aero/alpha-deg</independentVar>
                    <independentVar lookup="column">aero/beta-deg</independentVar>
                    <tableData>
                                   -20         -15         -10          -5           0           5          10          15          20
                       -55  1.90570600  1.96386700  1.98249100  2.02153600  2.03465900  2.02153600  1.98249100  1.96386700  1.90570600
                       -50  1.74877400  1.78230900  1.81470600  1.84961900  1.89047500  1.84961900  1.81470600  1.78230900  1.74877400
                       -45  1.56330700  1.61255700  1.62553300  1.66403500  1.68355100  1.66403500  1.62553300  1.61255700  1.56330700
                       -40  1.39821700  1.42475000  1.44800800  1.48316600  1.50487200  1.48316600  1.44800800  1.42475000  1.39821700
                       -35  1.21140600  1.24374700  1.29458600  1.32128900  1.36258600  1.32128900  1.29458600  1.24374700  1.21140600
                       -30  0.98698510  1.03105800  1.06849700  1.09583100  1.11304600  1.09583100  1.06849700  1.03105800  0.98698510
                       -25  0.75231020  0.78257730  0.80420480  0.81740020  0.82113730  0.81740020  0.80420480  0.78257730  0.75221020
                       -20  0.51235980  0.54320750  0.56292740  0.56514200  0.57722390  0.56514200  0.56292740  0.54320750  0.51235980
                       -15  0.31166910  0.32756250  0.34487960  0.34548170  0.34631600  0.34548170  0.34487960  0.32756250  0.31166910
                       -10  0.14076520  0.15650480  0.16247150  0.16777520  0.16784560  0.16777520  0.16247150  0.15650480  0.14076520
                        -5  0.04338830  0.04781330  0.05320550  0.05617460  0.05818860  0.05617460  0.05320350  0.04781330  0.04338830
                         0  0.01700000  0.01705000  0.02160000  0.02295000  0.02520000  0.02295000  0.02160000  0.01705000  0.01700000
                         5  0.04338825  0.04781333  0.05320554  0.05617464  0.05818861  0.05617464  0.05320354  0.04781333  0.04338825
                        10  0.14076520  0.15650480  0.16247150  0.16777520  0.16784560  0.16777520  0.16247150  0.15650480  0.14076520
                        15  0.31166910  0.32756250  0.34487960  0.34548170  0.34631600  0.34548170  0.34487960  0.32756250  0.31166910
                        20  0.51235980  0.54320750  0.56292740  0.56514200  0.57722390  0.56514200  0.56292740  0.54320750  0.51235980
                        25  0.75231020  0.78257730  0.80420480  0.81740020  0.82113730  0.81740020  0.80420480  0.78257730  0.75221020
                        30  0.98698510  1.03105800  1.06849700  1.09583100  1.11304600  1.09583100  1.06849700  1.03105800  0.98698510
                        35  1.21140600  1.24374700  1.29458600  1.32128900  1.36258600  1.32128900  1.29458600  1.24374700  1.21140600
                        40  1.39821700  1.42475000  1.44800800  1.48316600  1.50487200  1.48316600  1.44800800  1.42475000  1.39821700
                        45  1.56330700  1.61255700  1.62553300  1.66403500  1.68355100  1.66403500  1.62553300  1.61255700  1.56330700
                        50  1.74877400  1.78230900  1.81470600  1.84961900  1.89047500  1.84961900  1.81470600  1.78230900  1.74877400
                        55  1.90570600  1.96386700  1.98249100  2.02153600  2.03465900  2.02153600  1.98249100  1.96386700  1.90570600
                    </tableData>
                </table>
        </function>
        <function name="aero/coefficients/CdDSLM">
            <description>Delta Cd due to mean slat position</description>
            <product>
                <property>tuning/CdDFM</property>
                <table>
                    <independentVar lookup="row">aero/alpha-deg</independentVar>
                    <independentVar lookup="column">fcs/slat-pos-norm-deg</independentVar>
                    <tableData>
                                     0           8          17
                       -20  0.00000000  0.00820000  0.00733972
                       -15  0.00000000  0.00570000  0.00450685
                       -10  0.00000000  0.00350000  0.00218904
                        -5  0.00000000  0.00170000  0.00077260
                         0  0.00000000  0.00060000  0.00025753
                         5  0.00000000  0.00020000  0.00077260
                        10  0.00000000  0.00060000  0.00218904
                        15  0.00000000  0.00170000  0.00450685
                        20  0.00000000  0.00350000  0.00733972
                        25  0.00000000  0.00570000  0.01055889
                        30  0.00000000  0.00820000  0.01416437
                        35  0.00000000  0.01100000  0.01699724
                        40  0.00000000  0.01320000  0.01905752
                        45  0.00000000  0.01480000  0.02137532
                        50  0.00000000  0.01660000  0.02382190
                        55  0.00000000  0.01850000  0.02601093
                    </tableData>
                </table>
            </product>
        </function>

        <function name="aero/coefficients/CdDFM">
            <description>Delta Cd due to mean flap position</description>
            <product>
                <property>tuning/CdDFM</property>
                <table>
                    <independentVar lookup="row">aero/alpha-deg</independentVar>
                    <independentVar lookup="column">fcs/flap-pos-deg</independentVar>
                    <tableData>
                                     0          20          35
                       -10  0.00000000  0.00975000  0.02202946
                        -5  0.00000000  0.00859000  0.04257166
                        -2  0.00000000  0.01978000  0.06156350
                         0  0.00000000  0.02890000  0.07548965
                         1  0.00000000  0.03402000  0.08186233
                         2  0.00000000  0.03927000  0.08680183
                         3  0.00000000  0.04456000  0.09062364
                         4  0.00000000  0.04980000  0.09339986
                         5  0.00000000  0.05517000  0.09616706
                         6  0.00000000  0.06010000  0.09813204
                         7  0.00000000  0.06389000  0.09935790
                         8  0.00000000  0.06604000  0.10035842
                         9  0.00000000  0.06646000  0.10060179
                        10  0.00000000  0.06576000  0.09957423
                        11  0.00000000  0.06474000  0.09860977
                        12  0.00000000  0.06407000  0.09792473
                        13  0.00000000  0.06305000  0.09580651
                        14  0.00000000  0.06166000  0.09423813
                        15  0.00000000  0.06147000  0.09376942
                        16  0.00000000  0.06135000  0.09318353
                        17  0.00000000  0.06081000  0.09268777
                        18  0.00000000  0.06101000  0.09252553
                        19  0.00000000  0.06176000  0.09314747
                        20  0.00000000  0.06154000  0.09251651
                        22  0.00000000  0.06295000  0.09245342
                        24  0.00000000  0.07362000  0.10406305
                        25  0.00000000  0.07372000  0.10445064
                        28  0.00000000  0.07829000  0.10813724
                        30  0.00000000  0.08283000  0.11191398
                        35  0.00000000  0.09637000  0.12415457
                        45  0.00000000  0.10681000  0.13045514
                        50  0.00000000  0.12454000  0.14622008
                        55  0.00000000  0.16139000  0.17642495
                        60  0.00000000  0.18901000  0.19432614
                    </tableData>
                </table>
            </product>
        </function>

        <function name="aero/coefficients/CdDAFM">
            <description>Delta Cd due to mean flap position</description>
            <product>
                <property>tuning/CdDAFM</property>
                <table>
                    <independentVar lookup="row">fcs/aux-flap-pos-deg</independentVar>
                    <independentVar lookup="column">aero/alpha-deg</independentVar>
                    <tableData>
                                   -20          -5           0           5          10          25          50
                         0  0.00000000  0.00000000  0.00000000  0.00000000  0.00000000  0.00000000  0.00000000
                        10  0.00600000  0.00972000  0.00828000  0.00972000  0.01092000  0.01224000  0.04110000
                        35  0.04552101  0.03480048  0.03140761  0.03480048  0.04978566  0.07212206  0.28139619
                    </tableData>
                </table>
            </product>
        </function>

        <function name="aero/coefficients/CdDS1">
            <description>CdDS1</description>
            <product>
                <property>aero/cadc-control-effectivity-factor</property>
                <table>
                    <independentVar lookup="row">aero/alpha-deg</independentVar>
                    <tableData>
                       -65  0.0140
                       -55  0.0140
                       -10  0.0018
                        -5 -0.0003
                         0 -0.0012
                         5  0.0003
                        10  0.0018
                        15  0.0040
                        20  0.0062
                        25  0.0075
                        30  0.0095
                        35  0.0105
                        40  0.0075
                        45  0.0090
                        50  0.0125
                        55  0.0140
                    </tableData>
                </table>
            </product>
        </function>

        <function name="aero/coefficients/CdDS2">
            <description>CdDS2</description>
            <product>
                <property>aero/cadc-control-effectivity-factor</property>
                <table>
                    <independentVar lookup="row">aero/alpha-deg</independentVar>
                    <tableData>
                       -65  0.0090
                       -55  0.0090
                       -30  0.0060
                       -10 -0.0010
                        -5 -0.0003
                         0 -0.0033
                         5 -0.0025
                        10 -0.0010
                        15  0.0005
                        20  0.0020
                        25  0.0040
                        30  0.0060
                        35  0.0085
                        40  0.0095
                        45  0.0110
                        50  0.0105
                        55  0.0090
                    </tableData>
                </table>
            </product>
        </function>

        <function name="aero/coefficients/DCdDS1">
            <description>DCdDS1</description>
            <product>
                <property>fcs/stabilizer-1p-factor</property>
                <property>aero/coefficients/CdDS1</property>
                <property>fcs/elevator-pos-deg</property>
            </product>
        </function>

        <function name="aero/coefficients/DCdDS2">
            <description>DCdDS2</description>
            <product>
                <property>fcs/stabilizer-2p-factor</property>
                <sum>
                    <product>
                        <value>-10</value>
                        <property>aero/coefficients/CdDS1</property>
                    </product>
                    <product>
                        <sum>
                            <value>10</value>
                            <property>fcs/elevator-pos-deg</property>
                        </sum>
                        <property>aero/coefficients/CdDS2</property>
                    </product>
                </sum>
            </product>
        </function>
        <function name="aero/coefficients/CdDasym">
            <description>Delta Cl due to wing asymmetry</description>
            <product>
                <property>systems/flyt/wing-asymmetry</property> <!-- sqr to remove the sign (value either -1, 0 or 1 -->
                <property>systems/flyt/wing-asymmetry</property>
                <property>aero/coefficients/CdBAS</property>
                <value>-0.3</value>
            </product>
        </function>

        <function name="aero/coefficients/Cd">
                <sum>
                    <property>aero/coefficients/CdMach</property>
                    <property>aero/coefficients/CdBAS</property>
                    <property>aero/coefficients/DCdDS1</property>
                    <property>aero/coefficients/DCdDS2</property>
                    <property>aero/coefficients/CdUC</property>
                    <property>aero/coefficients/CdDFM</property>
                    <property>aero/coefficients/CdDAFM</property>
                    <property>aero/coefficients/CdDSLM</property>
                    <property>aero/coefficients/CdDBRK</property>
                    <property>aero/coefficients/CdTNK</property>
                    <property>aero/coefficients/CdDSp</property>
                    <property>aero/coefficients/CdDasym</property>
                </sum>
        </function>


        <function name="aero/coefficients/CyBAS">
            <description>CyBAS</description>
                <table>
                    <independentVar lookup="row">aero/alpha-deg</independentVar>
                    <independentVar lookup="column">aero/beta-deg</independentVar>
                    <tableData>
                                -20      -15      -10       -5        0        5       10       15       20
                       -20  0.20490  0.15870  0.10830  0.05500  0.00000 -0.05500 -0.10830 -0.15870 -0.20490
                       -11  0.20490  0.15870  0.10830  0.05500  0.00000 -0.05500 -0.10830 -0.15870 -0.20490
                       -10  0.28855  0.20370  0.14100  0.06940  0.00000 -0.06940 -0.14100 -0.20370 -0.28855
                         0  0.29415  0.21760  0.14620  0.06380  0.00000 -0.06380 -0.14620 -0.21760 -0.29415
                         5  0.30055  0.22180  0.14645  0.07015  0.00000 -0.07015 -0.14645 -0.22180 -0.30055
                        10  0.28855  0.20370  0.14100  0.06940  0.00000 -0.06940 -0.14100 -0.20370 -0.28855
                        15  0.24630  0.16780  0.11240  0.05945  0.00000 -0.05945 -0.11240 -0.16780 -0.24630
                        20  0.20490  0.15870  0.10830  0.05500  0.00000 -0.05500 -0.10830 -0.15870 -0.20490
                        25  0.18955  0.15275  0.11775  0.06045  0.00000 -0.06045 -0.11775 -0.15275 -0.18955
                        30  0.21465  0.17815  0.13310  0.07580  0.00000 -0.07580 -0.13310 -0.17815 -0.21465
                        35  0.23860  0.18665  0.14605  0.07135  0.00000 -0.07135 -0.14605 -0.18665 -0.23860
                        40  0.25660  0.20260  0.14505  0.07680  0.00000 -0.07680 -0.14505 -0.20260 -0.25660
                        45  0.26760  0.22235  0.16075  0.09275  0.00000 -0.09275 -0.16075 -0.22235 -0.26760
                        50  0.27370  0.22075  0.15150  0.07865  0.00000 -0.07865 -0.15150 -0.22075 -0.27370
                        55  0.24915  0.19150  0.13150  0.07155  0.00000 -0.07155 -0.13150 -0.19150 -0.24915
                    </tableData>
                </table>
        </function>
        <function name="aero/coefficients/CyP">
            <description>CyP</description>
            <product>
                <property>aero/bi2vel</property>
                <property>velocities/p-aero-rad_sec</property>
                <table>
                    <independentVar lookup="row">aero/alpha-deg</independentVar>
                    <tableData>
                       -20 -0.1596
                       -15 -0.1596
                       -10 -0.1250
                        -5  0.0000
                         0  0.1490
                         5  0.2686
                        10  0.1250
                        15  0.1596
                        20  0.3264
                        25  0.3800
                        30  0.6799
                        35  0.5603
                        40  0.9320
                        45  0.1392
                        50 -0.6960
                        55 -0.3818
                    </tableData>
                </table>
            </product>
        </function>

        <function name="aero/coefficients/CyR">
            <description>CyR</description>
            <product>
                <property>aero/bi2vel</property>
                <property>velocities/r-aero-rad_sec</property>
                <table>
                    <independentVar lookup="row">aero/alpha-deg</independentVar>
                    <tableData>
                       -25  0.8200
                       -20  0.8200
                       -15  0.8000
                       -10  0.6000
                        -5  0.5684
                         0  0.5684
                         5  0.5356
                        10  0.4996
                        15  0.6782
                        20  0.5295
                        25  0.2712
                        30 -0.7343
                        35 -1.3173
                        40 -2.0531
                        45 -0.7688
                        50 -0.2885
                        55 -0.1206
                    </tableData>
                </table>
            </product>
        </function>
        <function name="aero/coefficients/CyDA">
            <description>CyDA</description>
            <product>
                <property>fcs/left-aileron-pos-deg</property>
                <property>aero/cadc-control-effectivity-factor</property>
                <table>
                    <independentVar lookup="row">aero/alpha-deg</independentVar>
                    <tableData>
                        -5 -0.00095
                         0 -0.00095
                         5 -0.00100
                        10 -0.00085
                        15 -0.00065
                        20 -0.00030
                        25  0.00010
                        30  0.00060
                        35  0.00160
                        40  0.00240
                        45  0.00250
                        50  0.00255
                        55  0.00265
                    </tableData>
                </table>
            </product>
        </function>
        <function name="aero/coefficients/CyDR">
            <description>CyDR</description>
            <product>
                <property>fcs/rudder-pos-deg</property>
                <property>aero/cadc-control-effectivity-factor</property>
                <table>
                    <independentVar lookup="row">aero/alpha-deg</independentVar>
                    <independentVar lookup="column">aero/beta-deg</independentVar>
                    <tableData>
                                  -20        -15        -10         -5          0          5         10         15         20
                       -10    0.00450    0.00485    0.00520    0.00530    0.00530    0.00530    0.00520    0.00485    0.00430
                        -5    0.00450    0.00485    0.00520    0.00530    0.00530    0.00530    0.00520    0.00485    0.00430
                         0    0.00480    0.00520    0.00560    0.00560    0.00560    0.00560    0.00560    0.00520    0.00480
                         5    0.00450    0.00485    0.00520    0.00530    0.00530    0.00530    0.00520    0.00485    0.00430
                        10    0.00430    0.00450    0.00480    0.00495    0.00510    0.00500    0.00480    0.00450    0.00420
                        15    0.00370    0.00400    0.00430    0.00450    0.00470    0.00450    0.00430    0.00400    0.00370
                        20    0.00330    0.00355    0.00380    0.00400    0.00420    0.00400    0.00380    0.00355    0.00330
                        25    0.00280    0.00305    0.00330    0.00350    0.00370    0.00350    0.00330    0.00305    0.00280
                        30    0.00230    0.00250    0.00270    0.00289    0.00310    0.00290    0.00270    0.00250    0.00230
                        35    0.00160    0.00180    0.00200    0.00220    0.00240    0.00220    0.00200    0.00180    0.00160
                        40    0.00100    0.00110    0.00120    0.00135    0.00150    0.00135    0.00120    0.00110    0.00100
                        45    0.00030    0.00035    0.00040    0.00045    0.00050    0.00045    0.00040    0.00035    0.00030
                        50    0.00000    0.00000    0.00000    0.00000    0.00000    0.00000    0.00000    0.00000    0.00000
                        55    0.00000    0.00000    0.00000    0.00000    0.00000    0.00000    0.00000    0.00000    0.00000
                    </tableData>
                </table>
            </product>
        </function>
        <!--
    <function name="aero/coefficients/CyDSP">
    <description>Yaw increment due to spoilers</description>
    <product>
          <sum>
            <property>fcs/spoiler-left-pos</property>
            <property>fcs/spoiler-right-pos</property>
          </sum>
          <table>
            <independentVar lookup="row">aero/alpha-deg</independentVar>
            <tableData>
                 0    0
                 5    0
                10    0
                15    0
                20    0
                25    0
                30    0
                35    0
                40    0
                45    0
                50    0
                55    0
            </tableData>
          </table>
       </product>
    </function>
-->
        <function name="aero/coefficients/Cy">
            <sum>
                <property>aero/coefficients/CyBAS</property>
                <property>aero/coefficients/CyP</property>
                <property>aero/coefficients/CyR</property>
                <property>aero/coefficients/CyDA</property>
                <property>aero/coefficients/CyDR</property>
            </sum>
        </function>
        <function name="aero/coefficients/CLBAS">
            <description>CLBAS</description>
                <table>
                    <independentVar lookup="row">aero/alpha-deg</independentVar>
                    <independentVar lookup="column">aero/beta-deg</independentVar>
                    <tableData>
                                   -20         -15         -10          -5           0           5          10          15          20
                       -45  0.06100000  0.04600000  0.03050000  0.01500000  0.00000000 -0.01500000 -0.03050000 -0.04600000 -0.06100000
                       -35  0.04750000  0.03600000  0.02450000  0.01250000  0.00000000 -0.01250000 -0.02450000 -0.03600000 -0.04750000
                       -30  0.04900000  0.03766667  0.02533333  0.01366667  0.00000000 -0.01366667 -0.02533333 -0.03766667 -0.04900000
                       -20  0.05500000  0.04100000  0.02700000  0.01600000  0.00000000 -0.01600000 -0.02700000 -0.04100000 -0.05500000
                       -15  0.04700000  0.03650000  0.02650000  0.01350000  0.00000000 -0.01350000 -0.02650000 -0.03650000 -0.04700000
                       -10  0.03100000  0.02600000  0.02100000  0.01050000  0.00000000 -0.01050000 -0.02100000 -0.02600000 -0.03100000
                        -5  0.02500000  0.01700000  0.01350000  0.00650000  0.00000000 -0.00650000 -0.01350000 -0.01700000 -0.02050000
                         0  0.00950000  0.00800000  0.00600000  0.00300000  0.00000000 -0.00300000 -0.00600000 -0.00800000 -0.00950000
                         5  0.02500000  0.01700000  0.01350000  0.00650000  0.00000000 -0.00650000 -0.01350000 -0.01700000 -0.02050000
                        10  0.03100000  0.02600000  0.02100000  0.01050000  0.00000000 -0.01050000 -0.02100000 -0.02600000 -0.03100000
                        15  0.04700000  0.03650000  0.02650000  0.01350000  0.00000000 -0.01350000 -0.02650000 -0.03650000 -0.04700000
                        20  0.05500000  0.04100000  0.02700000  0.01600000  0.00000000 -0.01600000 -0.02700000 -0.04100000 -0.05500000
                        25  0.05250000  0.03933333  0.02616667  0.01483333  0.00000000 -0.01483333 -0.02616667 -0.03933333 -0.05250000
                        30  0.04900000  0.03766667  0.02533333  0.01366667  0.00000000 -0.01366667 -0.02533333 -0.03766667 -0.04900000
                        35  0.04750000  0.03600000  0.02450000  0.01250000  0.00000000 -0.01250000 -0.02450000 -0.03600000 -0.04750000
                        40  0.05200000  0.03900000  0.02550000  0.01300000  0.00000000 -0.01300000 -0.02550000 -0.03900000 -0.05200000
                        45  0.06100000  0.04600000  0.03050000  0.01500000  0.00000000 -0.01500000 -0.03050000 -0.04600000 -0.06100000
                        50  0.06450000  0.04850000  0.03300000  0.01650000  0.00000000 -0.01650000 -0.03300000 -0.04850000 -0.06450000
                        55  0.06500000  0.04950000  0.03350000  0.01650000  0.00000000 -0.01650000 -0.03350000 -0.04950000 -0.06500000
                    </tableData>
                </table>
        </function>
        <function name="aero/coefficients/CLP">
            <description>CLP</description>
            <product>
                <property>aero/bi2vel</property>
                <property>velocities/p-aero-rad_sec</property>
                <table>
                    <independentVar lookup="row">aero/alpha-deg</independentVar>
                    <tableData>
                       -10 -0.4100
                        -5 -0.4057
                         0 -0.4016
                         5 -0.4057
                        10 -0.2000
                        15 -0.0800
                        25 -0.2000
                        30 -0.2700
                        35 -0.2283
                        40 -0.1863
                        45 -0.1104
                        50 -0.0361
                        55 -0.0891
                    </tableData>
                </table>
            </product>
        </function>
        <function name="aero/coefficients/CLR">
            <description>CLR</description>
            <product>
                <property>aero/bi2vel</property>
                <property>velocities/r-aero-rad_sec</property>
                <table>
                    <independentVar lookup="row">aero/alpha-deg</independentVar>
                    <tableData>
                        -5 -0.0522
                         0  0.0080
                         5  0.0522
                        10  0.0838
                        15  0.0789
                        20  0.2310
                        25  0.2384
                        30  0.3200
                        35  0.3200
                        40  0.2545
                        45  0.0725
                        50 -0.0434
                        55 -0.5880
                    </tableData>
                </table>
            </product>
        </function>
        <function name="aero/coefficients/CLDA">
            <description>CLDA</description>
            <product>
                <property>fcs/left-aileron-pos-deg</property>
                <property>aero/cadc-control-effectivity-factor</property>
                <table>
                    <independentVar lookup="row">aero/alpha-deg</independentVar>
                    <independentVar lookup="column">aero/beta-deg</independentVar>
                    <tableData>
                                  -20        -15        -10         -5          0          5         10         15         20
                         0  0.0007900  0.0007900  0.0007900  0.0007900  0.0007900  0.0007900  0.0007900  0.0007900  0.0007900
                         5  0.0007900  0.0007900  0.0007900  0.0007900  0.0007900  0.0007900  0.0007900  0.0007900  0.0007900
                        10  0.0007900  0.0007900  0.0007900  0.0007900  0.0007900  0.0007900  0.0007900  0.0007900  0.0007900
                        15  0.0006200  0.0006600  0.0007125  0.0007775  0.0008050  0.0007775  0.0007125  0.0006600  0.0006200
                        20  0.0004825  0.0005750  0.0006600  0.0007475  0.0007550  0.0007475  0.0006600  0.0005750  0.0004825
                        25  0.0003100  0.0004650  0.0005300  0.0006050  0.0006450  0.0006050  0.0005300  0.0004650  0.0003100
                        30  0.0002350  0.0003475  0.0003900  0.0004400  0.0004850  0.0004400  0.0003900  0.0003475  0.0002300
                        35  0.0001675  0.0002200  0.0002175  0.0002150  0.0002350  0.0002150  0.0002175  0.0002200  0.0001675
                        40  0.0000925  0.0001425  0.0001225  0.0001400  0.0001200  0.0001400  0.0001225  0.0001425  0.0000925
                        45  0.0001725  0.0001375  0.0001150  0.0001175  0.0001400  0.0001175  0.0001150  0.0001375  0.0001725
                        50  0.0001450  0.0001375  0.0001825  0.0002425  0.0002200  0.0002425  0.0001825  0.0001375  0.0001450
                        55  0.0001750  0.0002100  0.0002775  0.0003300  0.0003500  0.0003300  0.0002775  0.0002100  0.0001750
                    </tableData>
                </table>
            </product>
        </function>
        <function name="aero/coefficients/CLDasym">
            <description>Delta CL due to wing asymmetry</description>
            <product>
                <property>systems/flyt/wing-asymmetry</property>
                <property>aero/coefficients/ClSweepFactor</property>
                <value>0.076</value>
            </product>
        </function>
    <function name="aero/coefficients/CSPL">
    <description>SPOILER EFFECTIVITY DUE TO WINGSWEEP</description>
          <table>
            <independentVar lookup="row">fcs/wing-sweep-pos-deg</independentVar>
            <tableData>
                25      1
                58      0
            </tableData>
          </table>
    </function>

        <!-- AFWAL-TR-80-3141 part III: p55; no effect from spoilers above 10degrees alpha
             2018-07-01 : AFWAL-TR-80-3141 cannot be correct as DLC relies on spoilers and it would be fairly useless at
                          onspeed (14.5 to 15.5) so even allowing for the offset between indicated AoA and airframe
                          AoA there must be more to the story.
                          The Tornado model that I made using VSPAERO shows 70% reduction of spoiler roll from 10 to 15 degrees
                          so I'm using that as a guide.
             -->
    <function name="aero/coefficients/CLDSpL">
    <description>ROLLING MOMENT DUE TO LEFT SPOILER DEFLECTION</description>
    <product>
          <property>fcs/spoiler-left-pos-deg</property>
          <property>aero/coefficients/CSPL</property>
          <table>
            <independentVar lookup="row">aero/alpha-deg</independentVar>
            <tableData>
               -10 -0.00131175
                -5 -0.00125725
                -2 -0.00121850
                 0 -0.00119725
                 1 -0.00119250
                 2 -0.00115400
                 3 -0.00109400
                 4 -0.00102400
                 5 -0.00091925
                 6 -0.00080825
                 7 -0.00068950
                 8 -0.00056600
                 9 -0.00043675
                10 -0.00030625
                11 -0.00020750
                12 -0.00011625
                13 -0.00006325
                14 -0.00006650
                15 -0.00005225
                16 -0.00004325
                17 -0.00005200
                18 -0.00004525
                19 -0.00005400
                20 -0.00004300
                22 -0.00006025
                24 -0.00005425
                25 -0.00005250
                28 -0.00004750
                30 -0.00003825
                35 -0.00003125
                45 -0.00003200
                50 -0.00002025
                55  0.00011625
                60 -0.00001450
            </tableData>
          </table>
       </product>
    </function>
    <function name="aero/coefficients/CLDSpR">
    <description>ROLLING MOMENT DUE TO RIGHT SPOILER DEFLECTION</description>
    <product>
          <property>fcs/spoiler-right-pos-deg</property>
          <property>aero/coefficients/CSPL</property>
          <table>
            <independentVar lookup="row">aero/alpha-deg</independentVar>
            <tableData>
               -10  0.00131175
                -5  0.00125725
                -2  0.00121850
                 0  0.00119875
                 1  0.00119250
                 2  0.00115400
                 3  0.00109400
                 4  0.00102400
                 5  0.00091925
                 6  0.00080825
                 7  0.00068900
                 8  0.00056600
                 9  0.00043675
                10  0.00030625
                11  0.00020750
                12  0.00011675
                13  0.00006325
                14  0.00006650
                15  0.00005125
                16  0.00004575
                17  0.00005200
                18  0.00004425
                19  0.00005300
                20  0.00005950
                22  0.00006025
                24  0.00005425
                25  0.00005250
                28  0.00004750
                30  0.00003825
                35  0.00003125
                45  0.00003200
                50  0.00002025
                55 -0.00011625
                60  0.00001450
            </tableData>
          </table>
       </product>
    </function>

        <function name="aero/coefficients/CLDR">
            <description>CLDR</description>
            <product>
                <property>fcs/rudder-pos-deg</property>
                <property>aero/cadc-control-effectivity-factor</property>
                <table>
                    <independentVar lookup="row">aero/alpha-deg</independentVar>
                    <independentVar lookup="column">aero/beta-deg</independentVar>
                    <tableData>
                                   -20         -15         -10          -5           0           5          10          15          20
                         0    0.000096    0.000104    0.000112    0.000112    0.000112    0.000112    0.000112    0.000104    0.000096
                         5    0.000090    0.000097    0.000104    0.000104    0.000108    0.000106    0.000104    0.000097    0.000090
                        10    0.000084    0.000090    0.000096    0.000099    0.000102    0.000099    0.000096    0.000090    0.000084
                        15    0.000074    0.000080    0.000086    0.000090    0.000094    0.000090    0.000086    0.000080    0.000074
                        20    0.000066    0.000071    0.000076    0.000080    0.000084    0.000080    0.000076    0.000071    0.000066
                        25    0.000056    0.000061    0.000066    0.000070    0.000074    0.000070    0.000066    0.000061    0.000056
                        30    0.000045    0.000050    0.000054    0.000058    0.000062    0.000058    0.000054    0.000050    0.000046
                        35    0.000032    0.000036    0.000040    0.000044    0.000048    0.000044    0.000040    0.000036    0.000032
                        40    0.000020    0.000022    0.000024    0.000027    0.000030    0.000027    0.000024    0.000022    0.000020
                        45    0.000006    0.000007    0.000008    0.000009    0.000010    0.000009    0.000008    0.000007    0.000006
                        50    0.000000    0.000000    0.000000    0.000000    0.000000    0.000000    0.000000    0.000000    0.000000
                        55    0.000000    0.000000    0.000000    0.000000    0.000000    0.000000    0.000000    0.000000    0.000000
                    </tableData>
                </table>
            </product>
        </function>

        <function name="aero/coefficients/CL">
            <sum>
                <property>aero/coefficients/CLBAS</property>
                <property>aero/coefficients/CLP</property>
                <property>aero/coefficients/CLR</property>
                <property>aero/coefficients/CLDA</property>
                <property>aero/coefficients/CLDR</property>
                <property>aero/coefficients/CLDSpL</property>
                <property>aero/coefficients/CLDSpR</property>
                <property>aero/coefficients/CNDasym</property>
            </sum>
        </function>

        <function name="aero/coefficients/CMBAS">
            <description>CMBAS</description>
                <table>
                    <independentVar lookup="row">aero/alpha-deg</independentVar>
                    <independentVar lookup="column">aero/beta-deg</independentVar>
                    <tableData>
                                  -20        -15        -10         -5          0          5         10         15         20
                       -15  0.2706090  0.2341000  0.2080220  0.1923750  0.1871590  0.1923750  0.2080220  0.2341000  0.2706090
                       -10  0.1647160  0.1532750  0.1451030  0.1402000  0.1385650  0.1402000  0.1451030  0.1532750  0.1647160
                        -5  0.0952120  0.0990630  0.1018120  0.1034630  0.1040120  0.1034630  0.1018120  0.0990630  0.0952120
                         0  0.0605219  0.0654000  0.0688844  0.0709750  0.0716718  0.0709750  0.0688844  0.0654000  0.0605219
                         5  0.0258313  0.0317375  0.0359563  0.0384875  0.0393313  0.0384875  0.0359563  0.0317375  0.0258313
                        10 -0.0436719 -0.0224750 -0.0073344  0.0017500  0.0047781  0.0017500 -0.0073344 -0.0224750 -0.0436719
                        15 -0.1495656 -0.1033000 -0.0702531 -0.0504250 -0.0438156 -0.0504250 -0.0702531 -0.1033000 -0.1495656
                        20 -0.1772469 -0.1244188 -0.0866844 -0.0640438 -0.0564969 -0.0640438 -0.0866844 -0.1244188 -0.1772469
                        25 -0.2248094 -0.1879937 -0.1616969 -0.1459187 -0.1406594 -0.1459187 -0.1616969 -0.1879937 -0.2248094
                        30 -0.2387250 -0.2321625 -0.2274750 -0.2246625 -0.2237250 -0.2246625 -0.2274750 -0.2321625 -0.2387250
                        35 -0.3000000 -0.3000000 -0.3000000 -0.3000000 -0.3000000 -0.3000000 -0.3000000 -0.3000000 -0.3000000
                        40 -0.3490531 -0.3721313 -0.3886156 -0.3985063 -0.4018031 -0.3985063 -0.3886156 -0.3721313 -0.3490531
                        45 -0.4248187 -0.4461250 -0.4613438 -0.4704750 -0.4735188 -0.4704750 -0.4613438 -0.4461250 -0.4248187
                        50 -0.4808313 -0.5169250 -0.5427063 -0.5581750 -0.5633313 -0.5581750 -0.5427063 -0.5169250 -0.4808313
                        55 -0.5400406 -0.5832000 -0.6140281 -0.6325250 -0.6386906 -0.6325250 -0.6140281 -0.5832000 -0.5400406
                    </tableData>
                </table>
        </function>

        <function name="aero/coefficients/CMDS1">
            <description>CMDS1</description>
            <product>
                <property>aero/cadc-control-effectivity-factor</property>
                <table>
                    <independentVar lookup="row">aero/alpha-deg</independentVar>
                    <tableData>
                       -55 -0.0120
                       -50 -0.0145
                       -45 -0.0145
                       -40 -0.0145
                       -35 -0.0145
                       -30 -0.0160
                       -25 -0.0160
                       -20 -0.0160
                       -15 -0.0155
                       -10 -0.0140
                        -5 -0.0115
                         0 -0.0090
                         5 -0.0115
                        10 -0.0140
                        15 -0.0155
                        20 -0.0160
                        25 -0.0160
                        30 -0.0160
                        35 -0.0145
                        40 -0.0145
                        45 -0.0145
                        50 -0.0145
                        55 -0.0120
                    </tableData>
                </table>
            </product>
        </function>

        <function name="aero/coefficients/CMDS2">
            <description>CMDS2</description>
            <product>
                <!-- stabilizer-1p will be 1 or -10 (-10 when applicable)
           the original equation was -10*CMDS1 +(stab-deg + 10) CMDS2
           -->
                <property>aero/cadc-control-effectivity-factor</property>
                <table>
                    <independentVar lookup="row">aero/alpha-deg</independentVar>
                    <tableData>
                       -55    0.0000
                       -50    0.0005
                       -45    0.0060
                       -40    0.0040
                       -35   -0.0010
                       -30   -0.0075
                       -25   -0.0133
                       -20   -0.0170
                       -15   -0.0190
                       -10   -0.0190
                        -5   -0.0185
                         0   -0.0195
                         5   -0.0185
                        10   -0.0190
                        15   -0.0190
                        20   -0.0170
                        25   -0.0133
                        30   -0.0075
                        35   -0.0010
                        40    0.0040
                        45    0.0060
                        50    0.0005
                        55    0.0000
                    </tableData>
                </table>
            </product>
        </function>

        <function name="aero/coefficients/DCMDS1">
            <description>DCMDS1</description>
            <product>
                <property>fcs/stabilizer-1p-factor</property>
                <property>aero/coefficients/CMDS1</property>
                <property>fcs/elevator-pos-deg</property>
            </product>
        </function>

        <function name="aero/coefficients/DCMDS2">
            <description>DCMDS2</description>
            <product>
                <property>fcs/stabilizer-2p-factor</property>
                <!-- stabilizer-1p will be 1 or -10 (-10 when applicable)
           the original equation was -10*CMDS1 +(stab-deg + 10) CMDS2
           -->
                <sum>
                    <product>
                        <value>-10</value>
                        <property>aero/coefficients/CMDS1</property>
                    </product>
                    <product>
                        <sum>
                            <value>10</value>
                            <property>fcs/elevator-pos-deg</property>
                        </sum>
                        <property>aero/coefficients/CMDS2</property>
                    </product>
                </sum>
            </product>
        </function>

        <function name="aero/coefficients/DCMAIM">
            <description>Pitch moment increment due to aim missiles</description>
            <product>
                <property>fcs/aim-fitted</property>
                <table>
                    <independentVar lookup="row">velocities/mach</independentVar>
                    <independentVar lookup="column">aero/alpha-deg</independentVar>
                    <tableData>
                               -6     -5     -4     -3     -2     -1      0      1      2      3      4      5      6      7      8      9     10     20
                      0.80 -0.015 -0.015 -0.015 -0.010 -0.005 -0.003 -0.002 -0.001  0.000  0.002  0.003  0.005  0.010  0.010  0.005  0.003  0.000  0.000
                      0.85 -0.033 -0.031 -0.030 -0.022 -0.010 -0.004 -0.003 -0.002  0.000  0.003  0.006  0.007  0.008  0.010  0.010  0.006  0.004  0.004
                      0.90 -0.032 -0.031 -0.030 -0.028 -0.020 -0.006 -0.002  0.000  0.002  0.004  0.007  0.007  0.006  0.016  0.012  0.012  0.012  0.012
                    </tableData>
                </table>
            </product>
        </function>
        <function name="aero/coefficients/DCMB0">
            <description>DCMB0</description>
                <table>
                    <independentVar lookup="row">aero/alpha-deg</independentVar>
                    <tableData>
                         0 -0.055
                         5 -0.055
                        10 -0.055
                        15 -0.055
                        20 -0.055
                        25 -0.055
                        30 -0.055
                        35 -0.055
                        40 -0.055
                        45 -0.055
                        50 -0.055
                        55 -0.055
                    </tableData>
                </table>
        </function>
        <function name="aero/coefficients/CMQ">
            <description>CMQ</description>
            <product>
                <property>aero/cbarq-2vo</property>
                <table>
                    <independentVar lookup="row">aero/alpha-deg</independentVar>
                    <tableData>
                       -20 -14.129
                        -5 -15.424
                         0 -15.424
                         5 -14.129
                        10 -17.967
                        15 -22.807
                        20 -21.078
                        25 -19.629
                        30 -15.185
                        35  -1.886
                        40  -7.707
                        45  -5.479
                        50 -13.113
                        55 -10.298
                    </tableData>
                </table>
            </product>
        </function>
        <function name="aero/coefficients/CMBRK">
            <description>CM increment due speedbrakes</description>
            <product>
                <property>fcs/speedbrake-pos-norm</property>
                <property>tuning/CMBRK</property>
                <table>
                    <independentVar lookup="row">aero/alpha-deg</independentVar>
                    <tableData>
                       -14    0.0000
                        -5    0.0219
                        -3    0.0000
                         0    0.0003
                         5    0.0000
                         8   -0.0180
                        12   -0.0220
                        14    0.0000
                    </tableData>
                </table>
            </product>
        </function>
        <function name="aero/coefficients/CMUC">
            <description>CM increment due to gear</description>
            <product>
                <property>gear/gear-pos-norm</property>
                <property>tuning/CMUC</property>
                <table>
                    <independentVar lookup="row">aero/alpha-deg</independentVar>
                    <tableData>
                       -10    0.0000
                        -4    0.0000
                         0   -0.0175
                         5   -0.0100
                        10   -0.0025
                        20    0.0000
                    </tableData>
                </table>
            </product>
        </function>
        <function name="aero/coefficients/CMDSp">
            <description>CM increment due to spoiler deflection</description>
            <product>
                <sum>
                    <property>fcs/spoiler-left-pos</property>
                    <property>fcs/spoiler-right-pos</property>
                </sum>
                <table>
                    <independentVar lookup="row">aero/alpha-deg</independentVar>
                    <tableData>
 <!-- based on 0.1 of 0aoa CMDS1 at 55deg deflection-->
                       -55    0.000000000
                       -50    0.000000000
                       -45    0.000000000
                       -40    0.000000000
                       -35    0.000000000
                       -30    0.000000000
                       -15    0.000000000
                         0   -0.000001636
                        16    0.000000000
                    </tableData>
                </table>
            </product>
        </function>
        <function name="aero/coefficients/CMDFM">
            <description>CM increment due to flap mean position</description>
            <product>
                <property>tuning/CMDFM</property>
                <property>fcs/flap-pos-deg</property>
                <table>
                    <independentVar lookup="row">aero/alpha-deg</independentVar>
                        <tableData>
                            -2 -0.00118
                             0 -0.00129
                             1 -0.00134
                             2 -0.00140
                             3 -0.00146
                             4 -0.00152
                             5 -0.00158
                             6 -0.00164
                             7 -0.00170
                             8 -0.00177
                             9 -0.00183
                            10 -0.00190
                            11 -0.00196
                            12 -0.00203
                            13 -0.00209
                            14 -0.00216
                            15 -0.00222
                            16 -0.00229
                            17 -0.00235
                            18 -0.00242
                            19 -0.00248
                            20 -0.00254
                            22 -0.00267
                            24 -0.00278
                            25 -0.00284
                            28 -0.00300
                            30 -0.00309
                            35 -0.00329
                            45 -0.00346
                            50 -0.00345
                            55 -0.00338
                            60 -0.00328
                            65 -0.00318
                        </tableData>
                    </table>
            </product>
        </function>

        <function name="aero/coefficients/CMDAFM">
            <description>CM increment due to flap mean position</description>
            <product>
                <property>tuning/CMADFM</property>
                <property>fcs/aux-flap-pos-deg</property>
                <table>
                    <independentVar lookup="row">aero/alpha-deg</independentVar>
                    <tableData>
                        -2 -0.00085
                         0 -0.00093
                         1 -0.00097
                         2 -0.00102
                         3 -0.00108
                         4 -0.00113
                         5 -0.00119
                         6 -0.00124
                         7 -0.00130
                         8 -0.00136
                         9 -0.00142
                        10 -0.00149
                        11 -0.00155
                        12 -0.00161
                        13 -0.00167
                        14 -0.00173
                        15 -0.00179
                        16 -0.00185
                        17 -0.00191
                        18 -0.00197
                        19 -0.00202
                        20 -0.00208
                        22 -0.00218
                        24 -0.00227
                        25 -0.00232
                        28 -0.00243
                        30 -0.00250
                        35 -0.00262
                        45 -0.00269
                        50 -0.00267
                        55 -0.00266
                        60 -0.00269
                        65 -0.00266
                    </tableData>
                </table>
            </product>
        </function>
        <function name="aero/coefficients/CM">
            <sum>
                <property>aero/coefficients/CMBAS</property>
                <property>aero/coefficients/DCMB0</property>
                <property>aero/coefficients/CMQ</property>
                <property>aero/coefficients/DCMDS1</property>
                <property>aero/coefficients/DCMDS2</property>
                <property>aero/coefficients/CMUC</property>
                <property>aero/coefficients/CMDFM</property>
                <property>aero/coefficients/CMDAFM</property>
                <property>aero/coefficients/CMBRK</property>
                <!--<property>aero/coefficients/CMDSLM</property> Slats are included in flaps (DFM) -->
                <property>aero/coefficients/CMDSp</property>
            </sum>
        </function>

        <function name="aero/coefficients/CNBAS">
            <description>CNBAS</description>
                <table>
                    <independentVar lookup="row">aero/alpha-deg</independentVar>
                    <independentVar lookup="column">aero/beta-deg</independentVar>
                    <tableData>
                               -20     -15     -10      -5       0       5      10      15      20
                       -10 -0.0390 -0.0300 -0.0215 -0.0100  0.0000  0.0100  0.0215  0.0300  0.0390
                        -5 -0.0390 -0.0300 -0.0215 -0.0100  0.0000  0.0100  0.0215  0.0300  0.0390
                         0 -0.0400 -0.0305 -0.0215 -0.0100  0.0000  0.0100  0.0215  0.0305  0.0400
                         5 -0.0390 -0.0300 -0.0215 -0.0100  0.0000  0.0100  0.0215  0.0300  0.0390
                        10 -0.0360 -0.0257 -0.0190 -0.0095  0.0000  0.0095  0.0190  0.0275  0.0360
                        15 -0.0085 -0.0075 -0.0060 -0.0030  0.0000  0.0030  0.0060  0.0075  0.0085
                        20  0.0100  0.0070  0.0040  0.0020  0.0000 -0.0020 -0.0040 -0.0070 -0.0100
                        25  0.0255  0.0170  0.0090  0.0045  0.0000 -0.0045 -0.0090 -0.0170 -0.0255
                        30  0.0380  0.0280  0.0180  0.0110  0.0000 -0.0110 -0.0180 -0.0280 -0.0380
                        35  0.0405  0.0315  0.0230  0.0145  0.0000 -0.0145 -0.0230 -0.0315 -0.0405
                        40  0.0450  0.0295  0.0190  0.0085  0.0000 -0.0085 -0.0190 -0.0295 -0.0405
                        45  0.0415  0.0315  0.0215  0.0130  0.0000 -0.0130 -0.0215 -0.0315 -0.0415
                        50  0.0360  0.0280  0.0205  0.0145  0.0000 -0.0145 -0.0205 -0.0280 -0.0360
                        55  0.0260  0.0220  0.0175  0.0145  0.0000 -0.0145 -0.0175 -0.0220 -0.0260
                    </tableData>
                </table>
        </function>
        <function name="aero/coefficients/CNDasym">
            <description>Delta CN due to wing asymmetry</description>
            <product>
                <property>systems/flyt/wing-asymmetry</property>
                <value>0.01293512</value>
            </product>
        </function>
        <function name="aero/coefficients/DCNDS">
            <description>DCNDS</description>
            <product>
                <property>fcs/elevator-pos-deg</property>
                <property>aero/cadc-control-effectivity-factor</property>
                <property>aero/cn-sin-82beta</property>
                <table>
                    <independentVar lookup="row">aero/alpha-deg</independentVar>
                    <tableData>
                        -5  0.000117
                         0  0.000117
                         5  0.000117
                        10  0.000150
                        15  0.000183
                        20  0.000217
                        25  0.000250
                        30  0.000267
                        35  0.000133
                        40  0.000083
                        45  0.000050
                        50  0.000050
                        55  0.000050
                    </tableData>
                </table>
            </product>
        </function>
        <function name="aero/coefficients/CNP">
            <description>CNP, AFWAL, Revised TM-81833 Fig37.</description>
            <product>
                <property>aero/bi2vel</property>
                <property>velocities/p-aero-rad_sec</property>
                <table>
                    <independentVar lookup="row">aero/alpha-deg</independentVar>
                    <tableData>
                       -10  0.0100
                        -5 -0.0147
                         0 -0.0333
                         5 -0.0947
                        10 -0.1068
                        15 -0.1189
                        20 -0.1310
                        25 -0.0800
                        30 -0.0116
                        35  0.1421
                        40  0.1007
                        45 -0.0298
                        50 -0.0958
                        55 -0.0134
                    </tableData>
                </table>
            </product>
        </function>
        <function name="aero/coefficients/CNR">
            <description>CNR</description>
            <product>
                <property>aero/bi2vel</property>
                <property>velocities/r-aero-rad_sec</property>
                <table>
                    <independentVar lookup="row">aero/alpha-deg</independentVar>
                    <tableData>
                        -5 -0.1154
                         0 -0.1154
                         5 -0.1256
                        10 -0.1380
                        15 -0.2048
                        20 -0.1897
                        25 -0.1918
                        30 -0.1972
                        35 -0.2911
                        40 -0.1449
                        45 -0.0458
                        50  0.0455
                        55 -0.0441
                    </tableData>
                </table>
            </product>
        </function>
        <function name="aero/coefficients/CNDA">
            <description>CNDA</description>
            <product>
                <property>fcs/left-aileron-pos-deg</property>
                <property>aero/cadc-control-effectivity-factor</property>
                <table>
                    <independentVar lookup="row">aero/alpha-deg</independentVar>
                    <tableData>
                         0  0.000250
                         5  0.000250
                        10  0.000175
                        15  0.000075
                        20 -0.000050
                        25 -0.000225
                        30 -0.000375
                        35 -0.000525
                        40 -0.000700
                        45 -0.000825
                        50 -0.000850
                        55 -0.000925
                    </tableData>
                </table>
            </product>
        </function>
        <function name="aero/coefficients/CNDSPl">

            <description>Yaw momement increment due to left spoiler deflection</description>
            <product>
          <property>aero/coefficients/CSPL</property>
                <table>
                    <independentVar lookup="column">aero/alpha-deg</independentVar>
                    <independentVar lookup="row">fcs/spoiler-left-pos-deg</independentVar>
                    <tableData>
                                    0          4          8         12         16         20         24
                        -5  0.0000435 -0.0003724  0.0002748 -0.0006214 -0.0002597 -0.0001990 -0.0003394
                         0 -0.0010217  0.0004627  0.0017861  0.0024511  0.0015048  0.0019894  0.0040507
                         5 -0.0029750 -0.0015151  0.0008349  0.0027821  0.0035767  0.0030505  0.0069730
                        10 -0.0040257 -0.0025617 -0.0000030  0.0021841  0.0043745  0.0044022  0.0078778
                        15 -0.0047939 -0.0034940 -0.0005751  0.0015169  0.0037353  0.0056322  0.0082329
                        20 -0.0055190 -0.0040866 -0.0010426  0.0009102  0.0032554  0.0064301  0.0083826
                        25 -0.0062165 -0.0045774 -0.0018249  0.0003840  0.0028812  0.0067601  0.0084904
                        30 -0.0069788 -0.0050151 -0.0026071  0.0000682  0.0026544  0.0066646  0.0084638
                        35 -0.0077267 -0.0054449 -0.0031481 -0.0002554  0.0022934  0.0063458  0.0084329
                        40 -0.0085111 -0.0058333 -0.0036291 -0.0005837  0.0019324  0.0059758  0.0084019
                        45 -0.0093488 -0.0062216 -0.0039968 -0.0010755  0.0015714  0.0055452  0.0083385
                        50 -0.0101752 -0.0066099 -0.0043645 -0.0015717  0.0012104  0.0050452  0.0082659
                        55 -0.0111468 -0.0069983 -0.0047322 -0.0020680  0.0008494  0.0044779  0.0081933
                    </tableData>
                </table>
            </product>
        </function>
        <function name="aero/coefficients/CNDSPr">

            <description>Yaw momement increment due to right spoiler deflection</description>
            <product>
           <property>aero/coefficients/CSPL</property>
               <table>
                    <independentVar lookup="column">aero/alpha-deg</independentVar>
                    <independentVar lookup="row">fcs/spoiler-right-pos-deg</independentVar>
                    <tableData>
                                    0          4          8         12         16         20         24
                        -5 -0.0000435  0.0003724 -0.0002748  0.0006214  0.0002597  0.0001990  0.0003394
                         0  0.0010217 -0.0004627 -0.0017861 -0.0024511 -0.0015048 -0.0019894 -0.0040507
                         5  0.0029750  0.0015151 -0.0008349 -0.0027821 -0.0035767 -0.0030505 -0.0069730
                        10  0.0040257  0.0025617  0.0000030 -0.0021841 -0.0043745 -0.0044022 -0.0078778
                        15  0.0047939  0.0034940  0.0005751 -0.0015169 -0.0037353 -0.0056322 -0.0082329
                        20  0.0055190  0.0040866  0.0010426 -0.0009102 -0.0032554 -0.0064301 -0.0083826
                        25  0.0062165  0.0045774  0.0018249 -0.0003840 -0.0028812 -0.0067601 -0.0084904
                        30  0.0069788  0.0050151  0.0026071 -0.0000682 -0.0026544 -0.0066646 -0.0084638
                        35  0.0077267  0.0054449  0.0031481  0.0002554 -0.0022934 -0.0063458 -0.0084329
                        40  0.0085111  0.0058333  0.0036291  0.0005837 -0.0019324 -0.0059758 -0.0084019
                        45  0.0093488  0.0062216  0.0039968  0.0010755 -0.0015714 -0.0055452 -0.0083385
                        50  0.0101752  0.0066099  0.0043645  0.0015717 -0.0012104 -0.0050452 -0.0082659
                        55  0.0111468  0.0069983  0.0047322  0.0020680 -0.0008494 -0.0044779 -0.0081933
                    </tableData>
                </table>
            </product>
        </function>

        <function name="aero/coefficients/CNDR">
            <description>CNDR</description>
            <product>
                <property>fcs/rudder-pos-deg</property>
                <property>aero/cadc-control-effectivity-factor</property>
                <table>
                    <independentVar lookup="row">aero/alpha-deg</independentVar>
                    <independentVar lookup="column">aero/beta-deg</independentVar>
                    <tableData>
                                  -20        -15        -10         -5          0          5         10         15         20
                        -5   -0.00103   -0.00115   -0.00127   -0.00142   -0.00158   -0.00142   -0.00127   -0.00115   -0.00103
                         0   -0.00103   -0.00115   -0.00127   -0.00142   -0.00158   -0.00142   -0.00127   -0.00115   -0.00103
                         5   -0.00104   -0.00118   -0.00130   -0.00140   -0.00150   -0.00140   -0.00130   -0.00118   -0.00107
                        10   -0.00102   -0.00114   -0.00127   -0.00135   -0.00144   -0.00135   -0.00127   -0.00114   -0.00102
                        15   -0.00085   -0.00102   -0.00120   -0.00130   -0.00140   -0.00130   -0.00120   -0.00102   -0.00085
                        20   -0.00063   -0.00085   -0.00107   -0.00120   -0.00134   -0.00120   -0.00107   -0.00085   -0.00063
                        25   -0.00048   -0.00066   -0.00084   -0.00098   -0.00112   -0.00098   -0.00084   -0.00066   -0.00048
                        30   -0.00042   -0.00054   -0.00067   -0.00072   -0.00077   -0.00072   -0.00067   -0.00054   -0.00042
                        35   -0.00033   -0.00035   -0.00037   -0.00044   -0.00052   -0.00044   -0.00037   -0.00035   -0.00033
                        40   -0.00020   -0.00020   -0.00020   -0.00024   -0.00029   -0.00024   -0.00020   -0.00020   -0.00020
                        45   -0.00004   -0.00004   -0.00004   -0.00007   -0.00011   -0.00007   -0.00004   -0.00004   -0.00004
                        50    0.00000    0.00000    0.00000    0.00000    0.00000    0.00000    0.00000    0.00000    0.00000
                        55    0.00000    0.00000    0.00000    0.00000    0.00000    0.00000    0.00000    0.00000    0.00000
                    </tableData>
                </table>
            </product>
        </function>
        <function name="aero/coefficients/CN">
            <sum>
                <property>aero/coefficients/CNBAS</property>
                <property>aero/coefficients/DCNDS</property>
                <property>aero/coefficients/CNP</property>
                <property>aero/coefficients/CNR</property>
                <property>aero/coefficients/CNDA</property>
                <property>aero/coefficients/CNDR</property>
                <property>aero/coefficients/CNDSPl</property>
                <property>aero/coefficients/CNDSPr</property>
                <property>aero/coefficients/CNDasym</property>
            </sum>
        </function>
        <axis name="LIFT">
            <function name="aero/force/LIFT">
                <description>LIFT Force</description>
                <product>
                    <property>aero/qbar-psf</property>
                    <property>metrics/Sw-sqft</property>
                    <property>aero/coefficients/Cl</property>
                    <property>aero/coefficients/Cmach</property>
                    <property>aero/coefficients/ClSweepFactor</property>
                </product>
            </function>
        </axis>
        <axis name="DRAG">
            <function name="aero/force/DRAG">
                <description>DRAG Force</description>
                <product>
                    <property>aero/qbar-psf</property>
                    <property>metrics/Sw-sqft</property>
                    <property>aero/coefficients/Cd</property>
                    <property>aero/coefficients/ClSweepFactor</property>
                </product>
            </function>
        </axis>
        <axis name="SIDE">
            <function name="aero/force/SIDE">
                <description>SIDE Force</description>
                <product>
                    <property>aero/qbar-psf</property>
                    <property>metrics/Sw-sqft</property>
                    <property>aero/coefficients/Cy</property>
                </product>
            </function>
        </axis>
        <axis name="ROLL">
            <function name="aero/force/ROLL">
                <description>ROLL Moment</description>
                <product>
                    <property>aero/qbar-psf</property>
                    <property>metrics/Sw-sqft</property>
                    <property>metrics/bw-ft</property>
                    <property>aero/coefficients/CL</property>
                </product>
            </function>
        </axis>
        <axis name="PITCH">
            <function name="aero/force/PITCH">
                <description>PITCH Moment</description>
                <product>
                    <property>aero/qbar-psf</property>
                    <property>metrics/Sw-sqft</property>
                    <property>metrics/cbarw-ft</property>
                    <property>aero/coefficients/CM</property>
                    <property>aero/coefficients/Cmach</property>
                </product>
            </function>
        </axis>
        <axis name="YAW">
            <function name="aero/force/YAW">
                <description>YAW Moment</description>
                <product>
                    <property>aero/qbar-psf</property>
                    <property>metrics/Sw-sqft</property>
                    <property>metrics/bw-ft</property>
                    <property>aero/coefficients/CN</property>
                </product>
            </function>
        </axis>

    </aerodynamics>

    <external_reactions>
        <!-- wake turbulence from other AI plane -->
        <force name="ai-wake" frame="BODY">
            <location unit="M">
                <!-- Center of the main wing leading edge -->
                <x> 7.1</x>
                <y> 0.0 </y>
                <z> 0.523 </z>
            </location>
            <direction>
                <x>   0.0 </x>
                <y>   0.0 </y>
                <z>   0.0 </z>
            </direction>
        </force>
        <moment name="ai-wake" frame="BODY"/>

        <force name="catapult" frame="BODY">
            <location unit="IN">
                <x> 667 </x>
                <y>   0 </y>
                <z>   0 </z>
            </location>
            <direction>
                <x>   1 </x>
                <y>   0 </y>
                <z>   0 </z>
            </direction>
        </force>

        <force name="holdback" frame="BODY">
            <location unit="IN">
                <x> 667 </x>
                <y>   0 </y>
                <z>   0 </z>
            </location>
            <direction>
                <x>   -1.0 </x>
                <y>    0.0 </y>
                <z>    0.0 </z>
            </direction>
        </force>

        <force name="hook" frame="BODY">
            <location unit="IN">
                <x>  300 </x>
                <y>    0 </y>
                <z>    0 </z>
            </location>
            <direction>
                <x>  -0.9995 </x>
                <y>   0.0    </y>
                <z>   0.01 </z>
            </direction>
        </force>
        <force frame="BODY" name="F110-GE-400-1">
            <location unit="IN">
                <x> 667 </x>
                <y> -45 </y>
                <z> -7.66</z>
            </location>
            <direction>
                <x>  -0.9995 </x>
                <y>   0.0    </y>
                <z>   0.01 </z>
            </direction>
        </force>
        <force frame="BODY" name="F110-GE-400-2">
            <location unit="IN">
                <x> 667 </x>
                <y> 45 </y>
                <z> -7.66</z>
            </location>
            <direction>
                <x>  -0.9995 </x>
                <y>   0.0    </y>
                <z>   0.01 </z>
            </direction>
        </force>


    </external_reactions>
    <output name="c:/temp/JSBOut.csv" type="CSV" rate="10">
        <property caption="alpha-deg">aero/alpha-deg</property>
        <property caption="beta-deg">aero/beta-deg</property>
        <property caption="pb">velocities/p-aero-rad_sec</property>
        <property caption="qb">velocities/q-aero-rad_sec</property>
        <property caption="rb">velocities/r-aero-rad_sec</property>
        <property caption="sas-yaw">sas/yaw-output</property>
        <property caption="yawr0">sas/yaw-r-0</property>
        <property caption="yawr01">sas/yaw-r-01</property>
        <property caption="yawr1">sas/yaw-r-1</property>
        <property caption="qbar-psf">aero/qbar-psf</property>
        <property caption="phi-deg">attitude/phi-deg</property>
        <property caption="psi-deg">attitude/psi-deg</property>
        <property caption="theta-deg">attitude/theta-deg</property>
        <property caption="aileron-pos-deg">fcs/aileron-pos-deg</property>
        <property caption="differential-elevator-pos-deg">fcs/differential-elevator-pos-deg</property>
        <property caption="elevator-pos-deg">fcs/elevator-pos-deg</property>
        <property caption="rudder-pos-deg">fcs/rudder-pos-deg</property>
        <property caption="fbx-total-lbs">forces/fbx-total-lbs</property>
        <property caption="fby-total-lbs">forces/fby-total-lbs</property>
        <property caption="fbz-total-lbs">forces/fbz-total-lbs</property>
        <property caption="vt-fps">velocities/vt-fps</property>
    </output>
</fdm_config>
