<?xml version="1.0"?>
<?xml-stylesheet href="JSBSim.xsl" type="application/xml"?>
<fdm_config name="F14A" version="2.0" release="ALPHA">

    <fileheader>
        <author> Richard Harrison </author>
        <filecreationdate> 2014-08-02 </filecreationdate>
        <description>
Models        </description>
        <version> 1.0 </version>
    </fileheader>

    <metrics>
        <wingarea unit="FT2"> 565 </wingarea>
        <wingspan unit="FT"> 64 </wingspan>
        <chord unit="FT"> 9.85 </chord>
        <wing_incidence unit=""> 2 </wing_incidence>
        <htailarea unit="FT2"> 10.9 </htailarea>
        <htailarm unit="FT"> 25.1 </htailarm>
        <vtailarea unit="FT2"> 9.81 </vtailarea>
        <vtailarm unit="FT"> 25.1 </vtailarm>
        <location name="AERORP" unit="IN">
            <x> 451.8 </x>
            <y> 0 </y>
            <z> 0 </z>
        </location>
        <location name="EYEPOINT" unit="IN">
            <x> 150.6 </x>
            <y> 0 </y>
            <z> 38 </z>
        </location>
        <location name="VRP" unit="IN">
            <x> 0 </x>
            <y> 0 </y>
            <z> 0 </z>
        </location>
    </metrics>

    <mass_balance>
        <ixx unit="SLUG*FT2">58950</ixx>
        <iyy unit="SLUG*FT2">225600</iyy>
        <izz unit="SLUG*FT2">285000</izz>
        <ixz unit="KG*M2">-3030</ixz>
        <iyz unit="KG*M2">0</iyz>
        <ixy unit="KG*M2">0</ixy>
        <emptywt unit="LBS">43735</emptywt>
        <location name="CG" unit="IN">
            <x>451.8</x>
            <y>0</y>
            <z>-18.83</z>
        </location>
        <pointmass name="Payload">
            <weight unit="LBS">29477.4</weight>
            <location unit="IN">
                <x>451.8</x>
                <y>0</y>
                <z>-18.83</z>
            </location>
        </pointmass>
    </mass_balance>

    <ground_reactions>
  <contact type="BOGEY" name="NOSE">
   <location unit="IN">
     <x>  97.89 </x>
     <y>   0.00 </y>
     <z> -90.36 </z>
   </location>
   <static_friction>  0.80 </static_friction>
   <dynamic_friction> 0.50 </dynamic_friction>
   <rolling_friction> 0.02 </rolling_friction>
   <spring_coeff unit="LBS/FT">      22305.00 </spring_coeff>
   <damping_coeff unit="LBS/FT/SEC"> 37175.00 </damping_coeff>
   <max_steer unit="DEG"> 5.00 </max_steer>
   <brake_group>NONE</brake_group>
   <retractable>1</retractable>
  </contact>

  <contact type="BOGEY" name="LEFT_MAIN">
   <location unit="IN">
     <x> 469.87 </x>
     <y> -69.12 </y>
     <z> -90.36 </z>
   </location>
   <static_friction>  0.80 </static_friction>
   <dynamic_friction> 0.50 </dynamic_friction>
   <rolling_friction> 0.02 </rolling_friction>
   <spring_coeff unit="LBS/FT">      74350.00 </spring_coeff>
   <damping_coeff unit="LBS/FT/SEC"> 37175.00 </damping_coeff>
   <max_steer unit="DEG">0</max_steer>
   <brake_group>LEFT</brake_group>
   <retractable>1</retractable>
  </contact>

  <contact type="BOGEY" name="RIGHT_MAIN">
   <location unit="IN">
     <x> 469.87 </x>
     <y>  69.12 </y>
     <z> -90.36 </z>
   </location>
   <static_friction>  0.80 </static_friction>
   <dynamic_friction> 0.50 </dynamic_friction>
   <rolling_friction> 0.02 </rolling_friction>
   <spring_coeff unit="LBS/FT">      74350.00 </spring_coeff>
   <damping_coeff unit="LBS/FT/SEC"> 37175.00 </damping_coeff>
   <max_steer unit="DEG">0</max_steer>
   <brake_group>RIGHT</brake_group>
   <retractable>1</retractable>
  </contact>

  <contact type="STRUCTURE" name="LEFT_WING">
    <location unit="IN">
     <x> 451.80 </x>
     <y> -32.00 </y>
     <z> -18.83 </z>
    </location>
    <static_friction>  1.00 </static_friction>
    <dynamic_friction> 1.00 </dynamic_friction>
    <spring_coeff unit="LBS/FT">      74350.00 </spring_coeff>
    <damping_coeff unit="LBS/FT/SEC"> 74350.00 </damping_coeff>
  </contact>

  <contact type="STRUCTURE" name="RIGHT_WING">
    <location unit="IN">
     <x> 451.80 </x>
     <y>  32.00 </y>
     <z> -18.83 </z>
    </location>
    <static_friction>  1.00 </static_friction>
    <dynamic_friction> 1.00 </dynamic_friction>
    <spring_coeff unit="LBS/FT">      74350.00 </spring_coeff>
    <damping_coeff unit="LBS/FT/SEC"> 74350.00 </damping_coeff>
  </contact>
    </ground_reactions>

    <propulsion>
        <engine file="F100-PW-229">
            <location unit="M">
                <x> 0 </x>
                <y> 0 </y>
                <z> 0 </z>
            </location>
            <orient unit="DEG">
                <roll> 0 </roll>
                <pitch> 0 </pitch>
                <yaw> 0 </yaw>
            </orient>
            <feed>0</feed>
            <thruster file="direct">
                <location unit="M">
                    <x> 0 </x>
                    <y> 0 </y>
                    <z> 0 </z>
                </location>
                <orient unit="DEG">
                    <roll> 0 </roll>
                    <pitch> 0 </pitch>
                    <yaw> 0 </yaw>
                </orient>
            </thruster>
        </engine>
        <engine file="F100-PW-229">
            <location unit="M">
                <x> 0 </x>
                <y> 0 </y>
                <z> 0 </z>
            </location>
            <orient unit="DEG">
                <roll> 0 </roll>
                <pitch> 0 </pitch>
                <yaw> 0 </yaw>
            </orient>
            <feed>1</feed>
            <thruster file="direct">
                <location unit="M">
                    <x> 0 </x>
                    <y> 0 </y>
                    <z> 0 </z>
                </location>
                <orient unit="DEG">
                    <roll> 0 </roll>
                    <pitch> 0 </pitch>
                    <yaw> 0 </yaw>
                </orient>
            </thruster>
        </engine>
        <tank type="FUEL">
            <location unit="M">
                <x> 2.291 </x>
                <y> 0 </y>
                <z> -0.68 </z>
            </location>
            <capacity unit="KG">2136</capacity>
            <contents unit="KG">2136</contents>
        </tank>
        <tank type="FUEL">
            <location unit="M">
                <x> -2.291 </x>
                <y> 0 </y>
                <z> -0.58 </z>
            </location>
            <capacity unit="KG">2000</capacity>
            <contents unit="KG">2000</contents>
        </tank>
        <tank type="FUEL">
            <location unit="M">
                <x> -1.291 </x>
                <y> 1.98 </y>
                <z> -0.51 </z>
            </location>
            <capacity unit="KG">568</capacity>
            <contents unit="KG">568</contents>
        </tank>
        <tank type="FUEL">
            <location unit="M">
                <x> -1.291 </x>
                <y> 0.98 </y>
                <z> -0.58 </z>
            </location>
            <capacity unit="KG">136</capacity>
            <contents unit="KG">136</contents>
        </tank>
        <tank type="FUEL">
            <location unit="M">
                <x> -1.291 </x>
                <y> -1.98 </y>
                <z> -0.51 </z>
            </location>
            <capacity unit="KG">568</capacity>
            <contents unit="KG">568</contents>
        </tank>
        <tank type="FUEL">
            <location unit="M">
                <x> -1.291 </x>
                <y> -0.98 </y>
                <z> -0.58 </z>
            </location>
            <capacity unit="KG">136</capacity>
            <contents unit="KG">136</contents>
        </tank>
        <tank type="FUEL">
            <location unit="M">
                <x> -1.979 </x>
                <y> 3.52 </y>
                <z> -0.51 </z>
            </location>
            <capacity unit="KG">909</capacity>
            <contents unit="KG">909</contents>
        </tank>
        <tank type="FUEL">
            <location unit="M">
                <x> -1.979 </x>
                <y> -3.52 </y>
                <z> -0.51 </z>
            </location>
            <capacity unit="KG">909</capacity>
            <contents unit="KG">909</contents>
        </tank>
        <tank type="FUEL">
            <location unit="M">
                <x> 1.05 </x>
                <y> 1.41 </y>
                <z> -2.18 </z>
            </location>
            <capacity unit="KG">818</capacity>
            <contents unit="KG">818</contents>
        </tank>
        <tank type="FUEL">
            <location unit="M">
                <x> 1.05 </x>
                <y> -1.41 </y>
                <z> -2.18 </z>
            </location>
            <capacity unit="KG">818</capacity>
            <contents unit="KG">818</contents>
        </tank>
        <tank type="FUEL">
            <location unit="M">
                <x> -1.291 </x>
                <y> 0.98 </y>
                <z> -0.58 </z>
            </location>
            <capacity unit="KG">5</capacity>
            <contents unit="KG">5</contents>
        </tank>
        <tank type="FUEL">
            <location unit="M">
                <x> -1.291 </x>
                <y> -0.98 </y>
                <z> -0.58 </z>
            </location>
            <capacity unit="KG">5</capacity>
            <contents unit="KG">5</contents>
        </tank>
    </propulsion>

    <flight_control name="FCS: unnamed">

<!-- INTERFACE PROPERTIES -->

        <property>fcs/yaw-damper-enable</property>

        <channel name="Pitch">

            <summer name="Pitch Trim Sum">
              <input>fcs/elevator-cmd-norm</input>
              <input>fcs/pitch-trim-cmd-norm</input>
              <clipto>
                <min>-1</min>
                <max>1</max>
              </clipto>
            </summer>

            <aerosurface_scale name="Elevator Control">
              <input>fcs/pitch-trim-sum</input>
              <range>
                <min>-0.35</min>
                <max>0.35</max>
              </range>
              <output>fcs/elevator-pos-rad</output>
            </aerosurface_scale>

            <aerosurface_scale name="elevator normalization">
              <input>fcs/elevator-pos-rad</input>
              <domain>
                <min>-0.35</min>
                <max>0.35</max>
              </domain>
              <range>
                <min>-1</min>
                <max>1</max>
              </range>
              <output>fcs/elevator-pos-norm</output>
            </aerosurface_scale>

        </channel>

        <channel name="Roll">

            <summer name="Roll Trim Sum">
              <input>fcs/aileron-cmd-norm</input>
              <input>fcs/roll-trim-cmd-norm</input>
              <clipto>
                <min>-1</min>
                <max>1</max>
              </clipto>
            </summer>

            <aerosurface_scale name="Left Aileron Control">
              <input>fcs/roll-trim-sum</input>
              <range>
                <min>-0.35</min>
                <max>0.35</max>
              </range>
              <output>fcs/left-aileron-pos-rad</output>
            </aerosurface_scale>

            <aerosurface_scale name="Right Aileron Control">
              <input>fcs/roll-trim-sum</input>
              <range>
                <min>-0.35</min>
                <max>0.35</max>
              </range>
              <output>fcs/right-aileron-pos-rad</output>
            </aerosurface_scale>

            <aerosurface_scale name="left aileron normalization">
              <input>fcs/left-aileron-pos-rad</input>
              <domain>
                <min>-0.35</min>
                <max>0.35</max>
              </domain>
              <range>
                <min>-1</min>
                <max>1</max>
              </range>
              <output>fcs/left-aileron-pos-norm</output>
            </aerosurface_scale>

            <aerosurface_scale name="right aileron normalization">
              <input>fcs/right-aileron-pos-rad</input>
              <domain>
                <min>-0.35</min>
                <max>0.35</max>
              </domain>
              <range>
                <min>-1</min>
                <max>1</max>
              </range>
              <output>fcs/right-aileron-pos-norm</output>
            </aerosurface_scale>

        </channel>

        <channel name="Yaw">

            <summer name="Rudder Command Sum">
              <input>fcs/rudder-cmd-norm</input>
              <input>fcs/yaw-trim-cmd-norm</input>
              <clipto>
                <min>-1</min>
                <max>1</max>
              </clipto>
            </summer>

            <scheduled_gain name="Yaw Damper Rate">
              <input>velocities/r-aero-rad_sec</input>
              <gain>0</gain>
              <table>
                <independentVar> velocities/ve-kts </independentVar>
                <tableData>
                  30		0
                  60		2
                </tableData>
              </table>
            </scheduled_gain>

            <summer name="Rudder Sum">
              <input>fcs/rudder-command-sum</input>
              <input>fcs/yaw-damper-rate</input>
              <clipto>
                <min>-1.1</min>
                <max>1.1</max>
              </clipto>
            </summer>

            <aerosurface_scale name="Rudder Control">
              <input>fcs/rudder-sum</input>
              <domain>
                <min>-1.1</min>
                <max>1.1</max>
              </domain>
              <range>
                <min>-0.35</min>
                <max>0.35</max>
              </range>
              <output>fcs/rudder-pos-rad</output>
            </aerosurface_scale>

            <aerosurface_scale name="rudder normalization">
              <input>fcs/rudder-pos-rad</input>
              <domain>
                <min>-0.35</min>
                <max>0.35</max>
              </domain>
              <range>
                <min>-1</min>
                <max>1</max>
              </range>
              <output>fcs/rudder-pos-norm</output>
            </aerosurface_scale>

        </channel>

        <channel name="Flaps">

            <kinematic name="Flaps Control">
              <input>fcs/flap-cmd-norm</input>
              <traverse>
                <setting>
                  <position>0</position>
                  <time>0</time>
                </setting>
                <setting>
                  <position>15</position>
                  <time>4</time>
                </setting>
                <setting>
                  <position>30</position>
                  <time>3</time>
                </setting>
              </traverse>
              <output>fcs/flap-pos-deg</output>
            </kinematic>

            <aerosurface_scale name="flap normalization">
              <input>fcs/flap-pos-deg</input>
              <domain>
                <min>0</min>
                <max>30</max>
              </domain>
              <range>
                <min>0</min>
                <max>1</max>
              </range>
              <output>fcs/flap-pos-norm</output>
            </aerosurface_scale>

        </channel>

        <channel name="Landing Gear">

            <kinematic name="Gear Control">
              <input>gear/gear-cmd-norm</input>
              <traverse>
                <setting>
                  <position>0</position>
                  <time>0</time>
                </setting>
                <setting>
                  <position>1</position>
                  <time>5</time>
                </setting>
              </traverse>
              <output>gear/gear-pos-norm</output>
            </kinematic>

        </channel>

        <channel name="Speedbrake">

            <kinematic name="Speedbrake Control">
              <input>fcs/speedbrake-cmd-norm</input>
              <traverse>
                <setting>
                  <position>0</position>
                  <time>0</time>
                </setting>
                <setting>
                  <position>1</position>
                  <time>1</time>
                </setting>
              </traverse>
              <output>fcs/speedbrake-pos-norm</output>
            </kinematic>

        </channel>

    </flight_control>

    <aerodynamics>
        <axis name="LIFT" unit="LBS">
            <function name="aero/force/Lift_alpha">
                <description>Lift due to alpha</description>
                <product>
                    <property>aero/qbar-psf</property>
                    <property>metrics/Sw-sqft</property>
                    <table>
                        <independentVar>aero/alpha-rad</independentVar>
                        <tableData>
                          0             0.06145
                          0.0872664     0.52863
                          0.174533      0.921557
                          0.261799      1.21359
                          0.349066      1.43942
                          0.436332      1.64045
                          0.523599      1.72011
                          0.610865      1.73303
                          0.698132      1.66641
                          0.785398      1.5672
                          0.872664      1.47601
                          0.959931      1.34635
                        </tableData>
                    </table>
                </product>
            </function>
            <function name="aero/force/Lift_flap">
                <description>Delta Lift due to flaps</description>
                <product>
                    <property>aero/qbar-psf</property>
                    <property>metrics/Sw-sqft</property>
                    <property>fcs/flap-pos-deg</property>
                    <value>0.01167</value>
                </product>
            </function>
            <function name="aero/force/Lift_speedbrake">
                <description>Delta Lift due to speedbrake</description>
                <product>
                    <property>aero/qbar-psf</property>
                    <property>metrics/Sw-sqft</property>
                    <property>fcs/speedbrake-pos-norm</property>
                    <value>0</value>
                </product>
            </function>
            <function name="aero/force/Lift_elevator">
                <description>Lift due to Elevator Deflection</description>
                <product>
                    <property>aero/qbar-psf</property>
                    <property>metrics/Sw-sqft</property>
                    <property>fcs/elevator-pos-rad</property>
                    <value>0.2</value>
                </product>
            </function>
        </axis>
        <axis name="DRAG" unit="LBS">
            <function name="aero/force/Drag_basic">
                <description>Drag at zero lift</description>
                <product>
                    <property>aero/qbar-psf</property>
                    <property>metrics/Sw-sqft</property>
                    <table>
                        <independentVar>aero/alpha-rad</independentVar>
                        <tableData>
                          0             0.0252
                          0.0872664     0.0581886
                          0.174533      0.167846
                          0.261799      0.346316
                          0.349066      0.577224
                          0.436332      0.821137
                          0.523599      1.11305
                          0.610865      1.36259
                          0.698132      1.50487
                          0.785398      1.68355
                          0.872664      1.89047
                          0.959931      2.03466
                        </tableData>
                    </table>
                </product>
            </function>
            <function name="aero/force/Drag_mach">
                <description>Drag due to mach</description>
                <product>
                    <property>aero/qbar-psf</property>
                    <property>metrics/Sw-sqft</property>
                    <table>
                        <independentVar>velocities/mach</independentVar>
                        <tableData>
                          0             0
                          0.81          0
                          1.1           0.023
                          1.8           0.015
                        </tableData>
                    </table>
                </product>
            </function>
            <function name="aero/force/Drag_flap">
                <description>Drag due to flaps</description>
                <product>
                    <property>aero/qbar-psf</property>
                    <property>metrics/Sw-sqft</property>
                    <property>fcs/flap-pos-deg</property>
                    <value>0.0025</value>
                </product>
            </function>
            <function name="aero/force/Drag_gear">
                <description>Drag due to gear</description>
                <product>
                    <property>aero/qbar-psf</property>
                    <property>metrics/Sw-sqft</property>
                    <property>gear/gear-pos-norm</property>
                    <value>0.02</value>
                </product>
            </function>
            <function name="aero/force/Drag_speedbrake">
                <description>Drag due to speedbrakes</description>
                <product>
                    <property>aero/qbar-psf</property>
                    <property>metrics/Sw-sqft</property>
                    <property>fcs/speedbrake-pos-norm</property>
                    <value>0.024</value>
                </product>
            </function>
            <function name="aero/force/Drag_beta">
                <description>Drag due to sideslip</description>
                <product>
                    <property>aero/qbar-psf</property>
                    <property>metrics/Sw-sqft</property>
                    <table>
                        <independentVar>aero/beta-rad</independentVar>
                        <tableData>
                          -1.57         1.23
                          -0.26         0.05
                          0             0
                          0.26          0.05
                          1.57          1.23
                        </tableData>
                    </table>
                </product>
            </function>
            <function name="aero/force/Drag_elevator">
                <description>Drag due to Elevator Deflection</description>
                <product>
                    <property>aero/qbar-psf</property>
                    <property>metrics/Sw-sqft</property>
                    <abs>
                        <property>fcs/elevator-pos-norm</property>
                    </abs>
                    <value>0.04</value>
                </product>
            </function>
        </axis>
        <axis name="SIDE" unit="LBS">
            <function name="aero/force/Side_beta">
                <description>Side force due to beta</description>
                <product>
                    <property>aero/qbar-psf</property>
                    <property>metrics/Sw-sqft</property>
                    <property>aero/beta-rad</property>
                    <value>-1</value>
                </product>
            </function>
        </axis>
        <axis name="ROLL" unit="LBS*FT">
            <function name="aero/moment/Roll_beta">
                <description>Roll moment due to beta</description>
                <product>
                    <property>aero/qbar-psf</property>
                    <property>metrics/Sw-sqft</property>
                    <property>metrics/bw-ft</property>
                    <property>aero/beta-rad</property>
                    <value>-0.1</value>
                </product>
            </function>
        </axis>
        <axis name="PITCH" unit="LBS*FT">
            <function name="aero/moment/Pitch_alpha">
                <description>Pitch moment due to alpha</description>
                <product>
                    <property>aero/qbar-psf</property>
                    <property>metrics/Sw-sqft</property>
                    <property>metrics/cbarw-ft</property>
                    <property>aero/alpha-rad</property>
                    <value>-0.3</value>
                </product>
            </function>
            <function name="aero/moment/Pitch_elevator">
                <description>Pitch moment due to elevator</description>
                <product>
                    <property>aero/qbar-psf</property>
                    <property>metrics/Sw-sqft</property>
                    <property>metrics/cbarw-ft</property>
                    <property>fcs/elevator-pos-rad</property>
                    <table>
                        <independentVar>velocities/mach</independentVar>
                        <tableData>
                          0             -0.8
                          2             -0.2
                        </tableData>
                    </table>
                </product>
            </function>
            <function name="aero/moment/Pitch_damp">
                <description>Pitch moment due to pitch rate</description>
                <product>
                    <property>aero/qbar-psf</property>
                    <property>metrics/Sw-sqft</property>
                    <property>metrics/cbarw-ft</property>
                    <property>aero/ci2vel</property>
                    <property>velocities/q-aero-rad_sec</property>
                    <value>-18</value>
                </product>
            </function>
            <function name="aero/moment/Pitch_alphadot">
                <description>Pitch moment due to alpha rate</description>
                <product>
                    <property>aero/qbar-psf</property>
                    <property>metrics/Sw-sqft</property>
                    <property>metrics/cbarw-ft</property>
                    <property>aero/ci2vel</property>
                    <property>aero/alphadot-rad_sec</property>
                    <value>-9</value>
                </product>
            </function>
        </axis>
        <axis name="YAW" unit="LBS*FT">
            <function name="aero/moment/Yaw_beta">
                <description>Yaw moment due to beta</description>
                <product>
                    <property>aero/qbar-psf</property>
                    <property>metrics/Sw-sqft</property>
                    <property>metrics/bw-ft</property>
                    <property>aero/beta-rad</property>
                    <value>0.0</value>
                </product>
            </function>
        </axis>
    </aerodynamics>

    <output name="c:/users/richard/dev/flightgear/aircraft/f-14b/JSBOut.csv" type="CSV" rate="10">
        <simulation> ON </simulation>
        <atmosphere> OFF </atmosphere>
        <massprops> OFF </massprops>
        <aerosurfaces> OFF </aerosurfaces>
        <rates> OFF </rates>
        <velocities> OFF </velocities>
        <forces> ON </forces>
        <moments> ON </moments>
        <position> OFF </position>
        <coefficients> OFF </coefficients>
        <ground_reactions> ON </ground_reactions>
        <fcs> ON </fcs>
        <propulsion> ON </propulsion>
        <property>aero/alpha-rad</property>
        <property>velocities/vc-kts</property>
        <property>/fdm/jsbsim/propulsion/engine/thrust-lbs</property>
        <property>/fdm/jsbsim/propulsion/engine/fuel-flow-rate-gph</property>
        <property>/fdm/jsbsim/propulsion/engine/fuel-used-lbs</property>
        <property>/fdm/jsbsim/propulsion/engine/n1</property>
        <property>/fdm/jsbsim/propulsion/engine[1]/thrust-lbs</property>
        <property>/fdm/jsbsim/propulsion/engine[1]/fuel-flow-rate-gph</property>
        <property>/fdm/jsbsim/propulsion/engine[1]/fuel-used-lbs</property>
        <property>/fdm/jsbsim/propulsion/engine[1]/n1</property>
    </output>
</fdm_config>
