<?xml version="1.0"?>
<!--
  Name:     F100-PW-229
  File:     F100-PW-229.xml
  Author:   Richard Harrison (rjh@zaretto.com)
  Date:     13 December 2014
  Description:

  Engine Thrust tables are based on NASA-TM-104326 tables 4-6 normalized and adjusted
  for altitude. These figures are derived mainly from table 6 (as the altitude is constant)
  normalized throttle position against mach (to give max thrust) and then altitude factor added
  using a basic atmosphere model.

  Augmentation figures are largely the same as mil thrust - it is just the difference between milthrust and maxthrust
  in the definition that defines the thrust. I believe this is correct as the mass flow / gas characteristics
  of the turbine aren't  altered when augmented so the assumption is that the values will be close in shape to the milthrust ones.
  See the table here: http://adg.stanford.edu/aa241/propulsion/images/tvsv.gif - the ratio of Thrust to AB increases by
  0.26 from 0 to mach 1.0 - which in the abscence of F110 AB performance figures means that it is close enough to the trend.

  The values for Mach > 0.955 are constant as the airframe has inlet ramps to slow the incoming air and this is
  a simple way to model it; for a more complete model there should be a data table that takes into account ramp
  position and mach to provide inlet airflow.

  Future enhancements of the model would be to
  1. Model inlet airflow rate
  2. Flameout engines when insufficient air mass
  3. Adverse effects when inlet airflow too high and would compressor stalls,  and/or stagnation and/or
  Refs:
        Flight and Static Exhaust Flow  Properties of an F110-GE-129  Engine in an F-16XL Airplane  During Acoustic Tests
        Jon K. Holzman, Lannie D. Webb, and Frank W. Burcham,
        November 1996
        NASA-TM-104326

        Real-Time Simulation of an F 110/STOVL Turbofan Engine
        Colin K. Drummond and Peter J. Ouzts
        October 16-17, 1989
        NASA-TM-102409

   http://www.jet-engine.net/miltfspec.html
   http://www.f-15e.info/technology/engines/pw2/pw2.htm
   http://www.stardestroyer.net/Armour/ShepStuff/Website/Statistics/Engines.htm
-->

<turbine_engine name="F100-PW-229">
    <milthrust> 17800 </milthrust>
    <maxthrust> 29160 </maxthrust>
    <bypassratio>     0.36 </bypassratio>
    <tsfc>            0.76 </tsfc>
    <atsfc>           1.94  </atsfc>
    <bleed>           0.03</bleed>
    <idlen1>         30.0 </idlen1>
    <idlen2>         60.0 </idlen2>
    <maxn1>         100.0 </maxn1>
    <maxn2>         100.0 </maxn2>
    <augmented>         1 </augmented>
    <augmethod>         1 </augmethod>
    <!-- acceleration from 0 -> 15% (at which point the start logic takes over in FGTurbine using 1.2 and 2.0 for N1/N2 acceleration rate) -->
    <n1spinup>1</n1spinup>
    <n2spinup>3</n2spinup>

    <injected>          0 </injected>

    <function name="IdleThrust">
        <table>
            <independentVar lookup="row">velocities/mach</independentVar>
            <independentVar lookup="column">atmosphere/density-altitude</independentVar>
            <tableData>
                0	    5000	   10000	   15000	   20000	   25000	   30000	   35000	   40000	   45000	   50000	   55000	   60000	   65000	   70000	   75000
                0.0000	0.028890	0.024852	0.021241	0.018029	0.015191	0.012699	0.010526	0.008644	0.006815	0.005359	0.004214	0.003314	0.002606	0.002049	0.001611	0.001267
                0.2820	0.028890	0.024852	0.021241	0.018029	0.015191	0.012699	0.010526	0.008644	0.006815	0.005359	0.004214	0.003314	0.002606	0.002049	0.001611	0.001267
                0.3000	0.028746	0.024728	0.021134	0.017939	0.015115	0.012636	0.010473	0.008601	0.006781	0.005332	0.004193	0.003297	0.002593	0.002039	0.001603	0.001261
                0.3080	0.028453	0.024476	0.020919	0.017756	0.014961	0.012507	0.010367	0.008513	0.006711	0.005278	0.004150	0.003264	0.002566	0.002018	0.001587	0.001248
                0.6010	0.042800	0.036818	0.031467	0.026710	0.022506	0.018814	0.015594	0.012806	0.010096	0.007939	0.006243	0.004909	0.003861	0.003036	0.002387	0.001877
                0.6030	0.042714	0.036743	0.031404	0.026656	0.022460	0.018776	0.015562	0.012780	0.010075	0.007923	0.006230	0.004899	0.003853	0.003030	0.002383	0.001874
                0.6050	0.042658	0.036695	0.031363	0.026621	0.022431	0.018751	0.015542	0.012764	0.010062	0.007913	0.006222	0.004893	0.003848	0.003026	0.002379	0.001871
                0.7930	0.054850	0.047183	0.040327	0.034230	0.028842	0.024110	0.019984	0.016412	0.012938	0.010174	0.008001	0.006292	0.004947	0.003891	0.003059	0.002406
                0.8040	0.055525	0.047763	0.040822	0.034651	0.029196	0.024407	0.020230	0.016614	0.013097	0.010299	0.008099	0.006369	0.005008	0.003938	0.003097	0.002435
                0.8140	0.056021	0.048190	0.041187	0.034960	0.029457	0.024625	0.020410	0.016762	0.013214	0.010391	0.008171	0.006426	0.005053	0.003974	0.003125	0.002457
                0.9460	0.065140	0.056034	0.047891	0.040651	0.034252	0.028633	0.023733	0.019490	0.015365	0.012083	0.009501	0.007472	0.005876	0.004620	0.003633	0.002857
                0.9550	0.065976	0.056754	0.048506	0.041173	0.034692	0.029001	0.024038	0.019741	0.015562	0.012238	0.009623	0.007568	0.005951	0.004680	0.003680	0.002894
                1.2000	0.065976	0.056754	0.048506	0.041173	0.034692	0.029001	0.024038	0.019741	0.015562	0.012238	0.009623	0.007568	0.005951	0.004680	0.003680	0.002894
                1.6000	0.065976	0.056754	0.048506	0.041173	0.034692	0.029001	0.024038	0.019741	0.015562	0.012238	0.009623	0.007568	0.005951	0.004680	0.003680	0.002894
                1.8000	0.065976	0.056754	0.048506	0.041173	0.034692	0.029001	0.024038	0.019741	0.015562	0.012238	0.009623	0.007568	0.005951	0.004680	0.003680	0.002894
            </tableData>
        </table>
    </function>

    <function name="MilThrust">
        <table>
            <independentVar lookup="row">velocities/mach</independentVar>
            <independentVar lookup="column">atmosphere/density-altitude</independentVar>
            <tableData>
                0	    5000	   10000	   15000	   20000	   25000	   30000	   35000	   40000	   45000	   50000	   55000	   60000	   65000	   70000	   75000
                0.000	0.767401	0.660132	0.564202	0.478905	0.403520	0.337324	0.279593	0.229614	0.181013	0.142344	0.111936	0.088023	0.069219	0.054432	0.042804	0.033660
                0.282	0.767401	0.660132	0.564202	0.478905	0.403520	0.337324	0.279593	0.229614	0.181013	0.142344	0.111936	0.088023	0.069219	0.054432	0.006804	0.000851
                0.300	0.763564	0.656832	0.561381	0.476510	0.401503	0.335637	0.278195	0.228466	0.180108	0.141632	0.111376	0.087583	0.068873	0.054160	0.042590	0.005324
                0.308	0.755786	0.650141	0.555663	0.471656	0.397413	0.332219	0.275362	0.226139	0.178273	0.140189	0.110241	0.086691	0.068172	0.053608	0.042156	0.005270
                0.601	1.136887	0.977971	0.835853	0.709487	0.597806	0.499738	0.414211	0.340168	0.268166	0.210879	0.165830	0.130405	0.102547	0.080640	0.063413	0.007927
                0.603	1.134594	0.975999	0.834167	0.708056	0.596601	0.498730	0.413376	0.339482	0.267626	0.210454	0.165496	0.130142	0.102340	0.080478	0.063286	0.007911
                0.605	1.133102	0.974715	0.833070	0.707125	0.595816	0.498074	0.412832	0.339035	0.267274	0.210177	0.165278	0.129970	0.102205	0.080372	0.063202	0.007900
                0.793	1.456961	1.253305	1.071175	0.909232	0.766110	0.640432	0.530826	0.435937	0.343665	0.270249	0.212517	0.167118	0.131417	0.103343	0.081267	0.010158
                0.804	1.474877	1.268717	1.084348	0.920413	0.775531	0.648307	0.537354	0.441298	0.347891	0.273572	0.215130	0.169173	0.133034	0.104614	0.082266	0.010283
                0.814	1.488045	1.280044	1.094029	0.928631	0.782455	0.654095	0.542151	0.445238	0.350997	0.276015	0.217051	0.170684	0.134221	0.105548	0.083000	0.010375
                0.946	1.730268	1.488409	1.272114	1.079793	0.909822	0.760569	0.630402	0.517713	0.408132	0.320944	0.252383	0.198467	0.156070	0.122729	0.096511	0.012064
                0.955	1.752485	1.507520	1.288448	1.093657	0.921504	0.770334	0.638497	0.524361	0.413372	0.325065	0.255623	0.201016	0.158074	0.124305	0.097750	0.012219
                1.200	1.752485	1.507520	1.288448	1.093657	0.921504	0.770334	0.638497	0.524361	0.413372	0.325065	0.255623	0.201016	0.158074	0.124305	0.097750	0.012219
                1.600	1.752485	1.507520	1.288448	1.093657	0.921504	0.770334	0.638497	0.524361	0.413372	0.325065	0.255623	0.201016	0.158074	0.124305	0.097750	0.012219
                1.800	1.752485	1.507520	1.288448	1.093657	0.921504	0.770334	0.638497	0.524361	0.413372	0.325065	0.255623	0.201016	0.158074	0.124305	0.097750	0.012219
            </tableData>
        </table>
    </function>

    <function name="AugThrust">
        <table>
            <independentVar lookup="row">velocities/mach</independentVar>
            <independentVar lookup="column">atmosphere/density-altitude</independentVar>
            <tableData>
                0   	5000	   10000	   15000	   20000 	   25000	   30000	   35000	   40000	   50000	   60000	   70000	   75000
                0.000	0.767401	0.660132	0.564202	0.478905	0.403520	0.337324	0.279593	0.229614	0.181013	0.150258	0.111936	0.042804	0.033660
                0.282	0.767401	0.660132	0.564202	0.478905	0.403520	0.337324	0.279593	0.229614	0.181013	0.147931	0.111936	0.006804	0.000851
                0.300	0.763564	0.656832	0.561381	0.476510	0.401503	0.335637	0.278195	0.228466	0.180108	0.148278	0.111376	0.042590	0.005324
                0.308	0.755786	0.650141	0.555663	0.471656	0.397413	0.332219	0.275362	0.226139	0.178273	0.151259	0.110241	0.042156	0.005270
                0.601	1.136887	0.977971	0.835853	0.709487	0.597806	0.499738	0.414211	0.340168	0.268166	0.156917	0.165830	0.063413	0.007927
                0.603	1.134594	0.975999	0.834167	0.708056	0.596601	0.498730	0.413376	0.339482	0.267626	0.165377	0.165496	0.063286	0.007911
                0.605	1.133102	0.974715	0.833070	0.707125	0.595816	0.498074	0.412832	0.339035	0.267274	0.176842	0.165278	0.063202	0.007900
                0.793	1.456961	1.253305	1.071175	0.909232	0.766110	0.640432	0.530826	0.435937	0.343665	0.191594	0.212517	0.081267	0.010158
                0.804	1.474877	1.268717	1.084348	0.920413	0.775531	0.648307	0.537354	0.441298	0.347891	0.209990	0.215130	0.082266	0.010283
                0.814	1.488045	1.280044	1.094029	0.928631	0.782455	0.654095	0.542151	0.445238	0.350997	0.232164	0.217051	0.083000	0.010375
                0.946	1.730268	1.488409	1.272114	1.079793	0.909822	0.760569	0.630402	0.517713	0.408132	0.257613	0.252383	0.096511	0.012064
                0.955	1.752485	1.507520	1.288448	1.093657	0.921504	0.770334	0.638497	0.524361	0.413372	0.287285	0.255623	0.097750	0.012219
                1.200	1.752485	1.507520	1.288448	1.093657	0.921504	0.770334	0.638497	0.524361	0.413372	0.321724	0.255623	0.097750	0.012219
                1.600	1.752485	1.507520	1.288448	1.093657	0.921504	0.770334	0.638497	0.524361	0.413372	0.361426	0.255623	0.097750	0.012219
                1.800	1.752485	1.507520	1.288448	1.093657	0.921504	0.770334	0.638497	0.524361	0.413372	0.406871	0.255623	0.097750	0.012219
            </tableData>
        </table>
    </function>

</turbine_engine>
