<?xml version="1.0"?>
<?xml-stylesheet type="text/xsl" href="/JSBSim.xsl"?>
<fdm_config name="F-15 (all variants)" version="2.0" release="DEVELOPMENT"
   xmlns:xsi="http://www.w3.org/2001/XMLSchema-instance"
   xsi:noNamespaceSchemaLocation="http://jsbsim.sourceforge.net/JSBSim.xsd">

    <fileheader>
        <author>Richard Harrison</author>
        <filecreationdate>2015-01-13</filecreationdate>
        <version>1.0</version>
        <description>F-15 - basic aerodynamics are the same, except for the two place canopy which is accounted for</description>
        <note>Aircraft origin for measurements is the nose</note>
        <note>
            F-15C in the critical aft c.g. configuration has a weight of 33,467
            pounds and a c.g. location at 563.1 inches (6:12). To
            convert c.g. location in inches to percent mean aerodynamic
            chord, the following equation is used for all A through D
            models of the F-15: (measurements in inches).
            % MAC = (xcg - 408.1 * 100) / 191.33
        </note>
        <limitation></limitation>
        <reference
            refID="ZDAT/AED/2014/12-2"
            author="Richard Harrison, rjh@zaretto.com"
            title="F-15 Aerodynamic data from  (AFIT/GAE/ENY/90D-16); CG 25.65%"
            date="December, 2014"
            URL="http://www.zaretto.com/sites/zaretto.com/files/F-15-data/rjh-zaretto-f-15-aerodynamic-data.pdf"
        />
        <reference
            refID="AFIT/GAE/ENY/90D-16"
            author="Robert J. McDonnell, B.S., Captain, USAF"
            title="INVESTIGATION OF THE HIGH ANGLE OF ATTACK DYNAMICS OF THE F-15B USING BIFURCATION ANALYSIS"
            date="December 1990"
            URL="http://www.zaretto.com/sites/zaretto.com/files/F-15-data/ADA230462.pdf"
        />
        <reference
            refID="AFIT/GA/ENY/91D-1"
            author="Richard L. Bennet, Major, USAF"
            title="ANALYSIS OF THE EFFECTS OF REMOVING NOSE BALLAST FROM THE F-15 EAGLE"
            date="December 1991"
            URL="http://www.zaretto.com/sites/zaretto.com/files/F-15-data/ADA244044.pdf"
        />
        <reference
            refID="NASA CR-152391-VOL-1 Figure 3-2 p54"
            author="DR. J. R. LUMMUS, G. T. JOYCE, O C. D. O MALLEY"
            title="ANALYSIS OF WIND TUNNEL TEST RESULTS FOR A 9.39-PER CENT SCALE MODEL OF A VSTOL FIGHTER/ATTACK AIRCRAFT : VOLUME I - STUDY OVERVIEW"
            date="October 1980"
            URL="http://www.zaretto.com/sites/zaretto.com/files/F-15-data/19810014497.pdf"
        />
        <reference
            refID="NASA TP-3627"
            author="Frank W. Burcham, Jr., Trindel A. Maine, C. Gordon Fullerton, and Lannie Dean Webb"
            title="Development and Flight Evaluation of an Emergency Digital Flight Control System Using Only Engine Thrust on an F-15 Airplane"
            date="September 1996"
            URL="http://www.zaretto.com/sites/zaretto.com/files/F-15-data/88414main_H-2048.pdf"
        />
    </fileheader>
    <metrics>
        <wingarea unit="FT2">608</wingarea>
        <wing_incidence unit="DEG">2</wing_incidence>
        <wingspan unit="FT">42.8</wingspan>
        <chord unit="IN">191.3</chord>
        <location unit="IN" name="EYEPOINT">
            <x>197</x>
            <y>0</y>
            <z>-3.94</z>
        </location>
        <location unit="IN" name="VRP">
            <x>386</x>
            <y>0</y>
            <z>0</z>
        </location>
        <location unit="IN" name="AERORP">
            <x>457.06845</x>
            <y>0</y>
            <z>0</z>
        </location>
    </metrics>

    <mass_balance>
        <location unit="IN" name="CG">
            <x>408</x>
            <y>0</y>
            <z>0</z>
        </location>
        <ixx unit="SLUG*FT2">28700</ixx>
        <iyy unit="SLUG*FT2">165100</iyy>
        <izz unit="SLUG*FT2">187900</izz>
        <ixz unit="SLUG*FT2">-520</ixz>
        <emptywt unit="LBS">28000</emptywt>
        <!-- stores, left to right (unfortunately I've done them the opposite to the aircraft which numbers from right to left)-->
        <pointmass name="Station2-1">
            <weight unit="LBS"> 0 </weight>
            <location name="POINTMASS" unit="M">
                <x> 1.7844 </x>
                <y> -3.8325 </y>
                <z> 0.288 </z>
            </location>
        </pointmass>
        <pointmass name="Station2-2">
            <weight unit="LBS"> 0 </weight>
            <location name="POINTMASS" unit="M">
                <x> 1.4077 </x>
                <y>-3.3034</y>
                <z> 1.4077 </z>
            </location>
        </pointmass>
        <pointmass name="Station2-3">
            <weight unit="LBS"> 0 </weight>
            <location name="POINTMASS" unit="M">
                <x> 1.7844 </x>
                <y> -3.8325 </y>
                <z> 0.288 </z>
            </location>
        </pointmass>
        <pointmass name="Station3">
            <weight unit="LBS"> 0 </weight>
            <location name="POINTMASS" unit="M">
                <x> -0.3003 </x>
                <y>-1.611 </y>
                <z> -0.5678 </z>
            </location>
        </pointmass>

        <pointmass name="Station4">
            <weight unit="LBS"> 0 </weight>
            <location name="POINTMASS" unit="M">
                <x> 3.5918</x>
                <y>-1.611 </y>
                <z> -0.5678 </z>
            </location>
        </pointmass>
        <pointmass name="Station5">
            <weight unit="LBS"> 0 </weight>
            <location name="POINTMASS" unit="M">
                <x> 0</x>
                <y> 0 </y>
                <z> 0.33 </z>
            </location>
        </pointmass>

        <pointmass name="Station6">
            <weight unit="LBS"> 0 </weight>
            <location name="POINTMASS" unit="M">
                <x> -0.3003 </x>
                <y> 1.611 </y>
                <z> -0.5678 </z>
            </location>
        </pointmass>

        <pointmass name="Station7">
            <weight unit="LBS"> 0 </weight>
            <location name="POINTMASS" unit="M">
                <x> 3.5918</x>
                <y> 1.611 </y>
                <z> -0.5678 </z>
            </location>
        </pointmass>

        <pointmass name="Station8">
            <weight unit="LBS"> 0 </weight>
            <location name="POINTMASS" unit="M">
                <x> 1.7844 </x>
                <y> 3.8325 </y>
                <z> 0.288 </z>
            </location>
        </pointmass>

        <pointmass name="Station9">
            <weight unit="LBS"> 0 </weight>
            <location name="POINTMASS" unit="M">
                <x> 1.4077 </x>
                <y> 3.3034</y>
                <z> 1.4077 </z>
            </location>
        </pointmass>

        <pointmass name="Station10">
            <weight unit="LBS"> 0 </weight>
            <location name="POINTMASS" unit="M">
                <x> 1.7844 </x>
                <y> 3.8325 </y>
                <z> 0.288 </z>
            </location>
        </pointmass>
    </mass_balance>

    <ground_reactions>
        <contact type="BOGEY" name="NOSE_LG">
            <location unit="IN">
                <x>197</x>
                <y>0</y>
                <z>-77.6496063</z>
            </location>
            <static_friction>0.8</static_friction>
            <dynamic_friction>0.5</dynamic_friction>
            <rolling_friction>0.02</rolling_friction>
            <spring_coeff unit="LBS/FT">25200</spring_coeff>
            <damping_coeff unit="LBS/FT/SEC">1400</damping_coeff>
            <max_steer unit="DEG">89</max_steer>
            <brake_group>NOSE</brake_group>
            <retractable>1</retractable>
        </contact>
        <contact type="BOGEY" name="LEFT_MLG">
            <location unit="IN">
                <x>451</x>
                <y>-98</y>
                <z>-84.3385827</z>
            </location>
            <static_friction>0.8</static_friction>
            <dynamic_friction>0.5</dynamic_friction>
            <rolling_friction>0.02</rolling_friction>
            <spring_coeff unit="LBS/FT">25200</spring_coeff>
            <damping_coeff unit="LBS/FT/SEC">1400</damping_coeff>
            <max_steer unit="DEG">0</max_steer>
            <brake_group>LEFT</brake_group>
            <retractable>1</retractable>
        </contact>
        <contact type="BOGEY" name="RIGHT_MLG">
            <location unit="IN">
                <x>451</x>
                <y>98</y>
                <z>-84.3385827</z>
            </location>
            <static_friction>0.8</static_friction>
            <dynamic_friction>0.5</dynamic_friction>
            <rolling_friction>0.02</rolling_friction>
            <spring_coeff unit="LBS/FT">25200</spring_coeff>
            <damping_coeff unit="LBS/FT/SEC">1400</damping_coeff>
            <max_steer unit="DEG">0</max_steer>
            <brake_group>RIGHT</brake_group>
            <retractable>1</retractable>
        </contact>
        <contact type="STRUCTURE" name="LEFT_WING_TIP">
            <location unit="IN">
                <x>472</x>
                <y>-256.8</y>
                <z>13</z>
            </location>
            <static_friction>1.2</static_friction>
            <dynamic_friction>1.212</dynamic_friction>
            <rolling_friction>1.413</rolling_friction>
            <spring_coeff unit="LBS/FT">25200</spring_coeff>
            <damping_coeff unit="LBS/FT/SEC">5600</damping_coeff>
        </contact>
        <contact type="STRUCTURE" name="RIGHT_WING_TIP">
            <location unit="IN">
                <x>472</x>
                <y>256.8</y>
                <z>13</z>
            </location>
            <static_friction>1.2</static_friction>
            <dynamic_friction>1.212</dynamic_friction>
            <rolling_friction>1.413</rolling_friction>
            <spring_coeff unit="LBS/FT">25200</spring_coeff>
            <damping_coeff unit="LBS/FT/SEC">5600</damping_coeff>
        </contact>
        <contact type="STRUCTURE" name="CANOPY">
            <location unit="IN">
                <x>214</x>
                <y>0</y>
                <z>10</z>
            </location>
            <static_friction>1.2</static_friction>
            <dynamic_friction>1.212</dynamic_friction>
            <rolling_friction>1.413</rolling_friction>
            <spring_coeff unit="LBS/FT">25200</spring_coeff>
            <damping_coeff unit="LBS/FT/SEC">5600</damping_coeff>
        </contact>
        <contact type="STRUCTURE" name="RADOME_FRONT">
            <location unit="IN">
                <x>20</x>
                <y>0</y>
                <z>-18</z>
            </location>
            <static_friction>1.2</static_friction>
            <dynamic_friction>1.212</dynamic_friction>
            <rolling_friction>1.413</rolling_friction>
            <spring_coeff unit="LBS/FT">25200</spring_coeff>
            <damping_coeff unit="LBS/FT/SEC">5600</damping_coeff>
        </contact>
        <contact type="STRUCTURE" name="LEFT_VERTICAL_TAIL">
            <location unit="IN">
                <x>744</x>
                <y>-98</y>
                <z>60</z>
            </location>
            <static_friction>1.2</static_friction>
            <dynamic_friction>1.212</dynamic_friction>
            <rolling_friction>1.413</rolling_friction>
            <spring_coeff unit="LBS/FT">25200</spring_coeff>
            <damping_coeff unit="LBS/FT/SEC">5600</damping_coeff>
        </contact>
        <contact type="STRUCTURE" name="RIGHT_VERTICAL_TAIL">
            <location unit="IN">
                <x>744</x>
                <y>98</y>
                <z>60</z>
            </location>
            <static_friction>1.2</static_friction>
            <dynamic_friction>1.212</dynamic_friction>
            <rolling_friction>1.413</rolling_friction>
            <spring_coeff unit="LBS/FT">25200</spring_coeff>
            <damping_coeff unit="LBS/FT/SEC">5600</damping_coeff>
        </contact>
        <contact type="STRUCTURE" name="REAR_BODY_LEFT">
            <location unit="IN">
                <x>669</x>
                <y>-58</y>
                <z>-12</z>
            </location>
            <static_friction>1.2</static_friction>
            <dynamic_friction>1.212</dynamic_friction>
            <rolling_friction>1.413</rolling_friction>
            <spring_coeff unit="LBS/FT">25200</spring_coeff>
            <damping_coeff unit="LBS/FT/SEC">5600</damping_coeff>
        </contact>
        <contact type="STRUCTURE" name="REAR_BODY_RIGHT">
            <location unit="IN">
                <x>669</x>
                <y>58</y>
                <z>-12</z>
            </location>
            <static_friction>1.2</static_friction>
            <dynamic_friction>1.212</dynamic_friction>
            <rolling_friction>1.413</rolling_friction>
            <spring_coeff unit="LBS/FT">25200</spring_coeff>
            <damping_coeff unit="LBS/FT/SEC">5600</damping_coeff>
        </contact>
        <contact type="STRUCTURE" name="NOSE_CONE">
            <location unit="IN">
                <x>0</x>
                <y>0</y>
                <z>-15</z>
            </location>
            <static_friction>1.2</static_friction>
            <dynamic_friction>1.212</dynamic_friction>
            <rolling_friction>1.413</rolling_friction>
            <spring_coeff unit="LBS/FT">25200</spring_coeff>
            <damping_coeff unit="LBS/FT/SEC">5600</damping_coeff>
        </contact>
    </ground_reactions>

    <propulsion>
        <engine file="F100-PW-229">
            <location unit="IN">
                <x>682</x>
                <y>-12</y>
                <z>0</z>
            </location>
            <orient unit="DEG">
                <roll>0</roll>
                <pitch>0</pitch>
                <yaw>0</yaw>
            </orient>
            <feed>1</feed>
            <feed>2</feed>
            <feed>4</feed>
            <feed>6</feed>
            <feed>7</feed>
            <feed>9</feed>
            <thruster file="direct">
                <location unit="IN">
                    <x>682</x>
                    <y>-12</y>
                    <z>0</z>
                </location>
                <orient unit="DEG">
                    <roll>0</roll>
                    <pitch>0</pitch>
                    <yaw>0</yaw>
                </orient>
            </thruster>
        </engine>
        <engine file="F100-PW-229">
            <location unit="IN">
                <x>682</x>
                <y>12</y>
                <z>0</z>
            </location>
            <orient unit="DEG">
                <roll>0</roll>
                <pitch>0</pitch>
                <yaw>0</yaw>
            </orient>
            <feed>0</feed>
            <feed>2</feed>
            <feed>3</feed>
            <feed>5</feed>
            <feed>7</feed>
            <feed>8</feed>
            <thruster file="direct">
                <location unit="IN">
                    <x>682</x>
                    <y>12</y>
                    <z>0</z>
                </location>
                <orient unit="DEG">
                    <roll>0</roll>
                    <pitch>0</pitch>
                    <yaw>0</yaw>
                </orient>
            </thruster>
        </engine>
        <tank type="FUEL">
            <!--0: Left Engine Feed-->
            <location unit="IN">
                <x>453.87</x>
                <y>7.83</y>
                <z>0.79</z>
            </location>
            <capacity unit="LBS">1200</capacity>
            <contents unit="LBS">1200</contents>
            <priority>10</priority>
        </tank>
        <!-- ref: http://www.f-15e.info/joomla/technology/fuel-system/95-fuel-dumping-system -->
        <dump-rate unit="LBS/MIN">910</dump-rate>
        <tank type="FUEL">
            <!--1: Right Engine Feed-->
            <location unit="IN">
                <x>396.79</x>
                <y>7.95</y>
                <z>-5.51</z>
            </location>
            <capacity unit="LBS">1500</capacity>
            <contents unit="LBS">1500</contents>
            <priority>9</priority>
        </tank>
        <tank type="FUEL">
            <!--2: Tank 1-->
            <location unit="IN">
                <x>307.42</x>
                <y>7.48</y>
                <z>14.57</z>
            </location>
            <capacity unit="LBS">3300</capacity>
<standpipe unit="LBS">100</standpipe>
            <contents unit="LBS">3300</contents>
            <priority>8</priority>
        </tank>
        <tank type="FUEL">
            <!--3: Left Wing Tank-->
            <location unit="IN">
                <x>457.02</x>
                <y>-130.32</y>
                <z>15.35</z>
            </location>
            <capacity unit="LBS">2750</capacity>
            <contents unit="LBS">2750</contents>
<standpipe unit="LBS">100</standpipe>
            <priority>7</priority>
        </tank>
        <tank type="FUEL">
            <!--4: Right Wing Tank-->
            <location unit="IN">
                <x>457.02</x>
                <y>130.32</y>
                <z>15.35</z>
            </location>
            <capacity unit="LBS">2750</capacity>
            <contents unit="LBS">2750</contents>
<standpipe unit="LBS">100</standpipe>
            <priority>6</priority>
        </tank>
        <tank type="FUEL">
            <!--5: Left External Wing Tank-->
            <location unit="IN">
                <x>450</x>
                <y>0</y>
                <z>-7.83</z>
            </location>
            <capacity unit="LBS">3950</capacity>
            <contents unit="LBS">3950</contents>
<standpipe unit="LBS">100</standpipe>
            <priority>5</priority>
        </tank>
        <tank type="FUEL">
            <!--6: Right External Wing Tank-->
            <location unit="IN">
                <x>450</x>
                <y>0</y>
                <z>-7.83</z>
            </location>
            <capacity unit="LBS">3950</capacity>
            <contents unit="LBS">3950</contents>
<standpipe unit="LBS">100</standpipe>
            <priority>4</priority>
        </tank>
        <tank type="FUEL">
            <!--7: External Tank-->
            <location unit="IN">
                <x>386</x>
                <y>0</y>
                <z>-7.83</z>
            </location>
            <capacity unit="LBS">3950</capacity>
            <contents unit="LBS">3950</contents>
<standpipe unit="LBS">100</standpipe>
            <priority>3</priority>
        </tank>
        <tank type="FUEL">
            <!--8: Left Feed line-->
            <location unit="IN">
                <x>489</x>
                <y>-38</y>
                <z>-47</z>
            </location>
            <capacity unit="LBS">10</capacity>
            <contents unit="LBS">10</contents>
            <priority>2</priority>
        </tank>
        <tank type="FUEL">
            <!--9: Right Feed line-->
            <location unit="IN">
                <x>489</x>
                <y>38</y>
                <z>-47</z>
            </location>
            <capacity unit="LBS">10</capacity>
            <contents unit="LBS">10</contents>
            <priority>1</priority>
        </tank>
    </propulsion>

    <external_reactions>
        <force name="catapult" frame="BODY">
            <location unit="IN">
                <x>667</x>
                <y>0</y>
                <z>0</z>
            </location>
            <direction>
                <x>1</x>
                <y>0</y>
                <z>0</z>
            </direction>
        </force>
        <force name="holdback" frame="BODY">
            <location unit="IN">
                <x>667</x>
                <y>0</y>
                <z>0</z>
            </location>
            <direction>
                <x>-1</x>
                <y>0</y>
                <z>0</z>
            </direction>
        </force>
        <force name="hook" frame="BODY">
            <location unit="IN">
                <x>300</x>
                <y>0</y>
                <z>0</z>
            </location>
            <direction>
                <x>-0.9995</x>
                <y>0</y>
                <z>0.01</z>
            </direction>
        </force>
    </external_reactions>

    <flight_control name="FCS"></flight_control>
    <system file="f-15-hydraulic"/>
    <system file="f-15-electrics"/>
    <system file="f-15-cadc"/>
    <system file="f-15-apc"/>
    <system file="f-15-ecs"/>
    <system file="hook"/>
    <system file="catapult"/>
    <system file="holdback"/>
    <system file="flight-controls"/>
    <aerodynamics>
        <function name="aero/coefficients/EPA43">
            <description>CNDR MULTIPLIER CLDR, CYDR DUE TO SPEEDBRAKE</description>
            <product>
                <table>
                    <independentVar lookup="row">aero/alpha-deg</independentVar>
                    <independentVar lookup="column">fcs/speedbrake-pos-norm</independentVar>
                    <tableData>
                        0	          5	         10	         15	         20	         25	         30	         35	         40	         45
                        -20	 1.00000000	 1.00000000	 1.00000000	 1.00000000	 1.00000000	 1.00000000	 1.00000000	 1.00000000	 1.00000000	 1.00000000
                        -17	 1.00000000	 1.00000000	 1.00000000	 1.00000000	 1.00000000	 1.00000000	 1.00000000	 1.00000000	 1.00000000	 1.00000000
                        -14	 1.00000000	 1.00000000	 1.00000000	 1.00000000	 1.00000000	 1.00000000	 1.00000000	 1.00000000	 1.00000000	 1.00000000
                        -11	 1.00000000	 1.00000000	 1.00000000	 1.00000000	 1.00000000	 1.00000000	 1.00000000	 1.00000000	 1.00000000	 1.00000000
                        -8	 1.00000000	 1.00000000	 1.00000000	 1.00000000	 1.00000000	 1.00000000	 1.00000000	 1.00000000	 1.00000000	 1.00000000
                        -5	 1.00000000	 1.00000000	 1.00000000	 1.00000000	 1.00000000	 1.00000000	 1.00000000	 1.00000000	 1.00000000	 1.00000000
                        -2	 1.00000000	 1.00000000	 1.00000000	 1.00000000	 1.00000000	 1.00000000	 1.00000000	 1.00000000	 1.00000000	 1.00000000
                        1	 1.00000000	 1.00000000	 1.00000000	 1.00000000	 1.00000000	 1.00000000	 1.00000000	 1.00000000	 1.00000000	 1.00000000
                        4	 1.00000000	 1.00000000	 1.00000000	 1.00000000	 1.00000000	 1.00000000	 1.00000000	 1.00000000	 1.00000000	 1.00000000
                        7	 1.00000000	 1.00000000	 1.00000000	 1.00000000	 1.00000000	 1.00000000	 1.00000000	 1.00000000	 1.00000000	 1.00000000
                        10	 1.00000000	 1.00000000	 1.00000000	 1.00000000	 1.00000000	 1.00000000	 1.00000000	 1.00000000	 1.00000000	 1.00000000
                        13	 1.00000000	 1.00000000	 1.00000000	 1.00000000	 1.00000000	 1.00000000	 1.00000000	 1.00000000	 1.00000000	 1.00000000
                        16	 1.00000000	 1.08520266	 1.06255253	 1.04255882	 1.02522154	 1.01054067	 0.99851623	 0.98914821	 0.98243661	 0.97838143
                        19	 1.00000000	 0.99811443	 0.97047029	 0.94548257	 0.92315126	 0.90347638	 0.88645792	 0.87209588	 0.86039027	 0.85134107
                        22	 1.00000000	 0.91726234	 0.88462418	 0.85464243	 0.82731712	 0.80264822	 0.78063574	 0.76127968	 0.74458005	 0.73053684
                        25	 1.00000000	 0.85948549	 0.82185331	 0.78687755	 0.75455821	 0.72489530	 0.69788880	 0.67353873	 0.65184508	 0.63280785
                        28	 1.00000000	 0.84162300	 0.79899680	 0.75902703	 0.72171367	 0.68705674	 0.65505623	 0.62571214	 0.59902447	 0.57499322
                        31	 1.00000000	 0.88051400	 0.83289378	 0.78792999	 0.74562262	 0.70597167	 0.66897714	 0.63463903	 0.60295734	 0.57393208
                        34	 1.00000000	 0.99299759	 0.94038336	 0.89042555	 0.84312416	 0.79847920	 0.75649065	 0.71715852	 0.68048282	 0.64646354
                        45	 1.00000000	 1.00000000	 1.00000000	 1.00000000	 1.00000000	 1.00000000	 1.00000000	 1.00000000	 1.00000000	 1.00000000
                        60	 1.00000000	 1.00000000	 1.00000000	 1.00000000	 1.00000000	 1.00000000	 1.00000000	 1.00000000	 1.00000000	 1.00000000
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                    </tableData>
                </table>
            </product>
        </function>
        <function name="propulsion/engine[0]/EGT-R">
            <description>Engine 0 EGT Rankine</description>
            <sum>
                <property>atmosphere/T-R</property>
                <product>
                    <table>
                        <independentVar lookup="row">propulsion/engine[0]/n1</independentVar>
                        <tableData>
                            0		 0.00000000
                            20		 0.00000000
                            30		 541.70000000
                            49		 541.70000000
                            62		 631.70000000
                            78		 1171.70000000
                            95		 1405.70000000
                            99.9		 1684.70000000
                            104		 1684.70000000
                        </tableData>
                    </table>
                </product>
            </sum>
        </function>
        <function name="propulsion/engine[1]/EGT-R">
            <description>Engine 1 EGT Rankine</description>
            <sum>
                <property>atmosphere/T-R</property>
                <product>
                    <table>
                        <independentVar lookup="row">propulsion/engine[1]/n1</independentVar>
                        <tableData>
                            0		 0.00000000
                            20		 0.00000000
                            30		 541.70000000
                            49		 541.70000000
                            62		 631.70000000
                            78		 1171.70000000
                            95		 1405.70000000
                            99.9		 1684.70000000
                            104		 1684.70000000
                        </tableData>
                    </table>
                </product>
            </sum>
        </function>
        <function name="aero/coefficients/CdDBRK">
            <description>Drag due to speedbrakes</description>
            <product>
                <property>fcs/speedbrake-pos-norm</property>
                <table>
                    <independentVar lookup="row">aero/alpha-deg</independentVar>
                    <tableData>
                        -25		 0.02100000
                        -20		 0.03100000
                        -15		 0.04140000
                        -5		 0.06500000
                        0		 0.07840000
                        5		 0.06500000
                        15		 0.05140000
                        35		 0.02100000
                        40		 0.01880000
                    </tableData>
                </table>
            </product>
        </function>
        <function name="aero/coefficients/CdDFM">
            <description>Delta Cd due to mean flap position</description>
            <product>
                <table>
                    <independentVar lookup="row">aero/alpha-deg</independentVar>
                    <independentVar lookup="column">fcs/flap-pos-deg</independentVar>
                    <tableData>
                        0	         10	         35
                        -20	 0.00000000	 0.01400000	 0.09016000
                        -5	 0.00000000	 0.02268000	 0.06894000
                        0	 0.00000000	 0.01932000	 0.06222000
                        5	 0.00000000	 0.02268000	 0.06894000
                        10	 0.00000000	 0.02548000	 0.09862000
                        25	 0.00000000	 0.02856000	 0.14286000
                        50	 0.00000000	 0.09590000	 0.55734000
                    </tableData>
                </table>
            </product>
        </function>
        <function name="aero/coefficients/CdMach">
            <description>Drag mach factor (NASA CR-152391-VOL-1 Figure 3-2 p54)</description>
            <product>
                <table>
                    <independentVar lookup="row">velocities/mach</independentVar>
                    <tableData>
                        0.202		 1.25794500
                        0.306		 1.14121500
                        0.4		 1.06271780
                        0.503		 1.02191240
                        0.608		 1.00000000
                        0.705		 0.99095090
                        0.802		 1.00087010
                        0.901		 1.01070930
                        0.923		 1.04170840
                        0.934		 1.07933440
                        0.945		 1.12959800
                        1.009		 1.88004830
                        1.029		 2.02490370
                        1.048		 2.14446970
                        1.092		 2.23175260
                        1.17		 2.26116200
                        1.603		 2.18576420
                        1.797		 2.13606970
                        1.948		 2.08126270
                        1.999		 2.06086000
                        2.091		 2.03300270
                    </tableData>
                </table>
            </product>
        </function>
        <function name="aero/coefficients/CdTNK">
            <description>Incremental Cd due to external tanks</description>
            <product>
                <property>fcs/external-tanks-fitted</property>
                <table>
                    <independentVar lookup="row">velocities/mach</independentVar>
                    <tableData>
                        0.4		 0.00050000
                        0.6		 0.00050000
                        0.7		 0.00050000
                        0.8		 0.00050000
                        0.85		 0.00110000
                        0.9		 0.00650000
                        0.94		 0.00740000
                        0.98		 0.00770000
                        1		 0.00780000
                        1.1		 0.00790000
                        1.2		 0.00800000
                        2		 0.00810000
                    </tableData>
                </table>
            </product>
        </function>
        <function name="aero/coefficients/CdUC">
            <description>Cd increment due to gear</description>
            <product>
                <property>gear/gear-pos-norm</property>
                <table>
                    <independentVar lookup="row">aero/alpha-deg</independentVar>
                    <tableData>
                        -10		 0.00000000
                        -5		 0.00017000
                        0		 0.00001000
                        5		 0.00005000
                        10		 0.00000000
                    </tableData>
                </table>
            </product>
        </function>
        <function name="aero/coefficients/CFXB">
            <description>BASIC DRAG</description>
            <product>
                <table>
                    <independentVar lookup="row">aero/alpha-deg</independentVar>
                    <independentVar lookup="column">fcs/elevator-pos-deg</independentVar>
                    <tableData>
                        -30	        -25	        -20	        -15	        -10	         -5	          0	          5	         10	         15	         20	         25	         30
                        -20	 0.74553106	 0.69300407	 0.64069530	 0.58898578	 0.53824093	 0.48880644	 0.44100423	 0.39512876	 0.35144360	 0.31017830	 0.27152574	 0.23563999	 0.20263468
                        -17	 0.60119036	 0.55689599	 0.51292539	 0.46960908	 0.42726183	 0.38617886	 0.34663237	 0.30886815	 0.27310268	 0.23952049	 0.20827199	 0.17947186	 0.15319795
                        -14	 0.43396391	 0.39981644	 0.36609196	 0.33305550	 0.30095646	 0.27002544	 0.24047129	 0.21247843	 0.18620458	 0.16177878	 0.13930001	 0.11883628	 0.10042431
                        -11	 0.27969422	 0.25576132	 0.23230407	 0.20951701	 0.18757984	 0.16665490	 0.14688507	 0.12839180	 0.11127369	 0.09560539	 0.08143709	 0.06879457	 0.05767984
                        -8	 0.16003415	 0.14498399	 0.13039693	 0.11640143	 0.10311278	 0.09063154	 0.07904214	 0.06841197	 0.05879082	 0.05021086	 0.04268708	 0.03621846	 0.03078980
                        -5	 0.08125944	 0.07298546	 0.06510528	 0.05769368	 0.05081523	 0.04452355	 0.03886101	 0.03385867	 0.02953690	 0.02590636	 0.02296967	 0.02072373	 0.01916275
                        -2	 0.03819579	 0.03446390	 0.03103365	 0.02794479	 0.02523114	 0.02292090	 0.02103724	 0.01959945	 0.01862457	 0.01812962	 0.01813441	 0.01866521	 0.01975905
                        1	 0.02053667	 0.01953463	 0.01877147	 0.01827466	 0.01807151	 0.01819042	 0.01866260	 0.01952429	 0.02081955	 0.02260371	 0.02494746	 0.02794177	 0.03170365
                        4	 0.01894264	 0.01965451	 0.02063218	 0.02191559	 0.02355165	 0.02559653	 0.02811844	 0.03120101	 0.03494721	 0.03948403	 0.04496789	 0.05159086	 0.05958776
                        7	 0.02908810	 0.03145996	 0.03427125	 0.03759896	 0.04153549	 0.04619194	 0.05170196	 0.05822618	 0.06595740	 0.07512639	 0.08600864	 0.09893182	 0.11428436
                        10	 0.05285788	 0.05775923	 0.06346358	 0.07010767	 0.07785309	 0.08689059	 0.09744496	 0.10978056	 0.12420758	 0.14108912	 0.16084907	 0.18398096	 0.21105777
                        13	 0.09687182	 0.10588629	 0.11627900	 0.12826555	 0.14209660	 0.15806315	 0.17650237	 0.19780419	 0.22241863	 0.25086402	 0.28373606	 0.32171787	 0.36559112
                        16	 0.16921948	 0.18431838	 0.20157798	 0.22130712	 0.24386033	 0.26964396	 0.29912297	 0.33282846	 0.37136605	 0.41542512	 0.46578899	 0.52334617	 0.58910258
                        19	 0.27562501	 0.29878626	 0.32506654	 0.35487674	 0.38868409	 0.42701906	 0.47048302	 0.51975669	 0.57560938	 0.63890927	 0.71063457	 0.79188584	 0.88389930
                        22	 0.43532518	 0.46398287	 0.49688659	 0.53449846	 0.57734027	 0.62600029	 0.68114085	 0.74350657	 0.81393348	 0.89335891	 0.98283238	 1.08352744	 1.19675449
                        25	 0.64846380	 0.66651987	 0.68956836	 0.71791796	 0.75191541	 0.79194959	 0.83845612	 0.89192226	 0.95289236	 1.02197381	 1.09984346	 1.18725466	 1.28504485
                        28	 0.82165592	 0.82071465	 0.82461679	 0.83343618	 0.84725547	 0.86616697	 0.89027369	 0.91969045	 0.95454504	 0.99497952	 1.04115165	 1.09323641	 1.15142768
                        31	 0.94347245	 0.93614291	 0.93347466	 0.93546770	 0.94212203	 0.95343764	 0.96941454	 0.99005273	 1.01535221	 1.04531298	 1.07993503	 1.11921837	 1.16316300
                        34	 1.05662679	 1.04929726	 1.04662901	 1.04862204	 1.05527637	 1.06659198	 1.08256889	 1.10320708	 1.12850655	 1.15846732	 1.19308937	 1.23237271	 1.27631734
                        45	 1.42934950	 1.42201996	 1.41935171	 1.42134475	 1.42799907	 1.43931469	 1.45529159	 1.47592978	 1.50122925	 1.53119002	 1.56581207	 1.60509541	 1.64904004
                        60	 1.76895684	 1.76162731	 1.75895906	 1.76095209	 1.76760642	 1.77892203	 1.79489894	 1.81553713	 1.84083660	 1.87079737	 1.90541942	 1.94470276	 1.98864739
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                    </tableData>
                </table>
            </product>
        </function>
        <function name="aero/coefficients/DCdRamp">
            <description>Cd increment due to ramps, NASA TP-3627, p14 Figure 10</description>
            <product>
                <property>propulsion/inlet/ramp1-position-norm</property>
                <table>
                    <independentVar lookup="row">aero/alpha-deg</independentVar>
                    <tableData>
                        -5		-0.00049713
                        1.25		 0.00100614
                        7.5		 0.00670196
                        13.75		 0.01263050
                        20		 0.01632770
                    </tableData>
                </table>
            </product>
        </function>
        <function name="aero/coefficients/CFZB">
            <description>BASIC LIFT</description>
            <product>
                <table>
                    <independentVar lookup="row">aero/alpha-deg</independentVar>
                    <independentVar lookup="column">fcs/elevator-pos-deg</independentVar>
                    <tableData>
                        -30	        -25	        -20	        -15	        -10	         -5	          0	          5	         10	         15	         20	         25	         30
                        -20	-1.18316951	-1.15605351	-1.12739696	-1.09719988	-1.06546225	-1.03218409	-0.99736539	-0.96100615	-0.92310637	-0.88366606	-0.84268520	-0.80016381	-0.75610188
                        -17	-1.10450973	-1.07739372	-1.04873718	-1.01854009	-0.98680247	-0.95352431	-0.91870561	-0.88234637	-0.84444659	-0.80500628	-0.76402542	-0.72150403	-0.67744210
                        -14	-0.99198714	-0.96487113	-0.93621458	-0.90601750	-0.87427988	-0.84100171	-0.80618301	-0.76982378	-0.73192400	-0.69248368	-0.65150283	-0.60898144	-0.56491950
                        -11	-0.85172121	-0.82460520	-0.79594865	-0.76575157	-0.73401394	-0.70073578	-0.66591708	-0.62955784	-0.59165806	-0.55221775	-0.51123689	-0.46871550	-0.42465357
                        -8	-0.68948059	-0.66236458	-0.63370803	-0.60351095	-0.57177333	-0.53849516	-0.50367646	-0.46731722	-0.42941745	-0.38997713	-0.34899628	-0.30647488	-0.26241295
                        -5	-0.51068313	-0.48356712	-0.45491058	-0.42471349	-0.39297587	-0.35969771	-0.32487901	-0.28851977	-0.25061999	-0.21117967	-0.17019882	-0.12767743	-0.08361550
                        -2	-0.32039586	-0.29327985	-0.26462331	-0.23442622	-0.20268860	-0.16941044	-0.13459174	-0.09823250	-0.06033272	-0.02089240	 0.02008845	 0.06260984	 0.10667177
                        1	-0.12333500	-0.09621899	-0.06756244	-0.03736536	-0.00562773	 0.02765043	 0.06246913	 0.09882837	 0.13672815	 0.17616846	 0.21714932	 0.25967071	 0.30373264
                        4	 0.07613406	 0.10325007	 0.13190662	 0.16210370	 0.19384133	 0.22711949	 0.26193819	 0.29829743	 0.33619721	 0.37563752	 0.41661838	 0.45913977	 0.50320170
                        7	 0.27399673	 0.30111274	 0.32976929	 0.35996637	 0.39170399	 0.42498216	 0.45980086	 0.49616009	 0.53405987	 0.57350019	 0.61448104	 0.65700243	 0.70106437
                        10	 0.46658923	 0.49370524	 0.52236179	 0.55255887	 0.58429649	 0.61757466	 0.65239336	 0.68875259	 0.72665237	 0.76609269	 0.80707354	 0.84959493	 0.89365686
                        13	 0.65059860	 0.67771461	 0.70637116	 0.73656824	 0.76830586	 0.80158403	 0.83640273	 0.87276197	 0.91066174	 0.95010206	 0.99108291	 1.03360431	 1.07766624
                        16	 0.82306270	 0.85017871	 0.87883525	 0.90903234	 0.94076996	 0.97404812	 1.00886682	 1.04522606	 1.08312584	 1.12256616	 1.16354701	 1.20606840	 1.25013033
                        19	 0.98137019	 1.00848620	 1.03714275	 1.06733983	 1.09907745	 1.13235562	 1.16717432	 1.20353355	 1.24143333	 1.28087365	 1.32185450	 1.36437589	 1.40843783
                        22	 1.12326056	 1.15037656	 1.17903311	 1.20923020	 1.24096782	 1.27424598	 1.30906468	 1.34542392	 1.38332370	 1.42276401	 1.46374487	 1.50626626	 1.55032819
                        25	 1.24682409	 1.27394010	 1.30259665	 1.33279373	 1.36453135	 1.39780952	 1.43262822	 1.46898746	 1.50688723	 1.54632755	 1.58730840	 1.62982979	 1.67389173
                        28	 1.35050190	 1.37761791	 1.40627446	 1.43647154	 1.46820917	 1.50148733	 1.53630603	 1.57266527	 1.61056505	 1.65000536	 1.69098622	 1.73350761	 1.77756954
                        31	 1.43308592	 1.46020193	 1.48885847	 1.51905556	 1.55079318	 1.58407134	 1.61889004	 1.65524928	 1.69314906	 1.73258937	 1.77357023	 1.81609162	 1.86015355
                        34	 1.49371887	 1.52083488	 1.54949142	 1.57968851	 1.61142613	 1.64470429	 1.67952299	 1.71588223	 1.75378201	 1.79322233	 1.83420318	 1.87672457	 1.92078650
                        45	 1.52383122	 1.55094722	 1.57960377	 1.60980086	 1.64153848	 1.67481664	 1.70963534	 1.74599458	 1.78389436	 1.82333467	 1.86431553	 1.90683692	 1.95089885
                        60	 1.12441409	 1.15153009	 1.18018664	 1.21038373	 1.24212135	 1.27539951	 1.31021821	 1.34657745	 1.38447723	 1.42391754	 1.46489840	 1.50741979	 1.55148172
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                    </tableData>
                </table>
            </product>
        </function>
        <function name="aero/coefficients/ClDFM">
            <description>Delta Cl due to mean  flap position</description>
            <product>
                <table>
                    <independentVar lookup="row">aero/alpha-deg</independentVar>
                    <independentVar lookup="column">fcs/flap-pos-deg</independentVar>
                    <tableData>
                        0	         10	         35	         50
                        -20	 0.00000000	-0.01400000	-0.09016000	-0.24500000
                        -5	 0.00000000	-0.13160000	-0.25872000	-0.60200000
                        0	 0.00000000	 0.13440000	 0.25480000	 0.59500000
                        5	 0.00000000	 0.13160000	 0.25872000	 0.60200000
                        10	 0.00000000	 0.12880000	 0.29872000	 0.58800000
                        25	 0.00000000	 0.10920000	 0.21560000	 0.46200000
                        50	 0.00000000	 0.01400000	 0.22540000	 0.24500000
                    </tableData>
                </table>
            </product>
        </function>
        <function name="aero/coefficients/ClMach">
            <description>Lift Mach factor (NASA-TM-84643 Figure 3 Clalpha) and values for AOA derived from NASA-aaia-2000-0900 Figure 4</description>
            <product>
                <table>
                    <independentVar lookup="row">velocities/mach</independentVar>
                    <tableData>
                        0.202		 1.25794500
                        0.306		 1.14121500
                        0.4		 1.06271780
                        0.503		 1.02191240
                        0.608		 1.00000000
                        0.705		 0.99095090
                        0.802		 1.00087010
                        0.901		 1.01070930
                        0.923		 1.04170840
                        0.934		 1.07933440
                        0.945		 1.12959800
                        1.009		 1.88004830
                        1.029		 2.02490370
                        1.048		 2.14446970
                        1.092		 2.23175260
                        1.17		 2.26116200
                        1.603		 2.18576420
                        1.797		 2.13606970
                        1.948		 2.08126270
                        1.999		 2.06086000
                        2.091		 2.03300270
                    </tableData>
                </table>
            </product>
        </function>
        <function name="aero/coefficients/ClUC">
            <description>Cl increment due to gear</description>
            <product>
                <property>gear/gear-pos-norm</property>
                <table>
                    <independentVar lookup="row">aero/alpha-deg</independentVar>
                    <tableData>
                        -10		 0.00000000
                        0		-0.00120000
                        8		-0.00100000
                        12		-0.00040000
                        14		-0.00020000
                        16		-0.00010000
                        18		 0.00000000
                    </tableData>
                </table>
            </product>
        </function>
        <function name="aero/coefficients/DClRamp">
            <description>Cl increment due to ramps, NASA TP-3627, p14 Figure 10</description>
            <product>
                <property>propulsion/inlet/ramp1-position-norm</property>
                <table>
                    <independentVar lookup="row">aero/alpha-deg</independentVar>
                    <tableData>
                        -5		 0.00005593
                        1.25		-0.00001055
                        7.5		 0.00009866
                        13.75		 0.00062220
                        20		 0.00125403
                    </tableData>
                </table>
            </product>
        </function>
        <function name="aero/coefficients/CMDFM">
            <description>CM increment due to flap mean position</description>
            <product>
                <table>
                    <independentVar lookup="row">aero/alpha-deg</independentVar>
                    <independentVar lookup="column">fcs/flap-pos-deg</independentVar>
                    <tableData>
                        0	          5	         15	         35
                        0	 0.00000000	 0.01320000	 0.01520000	 0.01696000
                        5	 0.00000000	 0.00396000	 0.00456000	 0.01523000
                        10	 0.00000000	 0.00589000	 0.00649000	 0.01355000
                        15	 0.00000000	 0.00762000	 0.01045000	 0.01092000
                        20	 0.00000000	 0.00798000	 0.00798000	 0.01148000
                        60	 0.00000000	 0.00342000	 0.00342000	 0.01148000
                    </tableData>
                </table>
            </product>
        </function>
        <function name="aero/coefficients/CMM1">
            <description>BASIC PITCHING MOMENT - CM</description>
            <product>
                <table>
                    <independentVar lookup="row">aero/alpha-deg</independentVar>
                    <independentVar lookup="column">fcs/elevator-pos-deg</independentVar>
                    <tableData>
                        -30	        -25	        -20	        -15	        -10	         -5	          0	          5	         10	         15	         20	         25	         30
                        -20	 0.45952289	 0.37945456	 0.31014266	 0.24943593	 0.19518306	 0.14523277	 0.09743376	 0.04963476	-0.00031553	-0.05456840	-0.11527513	-0.18458703	-0.26465536
                        -17	 0.38937924	 0.31040985	 0.24219691	 0.18258912	 0.12943520	 0.08058386	 0.03388381	-0.01281625	-0.06166759	-0.11482151	-0.17442930	-0.24264224	-0.32161163
                        -14	 0.35515436	 0.27728392	 0.21016993	 0.15166109	 0.09960612	 0.05185372	 0.00625262	-0.03934849	-0.08710088	-0.13915585	-0.19766469	-0.26477869	-0.34264913
                        -11	 0.34125892	 0.26448743	 0.19847238	 0.14106249	 0.09010647	 0.04345302	-0.00104913	-0.04555129	-0.09220473	-0.14316076	-0.20057065	-0.26658570	-0.34335719
                        -8	 0.33670631	 0.26103376	 0.19611767	 0.13980672	 0.08994965	 0.04439515	 0.00099194	-0.04241126	-0.08796576	-0.13782283	-0.19413378	-0.25904987	-0.33472242
                        -5	 0.33416405	 0.25959045	 0.19577330	 0.14056131	 0.09180318	 0.04734764	 0.00504338	-0.03726088	-0.08171643	-0.13047456	-0.18568655	-0.24950370	-0.32407729
                        -2	 0.32912996	 0.25565532	 0.19293712	 0.13882407	 0.09116489	 0.04780829	 0.00660298	-0.03460233	-0.07795893	-0.12561810	-0.17973115	-0.24244935	-0.31592400
                        1	 0.31922512	 0.24684942	 0.18523016	 0.13221607	 0.08565584	 0.04339819	 0.00329183	-0.03681454	-0.07907219	-0.12563242	-0.17864651	-0.24026576	-0.31264146
                        4	 0.30359561	 0.23231886	 0.17179856	 0.11988341	 0.07442213	 0.03326342	-0.00574399	-0.04475140	-0.08591010	-0.13137139	-0.18328653	-0.24380684	-0.31508359
                        7	 0.28241528	 0.21223748	 0.15281613	 0.10199993	 0.05763759	 0.01757784	-0.02033062	-0.05823909	-0.09829884	-0.14266118	-0.19347737	-0.25289873	-0.32307653
                        10	 0.25648135	 0.18740250	 0.12908009	 0.07936284	 0.03609945	-0.00286135	-0.03967087	-0.07648038	-0.11544119	-0.15870457	-0.20842182	-0.26674423	-0.33582308
                        13	 0.22689504	 0.15891513	 0.10169167	 0.05307337	 0.01090894	-0.02695292	-0.06266349	-0.09837406	-0.13623591	-0.17840035	-0.22701865	-0.28424211	-0.35222201
                        16	 0.19481928	 0.12793833	 0.07181382	 0.02429446	-0.01677102	-0.05353393	-0.08814555	-0.12275717	-0.15952008	-0.20058556	-0.24810492	-0.30422943	-0.37111038
                        19	 0.16130552	 0.09552351	 0.04049795	-0.00592245	-0.04588899	-0.08155295	-0.11506562	-0.14857829	-0.18424225	-0.22420879	-0.27062919	-0.32565476	-0.39143676
                        22	 0.12718163	 0.06249857	 0.00857196	-0.03674949	-0.07561708	-0.11018209	-0.14259582	-0.17500954	-0.20957455	-0.24844214	-0.29376360	-0.34769021	-0.41237327
                        25	 0.09299310	 0.02940899	-0.02341868	-0.06764118	-0.10540982	-0.13887589	-0.17019066	-0.20150543	-0.23497150	-0.27274014	-0.31696265	-0.36979031	-0.43337442
                        28	 0.05898940	-0.00349576	-0.05522448	-0.09834804	-0.13501773	-0.16738484	-0.19760067	-0.22781649	-0.26018361	-0.29685330	-0.33997686	-0.39170558	-0.45419074
                        31	 0.02514773	-0.03623848	-0.08686825	-0.12889286	-0.16446360	-0.19573177	-0.22484865	-0.25396552	-0.28523369	-0.32080443	-0.36282904	-0.41345881	-0.47484502
                        34	-0.00877391	-0.06906118	-0.11859200	-0.15951766	-0.19398945	-0.22415867	-0.25217660	-0.28019453	-0.31036374	-0.34483554	-0.38576120	-0.43529202	-0.49557928
                        45	-0.14036435	-0.19662214	-0.24212348	-0.27901966	-0.30946198	-0.33560172	-0.35959017	-0.38357862	-0.40971836	-0.44016067	-0.47705686	-0.52255820	-0.57881598
                        60	-0.34713052	-0.39789356	-0.43790016	-0.46930160	-0.49424917	-0.51489417	-0.53338787	-0.55188158	-0.57252658	-0.59747415	-0.62887559	-0.66888219	-0.71964523
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                    </tableData>
                </table>
            </product>
        </function>
        <function name="aero/coefficients/CMMach">
            <description>Pitch Mach factor (NASA-TM-84643 Figure 3 Clalpha) and values for AOA derived from NASA-aaia-2000-0900 Figure 4</description>
            <product>
                <table>
                    <independentVar lookup="row">velocities/mach</independentVar>
                    <tableData>
                        0.202		 1.25794500
                        0.306		 1.14121500
                        0.4		 1.06271780
                        0.503		 1.02191240
                        0.608		 1.00000000
                        0.705		 0.99095090
                        0.802		 1.00087010
                        0.901		 1.01070930
                        0.923		 1.04170840
                        0.934		 1.07933440
                        0.945		 1.12959800
                        1.009		 1.88004830
                        1.029		 2.02490370
                        1.048		 2.14446970
                        1.092		 2.23175260
                        1.17		 2.26116200
                        1.603		 2.18576420
                        1.797		 2.13606970
                        1.948		 2.08126270
                        1.999		 2.06086000
                        2.091		 2.03300270
                    </tableData>
                </table>
            </product>
        </function>
        <function name="aero/coefficients/CMMQ">
            <description>PITCH DAMPING DERIVATIVE - CMQ</description>
            <product>
                <property>aero/qb</property>
                <table>
                    <independentVar lookup="row">aero/alpha-deg</independentVar>
                    <tableData>
                        -19		 1.28046091
                        -18		 0.06779284
                        -15		-10.63663459
                        -12		-11.98901285
                        -9		-5.14643535
                        -6		-1.73694028
                        -3		-3.03302745
                        0		-4.33509000
                        3		-4.19691715
                        6		-3.92979167
                        9		-4.14194274
                        12		-5.95197929
                        15		-9.31395430
                        18		-8.60337414
                        21		-5.54389229
                        24		-3.26850300
                        27		-3.79236893
                        30		-7.13315000
                        33		-11.61197623
                        40		-14.45180000
                        55		-3.61089256
                        60		-4.89707200
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                    </tableData>
                </table>
            </product>
        </function>
        <function name="aero/coefficients/CMUC">
            <description>CM increment due to gear</description>
            <product>
                <property>gear/gear-pos-norm</property>
                <table>
                    <independentVar lookup="row">aero/alpha-deg</independentVar>
                    <tableData>
                        -10		 0.00000000
                        -4		 0.00000000
                        0		-0.01750000
                        5		-0.01000000
                        10		-0.00250000
                        20		 0.00000000
                    </tableData>
                </table>
            </product>
        </function>
        <function name="aero/coefficients/DCMAIM">
            <description>Pitch moment increment due to aim missiles</description>
            <product>
                <property>fcs/aim-fitted</property>
                <table>
                    <independentVar lookup="row">aero/alpha-deg</independentVar>
                    <independentVar lookup="column">velocities/mach</independentVar>
                    <tableData>
                        0.8	       0.85	        0.9
                        -6	-0.01500000	-0.03300000	-0.03200000
                        -5	-0.01500000	-0.03100000	-0.03100000
                        -4	-0.01500000	-0.03000000	-0.03000000
                        -3	-0.01000000	-0.02200000	-0.02800000
                        -2	-0.00500000	-0.01000000	-0.02000000
                        -1	-0.00300000	-0.00400000	-0.00600000
                        0	-0.00200000	-0.00300000	-0.00200000
                        1	-0.00100000	-0.00200000	 0.00000000
                        2	 0.00000000	 0.00000000	 0.00200000
                        3	 0.00200000	 0.00300000	 0.00400000
                        4	 0.00300000	 0.00600000	 0.00700000
                        5	 0.00500000	 0.00700000	 0.00700000
                        6	 0.01000000	 0.00800000	 0.00600000
                        7	 0.01000000	 0.01000000	 0.01600000
                        8	 0.00500000	 0.01000000	 0.01200000
                        9	 0.00300000	 0.00600000	 0.01200000
                        10	 0.00000000	 0.00400000	 0.01200000
                        20	 0.00000000	 0.00400000	 0.01200000
                    </tableData>
                </table>
            </product>
        </function>
        <function name="aero/coefficients/DCMRamp">
            <description>CM increment due to ramps, NASA TP-3627, p14 Figure 10</description>
            <product>
                <property>propulsion/inlet/ramp1-position-norm</property>
                <table>
                    <independentVar lookup="row">aero/alpha-deg</independentVar>
                    <tableData>
                        -5		-0.00197787
                        1.25		 0.00134069
                        7.5		 0.00981163
                        13.75		 0.02150840
                        20		 0.03194620
                    </tableData>
                </table>
            </product>
        </function>
        <function name="aero/coefficients/CLMach">
            <description>Roll Mach factor (NASA-TM-84643 Figure 3 Clalpha) and values for AOA derived from NASA-aaia-2000-0900 Figure 4</description>
            <product>
                <table>
                    <independentVar lookup="row">velocities/mach</independentVar>
                    <tableData>
                        0.202		 1.25794500
                        0.306		 1.14121500
                        0.4		 1.06271780
                        0.503		 1.02191240
                        0.608		 1.00000000
                        0.705		 0.99095090
                        0.802		 1.00087010
                        0.901		 1.01070930
                        0.923		 1.04170840
                        0.934		 1.07933440
                        0.945		 1.12959800
                        1.009		 1.88004830
                        1.029		 2.02490370
                        1.048		 2.14446970
                        1.092		 2.23175260
                        1.17		 2.26116200
                        1.603		 2.18576420
                        1.797		 2.13606970
                        1.948		 2.08126270
                        1.999		 2.06086000
                        2.091		 2.03300270
                    </tableData>
                </table>
            </product>
        </function>
        <function name="aero/coefficients/CML1">
            <description>BASIC ROLLING MOMENT - CL(BETA)</description>
            <product>
                <table>
                    <independentVar lookup="row">aero/alpha-deg</independentVar>
                    <independentVar lookup="column">aero/beta-deg</independentVar>
                    <tableData>
                        -20	        -15	        -10	         -5	          0	          5	         10	         15	         20
                        -20	 0.00469432	-0.00012868	-0.00490692	-0.00962738	 0.00000000	 0.00962738	 0.00490692	 0.00012868	-0.00469432
                        -17	 0.00614262	 0.00104818	-0.00400149	-0.00899339	 0.00000000	 0.00899339	 0.00400149	-0.00104818	-0.00614262
                        -14	 0.00922801	 0.00386213	-0.00145898	-0.00672231	 0.00000000	 0.00672231	 0.00145898	-0.00386213	-0.00922801
                        -11	 0.01324756	 0.00761025	 0.00201771	-0.00351706	 0.00000000	 0.00351706	-0.00201771	-0.00761025	-0.01324756
                        -8	 0.01765672	 0.01174797	 0.00588399	 0.00007779	 0.00000000	-0.00007779	-0.00588399	-0.01174797	-0.01765672
                        -5	 0.02204859	 0.01586841	 0.00973299	 0.00365535	 0.00000000	-0.00365535	-0.00973299	-0.01586841	-0.02204859
                        -2	 0.02613460	 0.01968298	 0.01327612	 0.00692705	 0.00000000	-0.00692705	-0.01327612	-0.01968298	-0.02613460
                        1	 0.02972632	 0.02300327	 0.01632498	 0.00970447	 0.00000000	-0.00970447	-0.01632498	-0.02300327	-0.02972632
                        4	 0.03271872	 0.02572422	 0.01877450	 0.01188255	 0.00000000	-0.01188255	-0.01877450	-0.02572422	-0.03271872
                        7	 0.03507449	 0.02780857	 0.02058741	 0.01342402	 0.00000000	-0.01342402	-0.02058741	-0.02780857	-0.03507449
                        10	 0.03680983	 0.02927247	 0.02177987	 0.01434505	 0.00000000	-0.01434505	-0.02177987	-0.02927247	-0.03680983
                        13	 0.03798129	 0.03017249	 0.02240846	 0.01470220	 0.00000000	-0.01470220	-0.02240846	-0.03017249	-0.03798129
                        16	 0.03867403	 0.03059379	 0.02255833	 0.01458063	 0.00000000	-0.01458063	-0.02255833	-0.03059379	-0.03867403
                        19	 0.03899119	 0.03063952	 0.02233261	 0.01408349	 0.00000000	-0.01408349	-0.02233261	-0.03063952	-0.03899119
                        22	 0.03904457	 0.03042147	 0.02184313	 0.01332256	 0.00000000	-0.01332256	-0.02184313	-0.03042147	-0.03904457
                        25	 0.03894653	 0.03005199	 0.02120222	 0.01241022	 0.00000000	-0.01241022	-0.02120222	-0.03005199	-0.03894653
                        28	 0.03880307	 0.02963709	 0.02051588	 0.01145244	 0.00000000	-0.01145244	-0.02051588	-0.02963709	-0.03880307
                        31	 0.03870815	 0.02927074	 0.01987809	 0.01054322	 0.00000000	-0.01054322	-0.01987809	-0.02927074	-0.03870815
                        34	 0.03873925	 0.02903040	 0.01936632	 0.00976001	 0.00000000	-0.00976001	-0.01936632	-0.02903040	-0.03873925
                        45	 0.04062644	 0.02992233	 0.01926298	 0.00866140	 0.00000000	-0.00866140	-0.01926298	-0.02992233	-0.04062644
                        60	 0.04674521	 0.03468392	 0.02266739	 0.01070864	 0.00000000	-0.01070864	-0.02266739	-0.03468392	-0.04674521
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                    </tableData>
                </table>
            </product>
        </function>
        <function name="aero/coefficients/CMLDAD">
            <description>ROLLING MOMENT DUE TO AILERON DEFLECTION (CLDA)</description>
            <product>
                <property>fcs/aileron-pos-deg</property>
                <table>
                    <independentVar lookup="row">aero/alpha-deg</independentVar>
                    <tableData>
                        -20		 0.00553624
                        -19		 0.00549089
                        -16		 0.00544513
                        -13		 0.00548472
                        -10		 0.00556148
                        -7		 0.00564332
                        -4		 0.00571073
                        -1		 0.00575375
                        2		 0.00576941
                        5		 0.00575954
                        8		 0.00572894
                        11		 0.00568396
                        14		 0.00563135
                        17		 0.00557741
                        20		 0.00552736
                        23		 0.00548504
                        26		 0.00545271
                        29		 0.00543106
                        32		 0.00541934
                        35		 0.00541566
                        50		 0.00541560
                        60		 0.00534586
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                    </tableData>
                </table>
            </product>
        </function>
        <function name="aero/coefficients/CMLDCLB">
            <description>DELTA CLB DUE TO 2-PLACE CANOPY</description>
            <product>
                <property>aero/beta-deg</property>
                <property>metrics/two-place-canopy</property>
                <table>
                    <independentVar lookup="row">aero/alpha-deg</independentVar>
                    <tableData>
                        -20		-0.00006000
                        -19		-0.00006000
                        -16		-0.00006000
                        -13		-0.00006000
                        -10		-0.00006000
                        -7		-0.00006000
                        -4		-0.00006000
                        -1		-0.00006000
                        2		-0.00005556
                        5		-0.00003743
                        8		-0.00001556
                        11		-0.00000118
                        14		 0.00000000
                        17		 0.00000000
                        20		 0.00000000
                        23		 0.00000000
                        26		 0.00000000
                        29		 0.00000000
                        32		 0.00000000
                        35		 0.00000000
                        50		 0.00000000
                        60		 0.00000000
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                    </tableData>
                </table>
            </product>
        </function>
        <function name="aero/coefficients/CMLDRD">
            <description>ROLLING MOMENT DUE TO RUDDER DEFLECTION -(CLD)</description>
            <product>
                <property>fcs/rudder-pos-deg</property>
                <value>
                    0.85 <!-- DRFLX1 -->
                </value>
                <property>aero/coefficients/EPA43</property>
                <table>
                    <independentVar lookup="row">aero/alpha-deg</independentVar>
                    <independentVar lookup="column">fcs/rudder-pos-deg</independentVar>
                    <tableData>
                        -30	        -25	        -20	        -15	        -10	         -5	          0	          5	         10	         15	         20	         25	         30
                        -20	 0.00003464	 0.00004739	 0.00005451	 0.00005664	 0.00005443	 0.00004851	 0.00003953	 0.00002813	 0.00001496	 0.00000066	-0.00001412	-0.00002875	-0.00004258
                        -17	-0.00004247	-0.00002804	-0.00001924	-0.00001542	-0.00001596	-0.00002020	-0.00002750	-0.00003721	-0.00004870	-0.00006132	-0.00007443	-0.00008737	-0.00009952
                        -14	-0.00003675	-0.00002064	-0.00001016	-0.00000466	-0.00000352	-0.00000608	-0.00001170	-0.00001973	-0.00002954	-0.00004048	-0.00005190	-0.00006317	-0.00007363
                        -11	 0.00000044	 0.00001824	 0.00003040	 0.00003757	 0.00004040	 0.00003952	 0.00003558	 0.00002923	 0.00002110	 0.00001185	 0.00000210	-0.00000748	-0.00001627
                        -8	 0.00003883	 0.00005831	 0.00007215	 0.00008100	 0.00008551	 0.00008631	 0.00008406	 0.00007938	 0.00007294	 0.00006536	 0.00005730	 0.00004939	 0.00004229
                        -5	 0.00006345	 0.00008461	 0.00010013	 0.00011067	 0.00011686	 0.00011934	 0.00011877	 0.00011577	 0.00011101	 0.00010511	 0.00009873	 0.00009251	 0.00008708
                        -2	 0.00006989	 0.00009273	 0.00010994	 0.00012215	 0.00013002	 0.00013419	 0.00013529	 0.00013398	 0.00013090	 0.00012668	 0.00012198	 0.00011744	 0.00011369
                        1	 0.00006037	 0.00008489	 0.00010378	 0.00011767	 0.00012722	 0.00013307	 0.00013586	 0.00013623	 0.00013482	 0.00013229	 0.00012927	 0.00012641	 0.00012435
                        4	 0.00004067	 0.00006687	 0.00008744	 0.00010301	 0.00011424	 0.00012177	 0.00012624	 0.00012829	 0.00012857	 0.00012771	 0.00012637	 0.00012519	 0.00012481
                        7	 0.00001775	 0.00004563	 0.00006787	 0.00008513	 0.00009804	 0.00010725	 0.00011340	 0.00011713	 0.00011909	 0.00011992	 0.00012026	 0.00012076	 0.00012206
                        10	-0.00000193	 0.00002763	 0.00005156	 0.00007050	 0.00008509	 0.00009598	 0.00010381	 0.00010922	 0.00011286	 0.00011537	 0.00011739	 0.00011957	 0.00012255
                        13	-0.00001350	 0.00001774	 0.00004335	 0.00006397	 0.00008024	 0.00009281	 0.00010232	 0.00010942	 0.00011474	 0.00011893	 0.00012263	 0.00012649	 0.00013115
                        16	-0.00001434	 0.00001858	 0.00004587	 0.00006818	 0.00008613	 0.00010038	 0.00011157	 0.00012035	 0.00012735	 0.00013322	 0.00013860	 0.00014414	 0.00015049
                        19	-0.00000419	 0.00003042	 0.00005939	 0.00008337	 0.00010300	 0.00011894	 0.00013181	 0.00014226	 0.00015095	 0.00015850	 0.00016556	 0.00017279	 0.00018081
                        22	 0.00001501	 0.00005129	 0.00008194	 0.00010761	 0.00012892	 0.00014654	 0.00016109	 0.00017322	 0.00018359	 0.00019282	 0.00020157	 0.00021047	 0.00022017
                        25	 0.00003958	 0.00007755	 0.00010988	 0.00013722	 0.00016022	 0.00017951	 0.00019575	 0.00020956	 0.00022161	 0.00023252	 0.00024295	 0.00025353	 0.00026492
                        28	 0.00006484	 0.00010448	 0.00013850	 0.00016752	 0.00019220	 0.00021317	 0.00023109	 0.00024658	 0.00026031	 0.00027290	 0.00028501	 0.00029728	 0.00031034
                        31	 0.00008585	 0.00012718	 0.00016288	 0.00019358	 0.00021994	 0.00024260	 0.00026219	 0.00027937	 0.00029478	 0.00030905	 0.00032284	 0.00033679	 0.00035153
                        34	 0.00009839	 0.00014139	 0.00017877	 0.00021116	 0.00023919	 0.00026353	 0.00028481	 0.00030367	 0.00032075	 0.00033671	 0.00035218	 0.00036781	 0.00038423
                        45	 0.00005447	 0.00010364	 0.00014718	 0.00018573	 0.00021993	 0.00025043	 0.00027787	 0.00030289	 0.00032614	 0.00034826	 0.00036989	 0.00039168	 0.00041427
                        60	 0.00022739	 0.00028496	 0.00033691	 0.00038386	 0.00042647	 0.00046537	 0.00050122	 0.00053464	 0.00056630	 0.00059682	 0.00062686	 0.00065705	 0.00068805
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                    </tableData>
                </table>
            </product>
        </function>
        <function name="aero/coefficients/CMLDTD">
            <description>ROLLING MOMENT DUE TO DIFFERENTIAL TAIL DEFLECTION - CLDD</description>
            <product>
                <value>
                    0.975 <!-- DTFLX1 -->
                </value>
                <!-- it isn't exactly clear where this 0.3 comes from however we will do this in the controls-->
                <!--<value>0.3</value>-->
                <property>fcs/differential-elevator-pos-deg</property>
                <table>
                    <independentVar lookup="row">aero/alpha-deg</independentVar>
                    <independentVar lookup="column">fcs/elevator-pos-deg</independentVar>
                    <tableData>
                        -30	        -25	        -20	        -15	        -10	         -5	          0	          5	         10	         15	         20	         25	         30
                        -20	 0.00002169	 0.00036227	 0.00063181	 0.00079244	 0.00084328	 0.00080929	 0.00073001	 0.00064845	 0.00059987	 0.00060063	 0.00063696	 0.00065382	 0.00054371
                        -17	 0.00012012	 0.00044807	 0.00071376	 0.00087782	 0.00093788	 0.00091737	 0.00085435	 0.00079033	 0.00075905	 0.00077537	 0.00082402	 0.00084847	 0.00073969
                        -14	 0.00007560	 0.00038804	 0.00064692	 0.00081136	 0.00087749	 0.00086724	 0.00081715	 0.00076724	 0.00074976	 0.00077804	 0.00083531	 0.00086355	 0.00075221
                        -11	 0.00000261	 0.00029691	 0.00054624	 0.00070824	 0.00077753	 0.00077453	 0.00073428	 0.00069530	 0.00068832	 0.00072518	 0.00078762	 0.00081608	 0.00069855
                        -8	-0.00003973	 0.00023402	 0.00047131	 0.00062828	 0.00069804	 0.00069951	 0.00066624	 0.00063521	 0.00063569	 0.00067799	 0.00074236	 0.00076772	 0.00064057
                        -5	-0.00002945	 0.00022158	 0.00044456	 0.00059414	 0.00066192	 0.00066532	 0.00063638	 0.00061059	 0.00061570	 0.00066053	 0.00072381	 0.00074298	 0.00060302
                        -2	 0.00003246	 0.00025881	 0.00046545	 0.00060550	 0.00066908	 0.00067209	 0.00064507	 0.00062202	 0.00062917	 0.00067384	 0.00073327	 0.00074338	 0.00058764
                        1	 0.00013262	 0.00033257	 0.00052106	 0.00064969	 0.00070706	 0.00070760	 0.00068034	 0.00065775	 0.00066458	 0.00070664	 0.00075966	 0.00075807	 0.00058384
                        4	 0.00025297	 0.00042505	 0.00059380	 0.00070933	 0.00075875	 0.00075496	 0.00072550	 0.00070133	 0.00070571	 0.00074294	 0.00078724	 0.00077155	 0.00057632
                        7	 0.00037594	 0.00051888	 0.00066654	 0.00076754	 0.00080747	 0.00079773	 0.00076435	 0.00073680	 0.00073683	 0.00076723	 0.00080073	 0.00076875	 0.00055025
                        10	 0.00048757	 0.00060035	 0.00072581	 0.00081106	 0.00084019	 0.00082310	 0.00078432	 0.00075181	 0.00074581	 0.00076763	 0.00078847	 0.00073825	 0.00049444
                        13	 0.00057908	 0.00066091	 0.00076328	 0.00083180	 0.00084906	 0.00082346	 0.00077802	 0.00073920	 0.00072574	 0.00073743	 0.00074398	 0.00067382	 0.00040289
                        16	 0.00064718	 0.00069748	 0.00077610	 0.00082715	 0.00083170	 0.00079665	 0.00074352	 0.00069728	 0.00067514	 0.00067540	 0.00066628	 0.00057468	 0.00027505
                        19	 0.00069348	 0.00071192	 0.00076636	 0.00079940	 0.00079063	 0.00074543	 0.00068382	 0.00062926	 0.00059746	 0.00058523	 0.00055926	 0.00044496	 0.00011529
                        22	 0.00072332	 0.00070979	 0.00073986	 0.00075462	 0.00073214	 0.00067631	 0.00060565	 0.00054211	 0.00049991	 0.00047433	 0.00043058	 0.00029257	-0.00006827
                        25	 0.00074435	 0.00069898	 0.00070471	 0.00070111	 0.00066478	 0.00059808	 0.00051803	 0.00044509	 0.00039195	 0.00035242	 0.00029019	 0.00012766	-0.00026524
                        28	 0.00076491	 0.00068805	 0.00066969	 0.00064792	 0.00059780	 0.00052022	 0.00043068	 0.00034813	 0.00028378	 0.00022991	 0.00014872	-0.00003890	-0.00046451
                        31	 0.00079255	 0.00068479	 0.00064284	 0.00060329	 0.00053970	 0.00045145	 0.00035254	 0.00026042	 0.00018478	 0.00011643	 0.00001603	-0.00019701	-0.00065576
                        34	 0.00083285	 0.00069500	 0.00063018	 0.00057348	 0.00049696	 0.00039848	 0.00029056	 0.00018913	 0.00010238	 0.00001962	-0.00010000	-0.00033857	-0.00083066
                        45	 0.00109697	 0.00085947	 0.00072070	 0.00061023	 0.00049460	 0.00036617	 0.00023194	 0.00010233	-0.00001998	-0.00015121	-0.00033770	-0.00066707	-0.00127939
                        60	 0.00132301	 0.00099276	 0.00079428	 0.00064961	 0.00051779	 0.00038367	 0.00024671	 0.00010982	-0.00003183	-0.00020198	-0.00045450	-0.00088450	-0.00163960
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                    </tableData>
                </table>
            </product>
        </function>
        <function name="aero/coefficients/CMLP">
            <description>ROLL DAMPING DERIVATIVE - CLP</description>
            <product>
                <property>aero/pb</property>
                <table>
                    <independentVar lookup="row">aero/alpha-deg</independentVar>
                    <tableData>
                        -20		-0.08541388
                        -19		-0.09921293
                        -16		-0.09081273
                        -13		-0.11126077
                        -10		-0.16536625
                        -7		-0.21575971
                        -4		-0.24200337
                        -1		-0.24899556
                        2		-0.25078465
                        5		-0.25072588
                        8		-0.23373326
                        11		-0.18119641
                        14		-0.11395122
                        17		-0.16351086
                        20		-0.14308573
                        23		-0.10238305
                        26		-0.08250246
                        29		-0.07908747
                        32		-0.08829619
                        35		-0.10677188
                        50		-0.25091633
                        60		-0.32802377
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                    </tableData>
                </table>
            </product>
        </function>
        <function name="aero/coefficients/CMLR">
            <description>ROLLING MOMENT DUE TO YAW RATE - CLR</description>
            <product>
                <property>aero/rb</property>
                <table>
                    <independentVar lookup="row">aero/alpha-deg</independentVar>
                    <tableData>
                        -20		-0.05760685
                        -19		-0.08859624
                        -16		-0.09142189
                        -13		-0.05248582
                        -10		-0.02268499
                        -7		-0.00729335
                        -4		 0.00498482
                        -1		 0.02551353
                        2		 0.05839685
                        5		 0.09938294
                        8		 0.13849720
                        11		 0.16433919
                        14		 0.16841579
                        17		 0.14832098
                        20		 0.10901020
                        23		 0.06185529
                        26		 0.02160370
                        29		 0.00180348
                        32		 0.00969327
                        35		 0.04199466
                        50		 0.06994150
                        60		 0.02905128
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                    </tableData>
                </table>
            </product>
        </function>
        <function name="aero/coefficients/CFYB">
            <description>BASIC SIDE FORCE</description>
            <product>
                <table>
                    <independentVar lookup="row">aero/alpha-deg</independentVar>
                    <independentVar lookup="column">aero/beta-deg</independentVar>
                    <independentVar lookup="table">fcs/elevator-pos-deg</independentVar>
                    <tableData breakPoint="-30">
                        -20	       -16	       -12	        -8	        -7	        -6	        -5	        -4	        -3	        -2	        -1	         0	         1	         2	         3	         4	         5	         6	         7	         8	         9	        10	        14	        18
                        -20	 0.18323943	 0.13708330	 0.09092722	 0.04477118	 0.03323218	 0.02169318	 0.01015419	-0.00130726	-0.01023565	-0.01389486	-0.01065652	 0.00000000	 0.01065652	 0.01389486	 0.01023565	 0.00130726	-0.01015419	-0.02169318	-0.03323218	-0.04477118	-0.05631019	-0.06784919	-0.11400525	-0.16016136
                        -17	 0.19758420	 0.15118759	 0.10479103	 0.05839451	 0.04679539	 0.03519627	 0.02359715	 0.01132615	 0.00031595	-0.00636170	-0.00674859	 0.00000000	 0.00674859	 0.00636170	-0.00031595	-0.01132615	-0.02359715	-0.03519627	-0.04679539	-0.05839451	-0.06999363	-0.08159276	-0.12798930	-0.17438589
                        -14	 0.21867500	 0.17203790	 0.12540086	 0.07876386	 0.06710461	 0.05544537	 0.04378614	 0.03032780	 0.01621040	 0.00500320	-0.00084383	 0.00000000	 0.00084383	-0.00500320	-0.01621040	-0.03032780	-0.04378614	-0.05544537	-0.06710461	-0.07876386	-0.09042310	-0.10208235	-0.14871937	-0.19535644
                        -11	 0.24179168	 0.19491410	 0.14803658	 0.10115909	 0.08943973	 0.07772037	 0.06600101	 0.05124188	 0.03370935	 0.01751880	 0.00566059	 0.00000000	-0.00566059	-0.01751880	-0.03370935	-0.05124188	-0.06600101	-0.07772037	-0.08943973	-0.10115909	-0.11287846	-0.12459783	-0.17147533	-0.21835289
                        -8	 0.26351094	 0.21639288	 0.16927487	 0.12215691	 0.11037742	 0.09859794	 0.08681846	 0.07083680	 0.05010154	 0.02924067	 0.01175137	 0.00000000	-0.01175137	-0.02924067	-0.05010154	-0.07083680	-0.08681846	-0.09859794	-0.11037742	-0.12215691	-0.13393639	-0.14571588	-0.19283387	-0.23995190
                        -5	 0.28152529	 0.23416675	 0.18680825	 0.13944981	 0.12761020	 0.11577060	 0.10393100	 0.08693429	 0.06355944	 0.03885814	 0.01674550	 0.00000000	-0.01674550	-0.03885814	-0.06355944	-0.08693429	-0.10393100	-0.11577060	-0.12761020	-0.13944981	-0.15128941	-0.16312902	-0.21048749	-0.25784601
                        -2	 0.29447073	 0.24687171	 0.19927273	 0.15167380	 0.13977408	 0.12787435	 0.11597463	 0.09824672	 0.07300276	 0.04559648	 0.02023923	 0.00000000	-0.02023923	-0.04559648	-0.07300276	-0.09824672	-0.11597463	-0.12787435	-0.13977408	-0.15167380	-0.16357353	-0.17547326	-0.22307221	-0.27067121
                        1	 0.30176311	 0.25392360	 0.20608415	 0.15824473	 0.14628489	 0.13432505	 0.12236521	 0.10422267	 0.07796886	 0.04912388	 0.02205966	 0.00000000	-0.02205966	-0.04912388	-0.07796886	-0.10422267	-0.12236521	-0.13432505	-0.14628489	-0.15824473	-0.17020458	-0.18216443	-0.23000387	-0.27784335
                        4	 0.30344312	 0.25536313	 0.20728319	 0.15920330	 0.14718333	 0.13516337	 0.12314341	 0.10490053	 0.07848997	 0.04946345	 0.02221882	 0.00000000	-0.02221882	-0.04946345	-0.07848997	-0.10490053	-0.12314341	-0.13516337	-0.14718333	-0.15920330	-0.17122327	-0.18324324	-0.23132316	-0.27940312
                        7	 0.30002997	 0.25170950	 0.20338908	 0.15506870	 0.14298861	 0.13090853	 0.11882845	 0.10077046	 0.07497729	 0.04691011	 0.02087041	 0.00000000	-0.02087041	-0.04691011	-0.07497729	-0.10077046	-0.11882845	-0.13090853	-0.14298861	-0.15506870	-0.16714879	-0.17922888	-0.22754928	-0.27586973
                        10	 0.29238374	 0.24382279	 0.19526189	 0.14670103	 0.13456082	 0.12242061	 0.11028041	 0.09264436	 0.06811201	 0.04195238	 0.01826901	 0.00000000	-0.01826901	-0.04195238	-0.06811201	-0.09264436	-0.11028041	-0.12242061	-0.13456082	-0.14670103	-0.15884124	-0.17098145	-0.21954233	-0.26810326
                        13	 0.28157640	 0.23277496	 0.18397357	 0.13517223	 0.12297190	 0.11077158	 0.09857126	 0.08153416	 0.05874313	 0.03519913	 0.01473192	 0.00000000	-0.01473192	-0.03519913	-0.05874313	-0.08153416	-0.09857126	-0.11077158	-0.12297190	-0.13517223	-0.14737256	-0.15957290	-0.20837426	-0.25717567
                        16	 0.26877145	 0.21972953	 0.17068766	 0.12164583	 0.10938538	 0.09712494	 0.08486449	 0.06853823	 0.04779214	 0.02731125	 0.01060353	 0.00000000	-0.01060353	-0.02731125	-0.04779214	-0.06853823	-0.08486449	-0.09712494	-0.10938538	-0.12164583	-0.13390628	-0.14616674	-0.19520859	-0.24425048
                        19	 0.25511231	 0.20582991	 0.15654755	 0.10726525	 0.09494468	 0.08262411	 0.07030355	 0.05473594	 0.03616464	 0.01893818	 0.00622231	 0.00000000	-0.00622231	-0.01893818	-0.03616464	-0.05473594	-0.07030355	-0.08262411	-0.09494468	-0.10726525	-0.11958582	-0.13190640	-0.18118873	-0.23047110
                        22	 0.24161932	 0.19209644	 0.14257360	 0.09305082	 0.08067012	 0.06828944	 0.05590875	 0.04109050	 0.02466874	 0.01065950	 0.00189027	 0.00000000	-0.00189027	-0.01065950	-0.02466874	-0.04109050	-0.05590875	-0.06828944	-0.08067012	-0.09305082	-0.10543151	-0.11781220	-0.16733502	-0.21685788
                        25	 0.22909543	 0.17933207	 0.12956875	 0.07980548	 0.06736467	 0.05492386	 0.04248305	 0.02835988	 0.01394035	 0.00293125	-0.00215492	 0.00000000	 0.00215492	-0.00293125	-0.01394035	-0.02835988	-0.04248305	-0.05492386	-0.06736467	-0.07980548	-0.09224629	-0.10468711	-0.15445040	-0.20421374
                        28	 0.21804053	 0.16803668	 0.11803288	 0.06802912	 0.05552819	 0.04302726	 0.03052634	 0.01701599	 0.00437540	-0.00396261	-0.00576529	 0.00000000	 0.00576529	 0.00396261	-0.00437540	-0.01701599	-0.03052634	-0.04302726	-0.05552819	-0.06802912	-0.08053006	-0.09303099	-0.14303477	-0.19303860
                        31	 0.20857446	 0.15833013	 0.10808585	 0.05784161	 0.04528056	 0.03271951	 0.02015847	 0.00717197	-0.00393119	-0.00995400	-0.00890536	 0.00000000	 0.00890536	 0.00995400	 0.00393119	-0.00717197	-0.02015847	-0.03271951	-0.04528056	-0.05784161	-0.07040267	-0.08296373	-0.13320799	-0.18345229
                        34	 0.20036876	 0.14988395	 0.09939918	 0.04891446	 0.03629329	 0.02367212	 0.01105095	-0.00148228	-0.01123957	-0.01522952	-0.01167237	 0.00000000	 0.01167237	 0.01522952	 0.01123957	 0.00148228	-0.01105095	-0.02367212	-0.03629329	-0.04891446	-0.06153564	-0.07415682	-0.12464156	-0.17512635
                        45	 0.16137568	 0.11000910	 0.05864256	 0.00727607	-0.00556554	-0.01840716	-0.03124876	-0.04162131	-0.04509012	-0.03963139	-0.02445409	 0.00000000	 0.02445409	 0.03963139	 0.04509012	 0.04162131	 0.03124876	 0.01840716	 0.00556554	-0.00727607	-0.02011769	-0.03295931	-0.08432582	-0.13569238
                        60	-0.11509199	-0.16766099	-0.22022994	-0.27279884	-0.28594106	-0.29908327	-0.31222548	-0.30714710	-0.26809984	-0.19973839	-0.10797911	 0.00000000	 0.10797911	 0.19973839	 0.26809984	 0.30714710	 0.31222548	 0.29908327	 0.28594106	 0.27279884	 0.25965662	 0.24651439	 0.19394547	 0.14137650
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                    </tableData>
                    <tableData breakPoint="-25">
                        -20	       -16	       -12	        -8	        -7	        -6	        -5	        -4	        -3	        -2	        -1	         0	         1	         2	         3	         4	         5	         6	         7	         8	         9	        10	        14	        18
                        -20	 0.18180918	 0.13529094	 0.08877276	 0.04225462	 0.03062509	 0.01899556	 0.00736604	-0.00402472	-0.01258725	-0.01563278	-0.01158900	 0.00000000	 0.01158900	 0.01563278	 0.01258725	 0.00402472	-0.00736604	-0.01899556	-0.03062509	-0.04225462	-0.05388415	-0.06551368	-0.11203184	-0.15855005
                        -17	 0.19637584	 0.14961713	 0.10285846	 0.05609983	 0.04441019	 0.03272054	 0.02103090	 0.00881815	-0.00185992	-0.00797359	-0.00761538	 0.00000000	 0.00761538	 0.00797359	 0.00185992	-0.00881815	-0.02103090	-0.03272054	-0.04441019	-0.05609983	-0.06778949	-0.07947914	-0.12623779	-0.17299648
                        -14	 0.21768853	 0.17068933	 0.12369018	 0.07669107	 0.06494130	 0.05319154	 0.04144177	 0.02802926	 0.01421027	 0.00351734	-0.00164495	 0.00000000	 0.00164495	-0.00351734	-0.01421027	-0.02802926	-0.04144177	-0.05319154	-0.06494130	-0.07669107	-0.08844084	-0.10019062	-0.14718975	-0.19418892
                        -11	 0.24102710	 0.19378742	 0.14654779	 0.09930820	 0.08749831	 0.07568842	 0.06387854	 0.04915281	 0.03188495	 0.01615898	 0.00492515	 0.00000000	-0.00492515	-0.01615898	-0.03188495	-0.04915281	-0.06387854	-0.07568842	-0.08749831	-0.09930820	-0.11111809	-0.12292799	-0.17016760	-0.21740726
                        -8	 0.26296825	 0.21548809	 0.16800797	 0.12052790	 0.10865789	 0.09678789	 0.08491788	 0.06895720	 0.04845288	 0.02800688	 0.01108162	 0.00000000	-0.01108162	-0.02800688	-0.04845288	-0.06895720	-0.08491788	-0.09678789	-0.10865789	-0.12052790	-0.13239792	-0.14426793	-0.19174803	-0.23922817
                        -5	 0.28120449	 0.23348385	 0.18576325	 0.13804270	 0.12611256	 0.11418244	 0.10225231	 0.08526415	 0.06208652	 0.03775039	 0.01614142	 0.00000000	-0.01614142	-0.03775039	-0.06208652	-0.08526415	-0.10225231	-0.11418244	-0.12611256	-0.13804270	-0.14997283	-0.16190297	-0.20962354	-0.25734416
                        -2	 0.29437182	 0.24641070	 0.19844962	 0.15048858	 0.13849833	 0.12650808	 0.11451783	 0.09678605	 0.07170558	 0.04461476	 0.01970084	 0.00000000	-0.01970084	-0.04461476	-0.07170558	-0.09678605	-0.11451783	-0.12650808	-0.13849833	-0.15048858	-0.16247884	-0.17446909	-0.22243015	-0.27039126
                        1	 0.30188610	 0.25368449	 0.20548292	 0.15728140	 0.14523103	 0.13318066	 0.12113030	 0.10297146	 0.07684742	 0.04826819	 0.02158694	 0.00000000	-0.02158694	-0.04826819	-0.07684742	-0.10297146	-0.12113030	-0.13318066	-0.14523103	-0.15728140	-0.16933178	-0.18138216	-0.22958370	-0.27778529
                        4	 0.30378800	 0.25534590	 0.20690386	 0.15846186	 0.14635137	 0.13424088	 0.12213039	 0.10385879	 0.07754426	 0.04873380	 0.02181179	 0.00000000	-0.02181179	-0.04873380	-0.07754426	-0.10385879	-0.12213039	-0.13424088	-0.14635137	-0.15846186	-0.17057235	-0.18268285	-0.23112488	-0.27956695
                        7	 0.30059674	 0.25191416	 0.20323164	 0.15454915	 0.14237854	 0.13020793	 0.11803732	 0.09993818	 0.07420732	 0.04630649	 0.02052906	 0.00000000	-0.02052906	-0.04630649	-0.07420732	-0.09993818	-0.11803732	-0.13020793	-0.14237854	-0.15454915	-0.16671977	-0.17889039	-0.22757289	-0.27625545
                        10	 0.29317240	 0.24424935	 0.19532634	 0.14640337	 0.13417264	 0.12194191	 0.10971118	 0.09202155	 0.06751779	 0.04147480	 0.01799333	 0.00000000	-0.01799333	-0.04147480	-0.06751779	-0.09202155	-0.10971118	-0.12194191	-0.13417264	-0.14640337	-0.15863411	-0.17086485	-0.21978784	-0.26871087
                        13	 0.28258695	 0.23342341	 0.18425991	 0.13509647	 0.12280561	 0.11051476	 0.09822391	 0.08112081	 0.05832464	 0.03484759	 0.01452192	 0.00000000	-0.01452192	-0.03484759	-0.05832464	-0.08112081	-0.09822391	-0.11051476	-0.12280561	-0.13509647	-0.14738732	-0.15967819	-0.20884166	-0.25800517
                        16	 0.27000389	 0.22059986	 0.17119589	 0.12179196	 0.10944098	 0.09709001	 0.08473904	 0.06833434	 0.04754939	 0.02708573	 0.01045922	 0.00000000	-0.01045922	-0.02708573	-0.04754939	-0.06833434	-0.08473904	-0.09709001	-0.10944098	-0.12179196	-0.13414294	-0.14649392	-0.19589787	-0.24530187
                        19	 0.25656664	 0.20692214	 0.15727768	 0.10763326	 0.09522217	 0.08281108	 0.07039999	 0.05474152	 0.03609763	 0.01883870	 0.00614367	 0.00000000	-0.00614367	-0.01883870	-0.03609763	-0.05474152	-0.07039999	-0.08281108	-0.09522217	-0.10763326	-0.12004436	-0.13245546	-0.18209990	-0.23174438
                        22	 0.24329555	 0.19341056	 0.14352562	 0.09364072	 0.08116951	 0.06869829	 0.05622708	 0.04130555	 0.02477746	 0.01068605	 0.00187731	 0.00000000	-0.00187731	-0.01068605	-0.02477746	-0.04130555	-0.05622708	-0.06869829	-0.08116951	-0.09364072	-0.10611194	-0.11858316	-0.16846808	-0.21835305
                        25	 0.23099355	 0.18086808	 0.13074265	 0.08061728	 0.06808594	 0.05555460	 0.04302327	 0.02878440	 0.01422481	 0.00308384	-0.00210220	 0.00000000	 0.00210220	-0.00308384	-0.01422481	-0.02878440	-0.04302327	-0.05555460	-0.06808594	-0.08061728	-0.09314862	-0.10567996	-0.15580536	-0.20593081
                        28	 0.22016053	 0.16979458	 0.11942867	 0.06906281	 0.05647135	 0.04387990	 0.03128845	 0.01764997	 0.00483560	-0.00368399	-0.00564689	 0.00000000	 0.00564689	 0.00368399	-0.00483560	-0.01764997	-0.03128845	-0.04387990	-0.05647135	-0.06906281	-0.08165427	-0.09424574	-0.14461162	-0.19497755
                        31	 0.21091636	 0.16030993	 0.10970354	 0.05909719	 0.04644562	 0.03379404	 0.02114247	 0.00801541	-0.00329525	-0.00954935	-0.00872128	 0.00000000	 0.00872128	 0.00954935	 0.00329525	-0.00801541	-0.02114247	-0.03379404	-0.04644562	-0.05909719	-0.07174878	-0.08440036	-0.13500673	-0.18561314
                        34	 0.20293255	 0.15208563	 0.10123876	 0.05039194	 0.03768024	 0.02496854	 0.01225685	-0.00042937	-0.01042789	-0.01469883	-0.01142261	 0.00000000	 0.01142261	 0.01469883	 0.01042789	 0.00042937	-0.01225685	-0.02496854	-0.03768024	-0.05039194	-0.06310364	-0.07581534	-0.12666219	-0.17750908
                        45	 0.16475307	 0.11302438	 0.06129574	 0.00956714	-0.00336500	-0.01629714	-0.02922927	-0.03980037	-0.04363408	-0.03863857	-0.02396350	 0.00000000	 0.02396350	 0.03863857	 0.04363408	 0.03980037	 0.02922927	 0.01629714	 0.00336500	-0.00956714	-0.02249929	-0.03543144	-0.08716005	-0.13888872
                        60	-0.11060515	-0.16353625	-0.21646730	-0.26939831	-0.28263105	-0.29586380	-0.30909653	-0.30427883	-0.26576511	-0.19811541	-0.10716013	 0.00000000	 0.10716013	 0.19811541	 0.26576511	 0.30427883	 0.30909653	 0.29586380	 0.28263105	 0.26939831	 0.25616556	 0.24293281	 0.19000178	 0.13707071
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                    </tableData>
                    <tableData breakPoint="-20">
                        -20	       -16	       -12	        -8	        -7	        -6	        -5	        -4	        -3	        -2	        -1	         0	         1	         2	         3	         4	         5	         6	         7	         8	         9	        10	        14	        18
                        -20	 0.18037893	 0.13349859	 0.08661830	 0.03973805	 0.02801800	 0.01629794	 0.00457790	-0.00674219	-0.01493886	-0.01737071	-0.01252147	 0.00000000	 0.01252147	 0.01737071	 0.01493886	 0.00674219	-0.00457790	-0.01629794	-0.02801800	-0.03973805	-0.05145811	-0.06317817	-0.11005844	-0.15693875
                        -10	 0.24794069	 0.20025875	 0.15257685	 0.10489499	 0.09297454	 0.08105408	 0.06913363	 0.05400925	 0.03587185	 0.01895547	 0.00634975	 0.00000000	-0.00634975	-0.01895547	-0.03587185	-0.05400925	-0.06913363	-0.08105408	-0.09297454	-0.10489499	-0.11681545	-0.12873591	-0.17641779	-0.22409971
                        0	 0.30006718	 0.25158363	 0.20310012	 0.15461666	 0.14249580	 0.13037494	 0.11825409	 0.10018978	 0.07445782	 0.04651440	 0.02065213	 0.00000000	-0.02065213	-0.04651440	-0.07445782	-0.10018978	-0.11825409	-0.13037494	-0.14249580	-0.15461666	-0.16673752	-0.17885838	-0.22734187	-0.27582540
                        10	 0.29396106	 0.24467590	 0.19539078	 0.14610571	 0.13378445	 0.12146320	 0.10914194	 0.09139873	 0.06692356	 0.04099722	 0.01771766	 0.00000000	-0.01771766	-0.04099722	-0.06692356	-0.09139873	-0.10914194	-0.12146320	-0.13378445	-0.14610571	-0.15842698	-0.17074824	-0.22003334	-0.26931848
                        20	 0.25360779	 0.20352102	 0.15343430	 0.10334762	 0.09082596	 0.07830430	 0.06578264	 0.05027837	 0.03226555	 0.01602765	 0.00464603	 0.00000000	-0.00464603	-0.01602765	-0.03226555	-0.05027837	-0.06578264	-0.07830430	-0.09082596	-0.10334762	-0.11586928	-0.12839095	-0.17847765	-0.22856440
                        30	 0.21609951	 0.16521113	 0.11432279	 0.06343451	 0.05071244	 0.03799038	 0.02526832	 0.01184367	-0.00013922	-0.00732597	-0.00758349	 0.00000000	 0.00758349	 0.00732597	 0.00013922	-0.01184367	-0.02526832	-0.03799038	-0.05071244	-0.06343451	-0.07615657	-0.08887864	-0.13976695	-0.19065531
                        60	-0.10611831	-0.15941151	-0.21270467	-0.26599778	-0.27932105	-0.29264432	-0.30596759	-0.30141056	-0.26343037	-0.19649242	-0.10634114	 0.00000000	 0.10634114	 0.19649242	 0.26343037	 0.30141056	 0.30596759	 0.29264432	 0.27932105	 0.26599778	 0.25267451	 0.23935123	 0.18605810	 0.13276492
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                    </tableData>
                    <tableData breakPoint="-15">
                        -20	       -16	       -12	        -8	        -7	        -6	        -5	        -4	        -3	        -2	        -1	         0	         1	         2	         3	         4	         5	         6	         7	         8	         9	        10	        14	        18
                        -20	 0.17894867	 0.13170623	 0.08446383	 0.03722148	 0.02541090	 0.01360033	 0.00178975	-0.00945965	-0.01729046	-0.01910863	-0.01345395	 0.00000000	 0.01345395	 0.01910863	 0.01729046	 0.00945965	-0.00178975	-0.01360033	-0.02541090	-0.03722148	-0.04903207	-0.06084265	-0.10808503	-0.15532745
                        -10	 0.24725008	 0.19920603	 0.15116202	 0.10311806	 0.09110708	 0.07909610	 0.06708512	 0.05199000	 0.03410604	 0.01763766	 0.00563621	 0.00000000	-0.00563621	-0.01763766	-0.03410604	-0.05199000	-0.06708512	-0.07909610	-0.09110708	-0.10311806	-0.11512905	-0.12714004	-0.17518402	-0.22322805
                        0	 0.30011621	 0.25127055	 0.20242493	 0.15357937	 0.14136798	 0.12915660	 0.11694522	 0.09886875	 0.07327780	 0.04561671	 0.02015752	 0.00000000	-0.02015752	-0.04561671	-0.07327780	-0.09886875	-0.11694522	-0.12915660	-0.14136798	-0.15357937	-0.16579075	-0.17800214	-0.22684773	-0.27569337
                        10	 0.29474972	 0.24510246	 0.19545523	 0.14580806	 0.13339627	 0.12098449	 0.10857271	 0.09077592	 0.06632933	 0.04051963	 0.01744198	 0.00000000	-0.01744198	-0.04051963	-0.06632933	-0.09077592	-0.10857271	-0.12098449	-0.13339627	-0.14580806	-0.15821985	-0.17063164	-0.22027884	-0.26992608
                        20	 0.25513609	 0.20468721	 0.15423838	 0.10378960	 0.09117741	 0.07856523	 0.06595304	 0.05035377	 0.03225712	 0.01597018	 0.00458928	 0.00000000	-0.00458928	-0.01597018	-0.03225712	-0.05035377	-0.06595304	-0.07856523	-0.09117741	-0.10378960	-0.11640179	-0.12901399	-0.17946279	-0.22991165
                        30	 0.21836744	 0.16711695	 0.11586652	 0.06461612	 0.05180353	 0.03899094	 0.02617836	 0.01261729	 0.00043813	-0.00696333	-0.00742130	 0.00000000	 0.00742130	 0.00696333	-0.00043813	-0.01261729	-0.02617836	-0.03899094	-0.05180353	-0.06461612	-0.07742872	-0.09024131	-0.14149173	-0.19274219
                        60	-0.10163147	-0.15528677	-0.20894204	-0.26259726	-0.27601105	-0.28942485	-0.30283864	-0.29854229	-0.26109564	-0.19486944	-0.10552216	 0.00000000	 0.10552216	 0.19486944	 0.26109564	 0.29854229	 0.30283864	 0.28942485	 0.27601105	 0.26259726	 0.24918346	 0.23576965	 0.18211441	 0.12845913
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                    </tableData>
                    <tableData breakPoint="-10">
                        -20	       -16	       -12	        -8	        -7	        -6	        -5	        -4	        -3	        -2	        -1	         0	         1	         2	         3	         4	         5	         6	         7	         8	         9	        10	        14	        18
                        -20	 0.17751842	 0.12991388	 0.08230937	 0.03470492	 0.02280381	 0.01090271	-0.00099839	-0.01217712	-0.01964206	-0.02084655	-0.01438642	 0.00000000	 0.01438642	 0.02084655	 0.01964206	 0.01217712	 0.00099839	-0.01090271	-0.02280381	-0.03470492	-0.04660603	-0.05850714	-0.10611162	-0.15371614
                        -10	 0.24655946	 0.19815331	 0.14974720	 0.10134113	 0.08923962	 0.07713812	 0.06503662	 0.04997075	 0.03234023	 0.01631985	 0.00492267	 0.00000000	-0.00492267	-0.01631985	-0.03234023	-0.04997075	-0.06503662	-0.07713812	-0.08923962	-0.10134113	-0.11344264	-0.12554416	-0.17395025	-0.22235638
                        0	 0.30016523	 0.25095746	 0.20174974	 0.15254207	 0.14024016	 0.12793825	 0.11563635	 0.09754772	 0.07209778	 0.04471901	 0.01966291	 0.00000000	-0.01966291	-0.04471901	-0.07209778	-0.09754772	-0.11563635	-0.12793825	-0.14024016	-0.15254207	-0.16484399	-0.17714590	-0.22635360	-0.27556134
                        10	 0.29553838	 0.24552901	 0.19551968	 0.14551040	 0.13300809	 0.12050578	 0.10800347	 0.09015310	 0.06573510	 0.04004205	 0.01716630	 0.00000000	-0.01716630	-0.04004205	-0.06573510	-0.09015310	-0.10800347	-0.12050578	-0.13300809	-0.14551040	-0.15801272	-0.17051504	-0.22052434	-0.27053369
                        20	 0.25666439	 0.20585340	 0.15504247	 0.10423158	 0.09152887	 0.07882615	 0.06612344	 0.05042918	 0.03224868	 0.01591271	 0.00453254	 0.00000000	-0.00453254	-0.01591271	-0.03224868	-0.05042918	-0.06612344	-0.07882615	-0.09152887	-0.10423158	-0.11693430	-0.12963702	-0.18044793	-0.23125889
                        30	 0.22063537	 0.16902278	 0.11741024	 0.06579774	 0.05289462	 0.03999151	 0.02708840	 0.01339091	 0.00101549	-0.00660068	-0.00725911	 0.00000000	 0.00725911	 0.00660068	-0.00101549	-0.01339091	-0.02708840	-0.03999151	-0.05289462	-0.06579774	-0.07870086	-0.09160398	-0.14321650	-0.19482907
                        60	-0.09714462	-0.15116204	-0.20517941	-0.25919673	-0.27270105	-0.28620537	-0.29970969	-0.29567402	-0.25876091	-0.19324645	-0.10470317	 0.00000000	 0.10470317	 0.19324645	 0.25876091	 0.29567402	 0.29970969	 0.28620537	 0.27270105	 0.25919673	 0.24569240	 0.23218807	 0.17817073	 0.12415334
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                    </tableData>
                    <tableData breakPoint="-5">
                        -20	       -16	       -12	        -8	        -7	        -6	        -5	        -4	        -3	        -2	        -1	         0	         1	         2	         3	         4	         5	         6	         7	         8	         9	        10	        14	        18
                        -20	 0.17608817	 0.12812152	 0.08015491	 0.03218835	 0.02019672	 0.00820509	-0.00378654	-0.01489459	-0.02199367	-0.02258448	-0.01531889	 0.00000000	 0.01531889	 0.02258448	 0.02199367	 0.01489459	 0.00378654	-0.00820509	-0.02019672	-0.03218835	-0.04417999	-0.05617163	-0.10413821	-0.15210484
                        -10	 0.24586885	 0.19710059	 0.14833237	 0.09956420	 0.08737217	 0.07518014	 0.06298811	 0.04795150	 0.03057441	 0.01500204	 0.00420913	 0.00000000	-0.00420913	-0.01500204	-0.03057441	-0.04795150	-0.06298811	-0.07518014	-0.08737217	-0.09956420	-0.11175624	-0.12394828	-0.17271648	-0.22148471
                        0	 0.30021425	 0.25064438	 0.20107456	 0.15150478	 0.13911234	 0.12671991	 0.11432748	 0.09622669	 0.07091776	 0.04382131	 0.01916830	 0.00000000	-0.01916830	-0.04382131	-0.07091776	-0.09622669	-0.11432748	-0.12671991	-0.13911234	-0.15150478	-0.16389722	-0.17628966	-0.22585946	-0.27542931
                        10	 0.29632704	 0.24595556	 0.19558413	 0.14521275	 0.13261991	 0.12002707	 0.10743424	 0.08953029	 0.06514087	 0.03956447	 0.01689063	 0.00000000	-0.01689063	-0.03956447	-0.06514087	-0.08953029	-0.10743424	-0.12002707	-0.13261991	-0.14521275	-0.15780559	-0.17039843	-0.22076984	-0.27114130
                        20	 0.25819268	 0.20701960	 0.15584656	 0.10467356	 0.09188032	 0.07908708	 0.06629385	 0.05050458	 0.03224025	 0.01585524	 0.00447580	 0.00000000	-0.00447580	-0.01585524	-0.03224025	-0.05050458	-0.06629385	-0.07908708	-0.09188032	-0.10467356	-0.11746681	-0.13026005	-0.18143307	-0.23260613
                        30	 0.22290330	 0.17092861	 0.11895396	 0.06697936	 0.05398571	 0.04099207	 0.02799844	 0.01416453	 0.00159285	-0.00623804	-0.00709692	 0.00000000	 0.00709692	 0.00623804	-0.00159285	-0.01416453	-0.02799844	-0.04099207	-0.05398571	-0.06697936	-0.07997300	-0.09296665	-0.14494128	-0.19691595
                        60	-0.09265778	-0.14703730	-0.20141677	-0.25579620	-0.26939105	-0.28298590	-0.29658074	-0.29280575	-0.25642617	-0.19162346	-0.10388419	 0.00000000	 0.10388419	 0.19162346	 0.25642617	 0.29280575	 0.29658074	 0.28298590	 0.26939105	 0.25579620	 0.24220135	 0.22860649	 0.17422704	 0.11984754
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                    </tableData>
                    <tableData breakPoint="0">
                        -20	       -16	       -12	        -8	        -7	        -6	        -5	        -4	        -3	        -2	        -1	         0	         1	         2	         3	         4	         5	         6	         7	         8	         9	        10	        14	        18
                        -20	 0.17465792	 0.12632916	 0.07800045	 0.02967179	 0.01758963	 0.00550747	-0.00657468	-0.01761205	-0.02434527	-0.02432240	-0.01625137	 0.00000000	 0.01625137	 0.02432240	 0.02434527	 0.01761205	 0.00657468	-0.00550747	-0.01758963	-0.02967179	-0.04175395	-0.05383611	-0.10216480	-0.15049354
                        -10	 0.24517824	 0.19604787	 0.14691755	 0.09778727	 0.08550471	 0.07322215	 0.06093960	 0.04593225	 0.02880860	 0.01368423	 0.00349558	 0.00000000	-0.00349558	-0.01368423	-0.02880860	-0.04593225	-0.06093960	-0.07322215	-0.08550471	-0.09778727	-0.11006984	-0.12235241	-0.17148270	-0.22061305
                        0	 0.30026327	 0.25033130	 0.20039937	 0.15046749	 0.13798452	 0.12550156	 0.11301861	 0.09490565	 0.06973774	 0.04292362	 0.01867369	 0.00000000	-0.01867369	-0.04292362	-0.06973774	-0.09490565	-0.11301861	-0.12550156	-0.13798452	-0.15046749	-0.16295045	-0.17543342	-0.22536533	-0.27529728
                        10	 0.29711570	 0.24638212	 0.19564858	 0.14491509	 0.13223172	 0.11954836	 0.10686500	 0.08890747	 0.06454665	 0.03908689	 0.01661495	 0.00000000	-0.01661495	-0.03908689	-0.06454665	-0.08890747	-0.10686500	-0.11954836	-0.13223172	-0.14491509	-0.15759846	-0.17028183	-0.22101534	-0.27174891
                        20	 0.25972098	 0.20818579	 0.15665064	 0.10511554	 0.09223177	 0.07934801	 0.06646425	 0.05057998	 0.03223181	 0.01579777	 0.00441905	 0.00000000	-0.00441905	-0.01579777	-0.03223181	-0.05057998	-0.06646425	-0.07934801	-0.09223177	-0.10511554	-0.11799931	-0.13088309	-0.18241821	-0.23395338
                        30	 0.22517124	 0.17283444	 0.12049768	 0.06816098	 0.05507681	 0.04199264	 0.02890847	 0.01493815	 0.00217020	-0.00587539	-0.00693473	 0.00000000	 0.00693473	 0.00587539	-0.00217020	-0.01493815	-0.02890847	-0.04199264	-0.05507681	-0.06816098	-0.08124515	-0.09432932	-0.14666605	-0.19900283
                        60	-0.08817094	-0.14291256	-0.19765414	-0.25239567	-0.26608105	-0.27976642	-0.29345179	-0.28993748	-0.25409144	-0.19000048	-0.10306520	 0.00000000	 0.10306520	 0.19000048	 0.25409144	 0.28993748	 0.29345179	 0.27976642	 0.26608105	 0.25239567	 0.23871029	 0.22502491	 0.17028336	 0.11554175
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                    </tableData>
                    <tableData breakPoint="5">
                        -20	       -16	       -12	        -8	        -7	        -6	        -5	        -4	        -3	        -2	        -1	         0	         1	         2	         3	         4	         5	         6	         7	         8	         9	        10	        14	        18
                        -20	 0.17322767	 0.12453681	 0.07584599	 0.02715522	 0.01498253	 0.00280985	-0.00936283	-0.02032952	-0.02669688	-0.02606032	-0.01718384	 0.00000000	 0.01718384	 0.02606032	 0.02669688	 0.02032952	 0.00936283	-0.00280985	-0.01498253	-0.02715522	-0.03932791	-0.05150060	-0.10019139	-0.14888224
                        -10	 0.24448762	 0.19499515	 0.14550272	 0.09601034	 0.08363726	 0.07126417	 0.05889109	 0.04391300	 0.02704279	 0.01236642	 0.00278204	 0.00000000	-0.00278204	-0.01236642	-0.02704279	-0.04391300	-0.05889109	-0.07126417	-0.08363726	-0.09601034	-0.10838344	-0.12075653	-0.17024893	-0.21974138
                        0	 0.30031230	 0.25001822	 0.19972418	 0.14943019	 0.13685670	 0.12428322	 0.11170973	 0.09358462	 0.06855772	 0.04202592	 0.01817908	 0.00000000	-0.01817908	-0.04202592	-0.06855772	-0.09358462	-0.11170973	-0.12428322	-0.13685670	-0.14943019	-0.16200369	-0.17457718	-0.22487119	-0.27516525
                        10	 0.29790436	 0.24680867	 0.19571303	 0.14461743	 0.13184354	 0.11906965	 0.10629577	 0.08828466	 0.06395242	 0.03860930	 0.01633927	 0.00000000	-0.01633927	-0.03860930	-0.06395242	-0.08828466	-0.10629577	-0.11906965	-0.13184354	-0.14461743	-0.15739133	-0.17016523	-0.22126085	-0.27235651
                        20	 0.26124928	 0.20935198	 0.15745473	 0.10555752	 0.09258323	 0.07960894	 0.06663465	 0.05065538	 0.03222338	 0.01574030	 0.00436231	 0.00000000	-0.00436231	-0.01574030	-0.03222338	-0.05065538	-0.06663465	-0.07960894	-0.09258323	-0.10555752	-0.11853182	-0.13150612	-0.18340335	-0.23530062
                        30	 0.22743917	 0.17474027	 0.12204141	 0.06934259	 0.05616790	 0.04299320	 0.02981851	 0.01571177	 0.00274756	-0.00551275	-0.00677254	 0.00000000	 0.00677254	 0.00551275	-0.00274756	-0.01571177	-0.02981851	-0.04299320	-0.05616790	-0.06934259	-0.08251729	-0.09569199	-0.14839083	-0.20108971
                        60	-0.08368409	-0.13878782	-0.19389151	-0.24899515	-0.26277105	-0.27654695	-0.29032284	-0.28706921	-0.25175671	-0.18837749	-0.10224621	 0.00000000	 0.10224621	 0.18837749	 0.25175671	 0.28706921	 0.29032284	 0.27654695	 0.26277105	 0.24899515	 0.23521924	 0.22144333	 0.16633967	 0.11123596
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                    </tableData>
                    <tableData breakPoint="10">
                        -20	       -16	       -12	        -8	        -7	        -6	        -5	        -4	        -3	        -2	        -1	         0	         1	         2	         3	         4	         5	         6	         7	         8	         9	        10	        14	        18
                        -20	 0.17179742	 0.12274445	 0.07369153	 0.02463865	 0.01237544	 0.00011223	-0.01215097	-0.02304698	-0.02904848	-0.02779825	-0.01811632	 0.00000000	 0.01811632	 0.02779825	 0.02904848	 0.02304698	 0.01215097	-0.00011223	-0.01237544	-0.02463865	-0.03690187	-0.04916509	-0.09821799	-0.14727093
                        -10	 0.24379701	 0.19394243	 0.14408790	 0.09423342	 0.08176980	 0.06930619	 0.05684258	 0.04189375	 0.02527698	 0.01104861	 0.00206850	 0.00000000	-0.00206850	-0.01104861	-0.02527698	-0.04189375	-0.05684258	-0.06930619	-0.08176980	-0.09423342	-0.10669703	-0.11916065	-0.16901516	-0.21886972
                        0	 0.30036132	 0.24970513	 0.19904899	 0.14839290	 0.13572889	 0.12306487	 0.11040086	 0.09226359	 0.06737770	 0.04112823	 0.01768448	 0.00000000	-0.01768448	-0.04112823	-0.06737770	-0.09226359	-0.11040086	-0.12306487	-0.13572889	-0.14839290	-0.16105692	-0.17372094	-0.22437706	-0.27503322
                        10	 0.29869302	 0.24723523	 0.19577748	 0.14431978	 0.13145536	 0.11859094	 0.10572653	 0.08766184	 0.06335819	 0.03813172	 0.01606360	 0.00000000	-0.01606360	-0.03813172	-0.06335819	-0.08766184	-0.10572653	-0.11859094	-0.13145536	-0.14431978	-0.15718420	-0.17004862	-0.22150635	-0.27296412
                        20	 0.26277757	 0.21051817	 0.15825881	 0.10599950	 0.09293468	 0.07986987	 0.06680505	 0.05073079	 0.03221494	 0.01568283	 0.00430556	 0.00000000	-0.00430556	-0.01568283	-0.03221494	-0.05073079	-0.06680505	-0.07986987	-0.09293468	-0.10599950	-0.11906433	-0.13212915	-0.18438849	-0.23664786
                        30	 0.22970710	 0.17664609	 0.12358513	 0.07052421	 0.05725899	 0.04399377	 0.03072855	 0.01648539	 0.00332492	-0.00515010	-0.00661036	 0.00000000	 0.00661036	 0.00515010	-0.00332492	-0.01648539	-0.03072855	-0.04399377	-0.05725899	-0.07052421	-0.08378944	-0.09705466	-0.15011560	-0.20317659
                        60	-0.07919725	-0.13466309	-0.19012888	-0.24559462	-0.25946105	-0.27332747	-0.28719390	-0.28420094	-0.24942197	-0.18675451	-0.10142723	 0.00000000	 0.10142723	 0.18675451	 0.24942197	 0.28420094	 0.28719390	 0.27332747	 0.25946105	 0.24559462	 0.23172819	 0.21786175	 0.16239599	 0.10693017
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                    </tableData>
                    <tableData breakPoint="15">
                        -20	       -16	       -12	        -8	        -7	        -6	        -5	        -4	        -3	        -2	        -1	         0	         1	         2	         3	         4	         5	         6	         7	         8	         9	        10	        14	        18
                        -20	 0.17036717	 0.12095210	 0.07153707	 0.02212209	 0.00976835	-0.00258539	-0.01493912	-0.02576445	-0.03140009	-0.02953617	-0.01904879	 0.00000000	 0.01904879	 0.02953617	 0.03140009	 0.02576445	 0.01493912	 0.00258539	-0.00976835	-0.02212209	-0.03447583	-0.04682957	-0.09624458	-0.14565963
                        -10	 0.24310640	 0.19288971	 0.14267308	 0.09245649	 0.07990235	 0.06734821	 0.05479407	 0.03987451	 0.02351116	 0.00973080	 0.00135496	 0.00000000	-0.00135496	-0.00973080	-0.02351116	-0.03987451	-0.05479407	-0.06734821	-0.07990235	-0.09245649	-0.10501063	-0.11756478	-0.16778139	-0.21799805
                        0	 0.30041034	 0.24939205	 0.19837381	 0.14735561	 0.13460107	 0.12184653	 0.10909199	 0.09094256	 0.06619768	 0.04023053	 0.01718987	 0.00000000	-0.01718987	-0.04023053	-0.06619768	-0.09094256	-0.10909199	-0.12184653	-0.13460107	-0.14735561	-0.16011015	-0.17286470	-0.22388292	-0.27490119
                        10	 0.29948168	 0.24766178	 0.19584193	 0.14402212	 0.13106718	 0.11811224	 0.10515730	 0.08703903	 0.06276396	 0.03765414	 0.01578792	 0.00000000	-0.01578792	-0.03765414	-0.06276396	-0.08703903	-0.10515730	-0.11811224	-0.13106718	-0.14402212	-0.15697707	-0.16993202	-0.22175185	-0.27357173
                        20	 0.26430587	 0.21168436	 0.15906290	 0.10644148	 0.09328614	 0.08013079	 0.06697545	 0.05080619	 0.03220651	 0.01562537	 0.00424882	 0.00000000	-0.00424882	-0.01562537	-0.03220651	-0.05080619	-0.06697545	-0.08013079	-0.09328614	-0.10644148	-0.11959683	-0.13275219	-0.18537362	-0.23799511
                        30	 0.23197504	 0.17855192	 0.12512885	 0.07170583	 0.05835008	 0.04499433	 0.03163859	 0.01725901	 0.00390227	-0.00478746	-0.00644817	 0.00000000	 0.00644817	 0.00478746	-0.00390227	-0.01725901	-0.03163859	-0.04499433	-0.05835008	-0.07170583	-0.08506158	-0.09841733	-0.15184038	-0.20526347
                        60	-0.07471041	-0.13053835	-0.18636624	-0.24219409	-0.25615105	-0.27010800	-0.28406495	-0.28133267	-0.24708724	-0.18513152	-0.10060824	 0.00000000	 0.10060824	 0.18513152	 0.24708724	 0.28133267	 0.28406495	 0.27010800	 0.25615105	 0.24219409	 0.22823713	 0.21428017	 0.15845230	 0.10262438
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                    </tableData>
                    <tableData breakPoint="20">
                        -20	       -16	       -12	        -8	        -7	        -6	        -5	        -4	        -3	        -2	        -1	         0	         1	         2	         3	         4	         5	         6	         7	         8	         9	        10	        14	        18
                        -20	 0.16893692	 0.11915974	 0.06938261	 0.01960552	 0.00716126	-0.00528301	-0.01772726	-0.02848191	-0.03375169	-0.03127409	-0.01998126	 0.00000000	 0.01998126	 0.03127409	 0.03375169	 0.02848191	 0.01772726	 0.00528301	-0.00716126	-0.01960552	-0.03204979	-0.04449406	-0.09427117	-0.14404833
                        -10	 0.24241578	 0.19183699	 0.14125825	 0.09067956	 0.07803489	 0.06539023	 0.05274557	 0.03785526	 0.02174535	 0.00841299	 0.00064142	 0.00000000	-0.00064142	-0.00841299	-0.02174535	-0.03785526	-0.05274557	-0.06539023	-0.07803489	-0.09067956	-0.10332423	-0.11596890	-0.16654762	-0.21712638
                        0	 0.30045937	 0.24907897	 0.19769862	 0.14631832	 0.13347325	 0.12062818	 0.10778312	 0.08962153	 0.06501766	 0.03933283	 0.01669526	 0.00000000	-0.01669526	-0.03933283	-0.06501766	-0.08962153	-0.10778312	-0.12062818	-0.13347325	-0.14631832	-0.15916339	-0.17200846	-0.22338879	-0.27476916
                        10	 0.30027034	 0.24808834	 0.19590638	 0.14372447	 0.13067900	 0.11763353	 0.10458806	 0.08641621	 0.06216974	 0.03717656	 0.01551224	 0.00000000	-0.01551224	-0.03717656	-0.06216974	-0.08641621	-0.10458806	-0.11763353	-0.13067900	-0.14372447	-0.15676994	-0.16981542	-0.22199735	-0.27417933
                        20	 0.26583416	 0.21285055	 0.15986698	 0.10688346	 0.09363759	 0.08039172	 0.06714585	 0.05088159	 0.03219807	 0.01556790	 0.00419207	 0.00000000	-0.00419207	-0.01556790	-0.03219807	-0.05088159	-0.06714585	-0.08039172	-0.09363759	-0.10688346	-0.12012934	-0.13337522	-0.18635876	-0.23934235
                        30	 0.23424297	 0.18045775	 0.12667257	 0.07288744	 0.05944117	 0.04599490	 0.03254863	 0.01803263	 0.00447963	-0.00442481	-0.00628598	 0.00000000	 0.00628598	 0.00442481	-0.00447963	-0.01803263	-0.03254863	-0.04599490	-0.05944117	-0.07288744	-0.08633372	-0.09978000	-0.15356516	-0.20735035
                        60	-0.07022356	-0.12641361	-0.18260361	-0.23879356	-0.25284104	-0.26688852	-0.28093600	-0.27846440	-0.24475250	-0.18350854	-0.09978926	 0.00000000	 0.09978926	 0.18350854	 0.24475250	 0.27846440	 0.28093600	 0.26688852	 0.25284104	 0.23879356	 0.22474608	 0.21069859	 0.15450862	 0.09831859
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                    </tableData>
                    <tableData breakPoint="25">
                        -20	       -16	       -12	        -8	        -7	        -6	        -5	        -4	        -3	        -2	        -1	         0	         1	         2	         3	         4	         5	         6	         7	         8	         9	        10	        14	        18
                        -20	 0.16750667	 0.11736739	 0.06722815	 0.01708896	 0.00455416	-0.00798062	-0.02051541	-0.03119938	-0.03610330	-0.03301202	-0.02091374	 0.00000000	 0.02091374	 0.03301202	 0.03610330	 0.03119938	 0.02051541	 0.00798062	-0.00455416	-0.01708896	-0.02962375	-0.04215855	-0.09229776	-0.14243702
                        -10	 0.24172517	 0.19078428	 0.13984343	 0.08890263	 0.07616743	 0.06343224	 0.05069706	 0.03583601	 0.01997954	 0.00709518	-0.00007212	 0.00000000	 0.00007212	-0.00709518	-0.01997954	-0.03583601	-0.05069706	-0.06343224	-0.07616743	-0.08890263	-0.10163782	-0.11437302	-0.16531385	-0.21625472
                        0	 0.30050839	 0.24876589	 0.19702343	 0.14528102	 0.13234543	 0.11940984	 0.10647425	 0.08830050	 0.06383764	 0.03843514	 0.01620065	 0.00000000	-0.01620065	-0.03843514	-0.06383764	-0.08830050	-0.10647425	-0.11940984	-0.13234543	-0.14528102	-0.15821662	-0.17115222	-0.22289465	-0.27463713
                        10	 0.30105900	 0.24851489	 0.19597083	 0.14342681	 0.13029081	 0.11715482	 0.10401883	 0.08579340	 0.06157551	 0.03669897	 0.01523657	 0.00000000	-0.01523657	-0.03669897	-0.06157551	-0.08579340	-0.10401883	-0.11715482	-0.13029081	-0.14342681	-0.15656281	-0.16969881	-0.22224285	-0.27478694
                        20	 0.26736246	 0.21401674	 0.16067107	 0.10732544	 0.09398905	 0.08065265	 0.06731626	 0.05095699	 0.03218963	 0.01551043	 0.00413533	 0.00000000	-0.00413533	-0.01551043	-0.03218963	-0.05095699	-0.06731626	-0.08065265	-0.09398905	-0.10732544	-0.12066185	-0.13399825	-0.18734390	-0.24068960
                        30	 0.23651090	 0.18236358	 0.12821630	 0.07406906	 0.06053226	 0.04699546	 0.03345867	 0.01880625	 0.00505699	-0.00406217	-0.00612379	 0.00000000	 0.00612379	 0.00406217	-0.00505699	-0.01880625	-0.03345867	-0.04699546	-0.06053226	-0.07406906	-0.08760587	-0.10114267	-0.15528993	-0.20943723
                        60	-0.06573672	-0.12228887	-0.17884098	-0.23539304	-0.24953104	-0.26366905	-0.27780705	-0.27559613	-0.24241777	-0.18188555	-0.09897027	 0.00000000	 0.09897027	 0.18188555	 0.24241777	 0.27559613	 0.27780705	 0.26366905	 0.24953104	 0.23539304	 0.22125503	 0.20711701	 0.15056493	 0.09401280
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                    </tableData>
                    <tableData breakPoint="30">
                        -20	       -16	       -12	        -8	        -7	        -6	        -5	        -4	        -3	        -2	        -1	         0	         1	         2	         3	         4	         5	         6	         7	         8	         9	        10	        14	        18
                        -20	 0.16607642	 0.11557503	 0.06507369	 0.01457239	 0.00194707	-0.01067824	-0.02330355	-0.03391685	-0.03845490	-0.03474994	-0.02184621	 0.00000000	 0.02184621	 0.03474994	 0.03845490	 0.03391685	 0.02330355	 0.01067824	-0.00194707	-0.01457239	-0.02719771	-0.03982303	-0.09032435	-0.14082572
                        -10	 0.24103456	 0.18973156	 0.13842860	 0.08712570	 0.07429998	 0.06147426	 0.04864855	 0.03381676	 0.01821373	 0.00577737	-0.00078567	 0.00000000	 0.00078567	-0.00577737	-0.01821373	-0.03381676	-0.04864855	-0.06147426	-0.07429998	-0.08712570	-0.09995142	-0.11277715	-0.16408007	-0.21538305
                        0	 0.30055741	 0.24845281	 0.19634824	 0.14424373	 0.13121761	 0.11819149	 0.10516538	 0.08697946	 0.06265762	 0.03753744	 0.01570604	 0.00000000	-0.01570604	-0.03753744	-0.06265762	-0.08697946	-0.10516538	-0.11819149	-0.13121761	-0.14424373	-0.15726985	-0.17029598	-0.22240052	-0.27450510
                        10	 0.30184766	 0.24894145	 0.19603528	 0.14312915	 0.12990263	 0.11667611	 0.10344959	 0.08517059	 0.06098128	 0.03622139	 0.01496089	 0.00000000	-0.01496089	-0.03622139	-0.06098128	-0.08517059	-0.10344959	-0.11667611	-0.12990263	-0.14312915	-0.15635568	-0.16958221	-0.22248836	-0.27539455
                        20	 0.26889076	 0.21518293	 0.16147516	 0.10776743	 0.09434050	 0.08091358	 0.06748666	 0.05103240	 0.03218120	 0.01545296	 0.00407859	 0.00000000	-0.00407859	-0.01545296	-0.03218120	-0.05103240	-0.06748666	-0.08091358	-0.09434050	-0.10776743	-0.12119435	-0.13462129	-0.18832904	-0.24203684
                        30	 0.23877884	 0.18426940	 0.12976002	 0.07525068	 0.06162335	 0.04799603	 0.03436871	 0.01957987	 0.00563434	-0.00369952	-0.00596160	 0.00000000	 0.00596160	 0.00369952	-0.00563434	-0.01957987	-0.03436871	-0.04799603	-0.06162335	-0.07525068	-0.08887801	-0.10250534	-0.15701471	-0.21152411
                        60	-0.06124988	-0.11816413	-0.17507834	-0.23199251	-0.24622104	-0.26044957	-0.27467810	-0.27272786	-0.24008304	-0.18026256	-0.09815129	 0.00000000	 0.09815129	 0.18026256	 0.24008304	 0.27272786	 0.27467810	 0.26044957	 0.24622104	 0.23199251	 0.21776397	 0.20353543	 0.14662125	 0.08970701
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                    </tableData>
                </table>
            </product>
        </function>
        <function name="aero/coefficients/CFYP">
            <description>SIDE FORCE DUE TO ROLL RATE (CYP)</description>
            <product>
                <property>aero/pb</property>
                <table>
                    <independentVar lookup="row">aero/alpha-deg</independentVar>
                    <tableData>
                        -20		 0.01205991
                        -19		-0.12656627
                        -9		-0.10160834
                        1		 0.05658780
                        11		 0.04233858
                        21		 0.02104957
                        31		 0.00793236
                        60		 0.00000000
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                    </tableData>
                </table>
            </product>
        </function>
        <function name="aero/coefficients/CFYR">
            <description>SIDE FORCE DUE TO YAW RATE (CYR)</description>
            <product>
                <property>aero/rb</property>
                <table>
                    <independentVar lookup="row">aero/alpha-deg</independentVar>
                    <tableData>
                        -20		 0.35000000
                        -19		 0.35000000
                        -9		 0.35000000
                        1		 0.32743423
                        11		 0.15828844
                        21		-0.11423122
                        31		 0.00000000
                        60		 0.00000000
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                    </tableData>
                </table>
            </product>
        </function>
        <function name="aero/coefficients/CYDAD">
            <description>SIDE FORCE DUE TO AILERON DEFLECTION</description>
            <product>
                <property>fcs/aileron-pos-deg</property>
                <table>
                    <independentVar lookup="row">aero/alpha-deg</independentVar>
                    <tableData>
                        -20		-0.00027502
                        -19		-0.00032657
                        -9		-0.00028478
                        1		-0.00019645
                        11		 0.00000760
                        21		 0.00016013
                        31		 0.00020963
                        60		 0.00115894
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                    </tableData>
                </table>
            </product>
        </function>
        <function name="aero/coefficients/CYDRD">
            <description>SIDE FORCE DUE TO RUDDER DEFLECTION</description>
            <product>
                <property>fcs/rudder-pos-deg</property>
                <value>
                    0.89 <!-- DRFLX5 -->
                </value>
                <property>aero/coefficients/EPA43</property>
                <table>
                    <independentVar lookup="row">aero/alpha-deg</independentVar>
                    <independentVar lookup="column">fcs/rudder-pos-deg</independentVar>
                    <tableData>
                        -30	        -25	        -20	        -15	        -10	         -5	          0	          5	         10	         15	         20	         25	         30
                        -20	-0.00151306	 0.00018306	 0.00149969	 0.00247584	 0.00315049	 0.00356264	 0.00375129	 0.00375542	 0.00361404	 0.00336614	 0.00305071	 0.00270675	 0.00237325
                        -10	-0.00123506	 0.00047979	 0.00181516	 0.00281004	 0.00350342	 0.00393431	 0.00414169	 0.00416456	 0.00404191	 0.00381274	 0.00351605	 0.00319082	 0.00287605
                        0	-0.00238717	-0.00065358	 0.00070052	 0.00171414	 0.00242626	 0.00287588	 0.00310199	 0.00314359	 0.00303968	 0.00282924	 0.00255128	 0.00224479	 0.00194875
                        10	-0.00210141	-0.00034909	 0.00102375	 0.00205610	 0.00278695	 0.00325530	 0.00350015	 0.00356049	 0.00347531	 0.00328361	 0.00302438	 0.00273662	 0.00245932
                        20	-0.00312490	-0.00135385	 0.00003772	 0.00108880	 0.00183839	 0.00232548	 0.00258906	 0.00266813	 0.00260168	 0.00242872	 0.00218822	 0.00191920	 0.00166063
                        30	-0.00493628	-0.00314649	-0.00173619	-0.00066637	 0.00010195	 0.00060777	 0.00089008	 0.00098789	 0.00094018	 0.00078594	 0.00056418	 0.00031389	 0.00007406
                        60	-0.01822570	-0.01637971	-0.01491321	-0.01378719	-0.01296267	-0.01240065	-0.01206213	-0.01190812	-0.01189963	-0.01199767	-0.01216323	-0.01235732	-0.01254095
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                    </tableData>
                </table>
            </product>
        </function>
        <function name="aero/coefficients/CYDTD">
            <description>SIDE FORCE DUE TO DIFFERETIAL TAIL DEFLECTION - CYDTD</description>
            <product>
                <value>
                    0.975 <!-- DTFLX5 -->
                </value>
                <value>0.3</value>
                <property>fcs/differential-elevator-pos-deg</property>
                <table>
                    <independentVar lookup="row">aero/alpha-deg</independentVar>
                    <independentVar lookup="column">fcs/elevator-pos-deg</independentVar>
                    <tableData>
                        -30	        -25	        -20	        -15	        -10	         -5	          0	          5	         10	         15	         20	         25	         30
                        -20	 0.00477977	 0.00326443	 0.00201393	 0.00111242	 0.00057204	 0.00035313	 0.00038458	 0.00058409	 0.00087848	 0.00122399	 0.00162656	 0.00216213	 0.00299694
                        -10	 0.00341003	 0.00201144	 0.00083265	-0.00004375	-0.00060721	-0.00089895	-0.00099167	-0.00096923	-0.00090639	-0.00084848	-0.00079115	-0.00066002	-0.00029043
                        0	 0.00218250	 0.00102083	 0.00002727	-0.00071580	-0.00119807	-0.00146098	-0.00157745	-0.00163157	-0.00169832	-0.00182327	-0.00200227	-0.00216119	-0.00213558
                        10	 0.00078016	-0.00004489	-0.00075342	-0.00126328	-0.00156436	-0.00169835	-0.00173838	-0.00176878	-0.00186474	-0.00207206	-0.00238682	-0.00273510	-0.00295269
                        20	-0.00042411	-0.00083332	-0.00117075	-0.00135581	-0.00137999	-0.00128654	-0.00115018	-0.00105679	-0.00108315	-0.00127663	-0.00163489	-0.00208559	-0.00246608
                        30	-0.00082990	-0.00076451	-0.00065848	-0.00043551	-0.00009134	 0.00032648	 0.00073899	 0.00105600	 0.00119647	 0.00110875	 0.00079093	 0.00031105	-0.00017251
                        60	 0.00595406	 0.00759111	 0.00932441	 0.01118776	 0.01314288	 0.01509975	 0.01693684	 0.01852148	 0.01973010	 0.02046855	 0.02069238	 0.02042714	 0.01978867
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                    </tableData>
                </table>
            </product>
        </function>
        <function name="aero/coefficients/CyMach">
            <description>Yaw factor (NASA-TM-84643 Figure 3 Clalpha) and values for AOA derived from NASA-aaia-2000-0900 Figure 4</description>
            <product>
                <table>
                    <independentVar lookup="row">velocities/mach</independentVar>
                    <tableData>
                        0.202		 1.25794500
                        0.306		 1.14121500
                        0.705		 0.99095090
                        0.934		 1.07933440
                        1.048		 2.14446970
                        1.797		 2.13606970
                        2.091		 2.03300270
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                    </tableData>
                </table>
            </product>
        </function>
        <function name="aero/coefficients/CYRB">
            <description>ASYMMETRIC CY AT HIGH ALPHA</description>
            <product>
                <table>
                    <independentVar lookup="row">aero/alpha-deg</independentVar>
                    <independentVar lookup="column">aero/beta-deg</independentVar>
                    <tableData>
                        -20	        -15	        -10	         -5	          0	          5	         10	         15	         20
                        -20	 0.00000000	 0.00000000	 0.00000000	 0.00000000	 0.00000000	 0.00000000	 0.00000000	 0.00000000	 0.00000000
                        -10	 0.00000000	 0.00000000	 0.00000000	 0.00000000	 0.00000000	 0.00000000	 0.00000000	 0.00000000	 0.00000000
                        0	 0.00000000	 0.00000000	 0.00000000	 0.00000000	 0.00000000	 0.00000000	 0.00000000	 0.00000000	 0.00000000
                        10	 0.00000000	 0.00000000	 0.00000000	 0.00000000	 0.00000000	 0.00000000	 0.00000000	 0.00000000	 0.00000000
                        20	 0.00000000	 0.00000000	 0.00000000	 0.00000000	 0.00000000	 0.00000000	 0.00000000	 0.00000000	 0.00000000
                        30	 0.00000000	 0.00000000	 0.00000000	 0.00000000	 0.00000000	 0.00000000	 0.00000000	 0.00000000	 0.00000000
                        60	 0.00000000	 0.00000000	 0.00000000	 0.14792225	 0.00001110	 0.14792225	 0.00000000	 0.00000000	 0.00000000
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                    </tableData>
                </table>
            </product>
        </function>
        <function name="aero/coefficients/CMN1">
            <description>BASIC YAWING MOMENT - CN (BETA)</description>
            <product>
                <table>
                    <independentVar lookup="row">aero/alpha-deg</independentVar>
                    <independentVar lookup="column">aero/beta-deg</independentVar>
                    <independentVar lookup="table">fcs/elevator-pos-deg</independentVar>
                    <tableData breakPoint="-30">
                        -20	       -16	       -12	        -8	        -7	        -6	        -5	        -4	        -3	        -2	        -1	         0	         1	         2	         3	         4	         5	         6	         7	         8	         9	        10	        14	        18
                        -20	-0.02713148	-0.01945773	-0.01122176	-0.00239938	-0.00009933	 0.00223926	 0.00461678	 0.00703358	 0.00949006	 0.01198660	 0.01452356	 0.00000000	-0.01452356	-0.01198660	-0.00949006	-0.00703358	-0.00461678	-0.00223926	 0.00009933	 0.00239938	 0.00466128	 0.00688538	 0.01541153	 0.02336337
                        -10	-0.02517026	-0.02160101	-0.01733744	-0.01235537	-0.01099475	-0.00958733	-0.00813274	-0.00663060	-0.00508053	-0.00348215	-0.00183508	 0.00000000	 0.00183508	 0.00348215	 0.00508053	 0.00663060	 0.00813274	 0.00958733	 0.01099475	 0.01235537	 0.01366957	 0.01493773	 0.01955753	 0.02347091
                        0	-0.02230855	-0.02218906	-0.02133121	-0.01971083	-0.01918375	-0.01860712	-0.01798057	-0.01730371	-0.01657617	-0.01579757	-0.01496753	 0.00000000	 0.01496753	 0.01579757	 0.01657617	 0.01730371	 0.01798057	 0.01860712	 0.01918375	 0.01971083	 0.02018873	 0.02061785	 0.02185394	 0.02233959
                        10	-0.00376937	-0.00644488	-0.00842607	-0.00968876	-0.00988933	-0.01004310	-0.01014970	-0.01020875	-0.01021987	-0.01018268	-0.01009680	 0.00000000	 0.01009680	 0.01018268	 0.01021987	 0.01020875	 0.01014970	 0.01004310	 0.00988933	 0.00968876	 0.00944177	 0.00914874	 0.00752378	 0.00519240
                        20	 0.02142406	 0.01660829	 0.01235474	 0.00868760	 0.00786527	 0.00708148	 0.00633662	 0.00563104	 0.00496514	 0.00433930	 0.00375388	 0.00000000	-0.00375388	-0.00433930	-0.00496514	-0.00563104	-0.00633662	-0.00708148	-0.00786527	-0.00868760	-0.00954808	-0.01044636	-0.01440973	-0.01894741
                        30	 0.04230972	 0.03600845	 0.03004922	 0.02445623	 0.02311804	 0.02180463	 0.02051638	 0.01925366	 0.01801686	 0.01680635	 0.01562250	 0.00000000	-0.01562250	-0.01680635	-0.01801686	-0.01925366	-0.02051638	-0.02180463	-0.02311804	-0.02445623	-0.02581882	-0.02720543	-0.03298456	-0.03911784
                        60	 0.06081753	 0.05398823	 0.04631207	 0.03781323	 0.03556281	 0.03326286	 0.03091376	 0.02851589	 0.02606963	 0.02357535	 0.02103343	 0.00000000	-0.02103343	-0.02357535	-0.02606963	-0.02851589	-0.03091376	-0.03326286	-0.03556281	-0.03781323	-0.04001374	-0.04216397	-0.05025450	-0.05751025
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                    </tableData>
                    <tableData breakPoint="-25">
                        -20	       -16	       -12	        -8	        -7	        -6	        -5	        -4	        -3	        -2	        -1	         0	         1	         2	         3	         4	         5	         6	         7	         8	         9	        10	        14	        18
                        -20	-0.02723751	-0.01974226	-0.01168479	-0.00304092	-0.00078549	 0.00150848	 0.00384136	 0.00621355	 0.00862540	 0.01107731	 0.01356964	 0.00000000	-0.01356964	-0.01107731	-0.00862540	-0.00621355	-0.00384136	-0.00150848	 0.00078549	 0.00304092	 0.00525819	 0.00743767	 0.01578532	 0.02355865
                        -10	-0.02575074	-0.02213147	-0.01781787	-0.01278577	-0.01141265	-0.00999272	-0.00852563	-0.00701098	-0.00544840	-0.00383751	-0.00217794	 0.00000000	 0.00217794	 0.00383751	 0.00544840	 0.00701098	 0.00852563	 0.00999272	 0.01141265	 0.01278577	 0.01411248	 0.01539315	 0.02006297	 0.02402638
                        0	-0.02354086	-0.02318589	-0.02209256	-0.02023669	-0.01965074	-0.01901525	-0.01832982	-0.01759410	-0.01680769	-0.01597022	-0.01508131	 0.00000000	 0.01508131	 0.01597022	 0.01680769	 0.01759410	 0.01832982	 0.01901525	 0.01965074	 0.02023669	 0.02077347	 0.02126145	 0.02273303	 0.02345415
                        10	-0.00583088	-0.00812853	-0.00973186	-0.01061669	-0.01072279	-0.01078210	-0.01079424	-0.01075882	-0.01067547	-0.01054382	-0.01036348	 0.00000000	 0.01036348	 0.01054382	 0.01067547	 0.01075882	 0.01079424	 0.01078210	 0.01072279	 0.01061669	 0.01046416	 0.01026560	 0.00901850	 0.00706498
                        20	 0.01835598	 0.01401737	 0.01024099	 0.00705101	 0.00634798	 0.00568348	 0.00505791	 0.00447162	 0.00392502	 0.00341846	 0.00295233	 0.00000000	-0.00295233	-0.00341846	-0.00392502	-0.00447162	-0.00505791	-0.00568348	-0.00634798	-0.00705101	-0.00779221	-0.00857119	-0.01205739	-0.01611791
                        30	 0.03805769	 0.03228981	 0.02686398	 0.02180439	 0.02059955	 0.01941949	 0.01826459	 0.01713522	 0.01603176	 0.01495460	 0.01390411	 0.00000000	-0.01390411	-0.01495460	-0.01603176	-0.01713522	-0.01826459	-0.01941949	-0.02059955	-0.02180439	-0.02303363	-0.02428689	-0.02953263	-0.03513250
                        60	 0.05194939	 0.04556374	 0.03833123	 0.03027604	 0.02813653	 0.02594749	 0.02370931	 0.02142235	 0.01908700	 0.01670363	 0.01427262	 0.00000000	-0.01427262	-0.01670363	-0.01908700	-0.02142235	-0.02370931	-0.02594749	-0.02813653	-0.03027604	-0.03236564	-0.03440496	-0.04205183	-0.04886394
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                    </tableData>
                    <tableData breakPoint="-20">
                        -20	       -16	       -12	        -8	        -7	        -6	        -5	        -4	        -3	        -2	        -1	         0	         1	         2	         3	         4	         5	         6	         7	         8	         9	        10	        14	        18
                        -20	-0.02720072	-0.01988398	-0.01200501	-0.00353964	-0.00132884	 0.00092051	 0.00320877	 0.00553632	 0.00790355	 0.01031084	 0.01275855	 0.00000000	-0.01275855	-0.01031084	-0.00790355	-0.00553632	-0.00320877	-0.00092051	 0.00132884	 0.00353964	 0.00571228	 0.00784714	 0.01601628	 0.02361112
                        -10	-0.02629551	-0.02262622	-0.01826260	-0.01318047	-0.01179484	-0.01036241	-0.00888280	-0.00735565	-0.00578056	-0.00415717	-0.00248509	 0.00000000	 0.00248509	 0.00415717	 0.00578056	 0.00735565	 0.00888280	 0.01036241	 0.01179484	 0.01318047	 0.01451968	 0.01581286	 0.02053271	 0.02454614
                        0	-0.02477316	-0.02418271	-0.02285391	-0.02076256	-0.02011774	-0.01942337	-0.01867908	-0.01788448	-0.01703920	-0.01614286	-0.01519509	 0.00000000	 0.01519509	 0.01614286	 0.01703920	 0.01788448	 0.01867908	 0.01942337	 0.02011774	 0.02076256	 0.02135821	 0.02190506	 0.02361212	 0.02456872
                        10	-0.00785668	-0.00977647	-0.01100195	-0.01150891	-0.01152055	-0.01148540	-0.01140306	-0.01127318	-0.01109537	-0.01086925	-0.01059445	 0.00000000	 0.01059445	 0.01086925	 0.01109537	 0.01127318	 0.01140306	 0.01148540	 0.01152055	 0.01150891	 0.01145085	 0.01134675	 0.01047751	 0.00890186
                        20	 0.01543071	 0.01156927	 0.00827005	 0.00555724	 0.00497350	 0.00442830	 0.00392201	 0.00345502	 0.00302770	 0.00264044	 0.00229360	 0.00000000	-0.00229360	-0.00264044	-0.00302770	-0.00345502	-0.00392201	-0.00442830	-0.00497350	-0.00555724	-0.00617915	-0.00683884	-0.00984787	-0.01343122
                        30	 0.03412699	 0.02889251	 0.02400008	 0.01947389	 0.01840240	 0.01735568	 0.01633413	 0.01533811	 0.01436801	 0.01342419	 0.01250705	 0.00000000	-0.01250705	-0.01342419	-0.01436801	-0.01533811	-0.01633413	-0.01735568	-0.01840240	-0.01947389	-0.02056978	-0.02168969	-0.02640203	-0.03146850
                        60	 0.04436660	 0.03842460	 0.03163574	 0.02402419	 0.02199560	 0.01991748	 0.01779020	 0.01561416	 0.01338972	 0.01111726	 0.00879717	 0.00000000	-0.00879717	-0.01111726	-0.01338972	-0.01561416	-0.01779020	-0.01991748	-0.02199560	-0.02402419	-0.02600288	-0.02793129	-0.03513452	-0.04150297
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                    </tableData>
                    <tableData breakPoint="-15">
                        -20	       -16	       -12	        -8	        -7	        -6	        -5	        -4	        -3	        -2	        -1	         0	         1	         2	         3	         4	         5	         6	         7	         8	         9	        10	        14	        18
                        -20	-0.02702112	-0.01988288	-0.01218241	-0.00389554	-0.00172936	 0.00047535	 0.00271899	 0.00500192	 0.00732452	 0.00968718	 0.01209027	 0.00000000	-0.01209027	-0.00968718	-0.00732452	-0.00500192	-0.00271899	-0.00047535	 0.00172936	 0.00389554	 0.00602356	 0.00811379	 0.01610443	 0.02352076
                        -10	-0.02680459	-0.02308526	-0.01867162	-0.01353946	-0.01214132	-0.01069639	-0.00920428	-0.00766462	-0.00607703	-0.00444113	-0.00275654	 0.00000000	 0.00275654	 0.00444113	 0.00607703	 0.00766462	 0.00920428	 0.01069639	 0.01214132	 0.01353946	 0.01489119	 0.01619687	 0.02096674	 0.02503020
                        0	-0.02600547	-0.02517954	-0.02361525	-0.02128842	-0.02058474	-0.01983150	-0.01902834	-0.01817487	-0.01727072	-0.01631551	-0.01530886	 0.00000000	 0.01530886	 0.01631551	 0.01727072	 0.01817487	 0.01902834	 0.01983150	 0.02058474	 0.02128842	 0.02194294	 0.02254867	 0.02449120	 0.02568329
                        10	-0.00984678	-0.01138871	-0.01223633	-0.01236543	-0.01228261	-0.01215298	-0.01197619	-0.01175184	-0.01147957	-0.01115898	-0.01078971	 0.00000000	 0.01078971	 0.01115898	 0.01147957	 0.01175184	 0.01197619	 0.01215298	 0.01228261	 0.01236543	 0.01240184	 0.01239220	 0.01190082	 0.01070302
                        20	 0.01264826	 0.00926399	 0.00644194	 0.00420629	 0.00374184	 0.00331593	 0.00292893	 0.00258123	 0.00227321	 0.00200524	 0.00177769	 0.00000000	-0.00177769	-0.00200524	-0.00227321	-0.00258123	-0.00292893	-0.00331593	-0.00374184	-0.00420629	-0.00470890	-0.00524930	-0.00778117	-0.01088736
                        30	 0.03051763	 0.02581655	 0.02145751	 0.01746472	 0.01652658	 0.01561322	 0.01472501	 0.01386234	 0.01302559	 0.01221512	 0.01143133	 0.00000000	-0.01143133	-0.01221512	-0.01302559	-0.01386234	-0.01472501	-0.01561322	-0.01652658	-0.01746472	-0.01842726	-0.01941382	-0.02359276	-0.02812584
                        60	 0.03806916	 0.03257081	 0.02622559	 0.01905770	 0.01714002	 0.01517281	 0.01315644	 0.01109131	 0.00897778	 0.00681624	 0.00460706	 0.00000000	-0.00460706	-0.00681624	-0.00897778	-0.01109131	-0.01315644	-0.01517281	-0.01714002	-0.01905770	-0.02092548	-0.02274297	-0.02950255	-0.03542735
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                    </tableData>
                    <tableData breakPoint="-10">
                        -20	       -16	       -12	        -8	        -7	        -6	        -5	        -4	        -3	        -2	        -1	         0	         1	         2	         3	         4	         5	         6	         7	         8	         9	        10	        14	        18
                        -20	-0.02669870	-0.01973896	-0.01221700	-0.00410863	-0.00198708	 0.00017302	 0.00237203	 0.00461033	 0.00688831	 0.00920634	 0.01156480	 0.00000000	-0.01156480	-0.00920634	-0.00688831	-0.00461033	-0.00237203	-0.00017302	 0.00198708	 0.00410863	 0.00619202	 0.00823762	 0.01604977	 0.02328760
                        -10	-0.02727796	-0.02350861	-0.01904493	-0.01386275	-0.01245211	-0.01099467	-0.00949005	-0.00793788	-0.00633778	-0.00468938	-0.00299229	 0.00000000	 0.00299229	 0.00468938	 0.00633778	 0.00793788	 0.00949005	 0.01099467	 0.01245211	 0.01386275	 0.01522698	 0.01654517	 0.02136507	 0.02547856
                        0	-0.02723778	-0.02617637	-0.02437660	-0.02181429	-0.02105173	-0.02023963	-0.01937759	-0.01846526	-0.01750224	-0.01648816	-0.01542264	 0.00000000	 0.01542264	 0.01648816	 0.01750224	 0.01846526	 0.01937759	 0.02023963	 0.02105173	 0.02181429	 0.02252768	 0.02319227	 0.02537029	 0.02679785
                        10	-0.01180117	-0.01296525	-0.01343500	-0.01318625	-0.01300896	-0.01278487	-0.01251361	-0.01219480	-0.01182806	-0.01141301	-0.01094927	 0.00000000	 0.01094927	 0.01141301	 0.01182806	 0.01219480	 0.01251361	 0.01278487	 0.01300896	 0.01318625	 0.01331712	 0.01340195	 0.01328843	 0.01246849
                        20	 0.01000862	 0.00710152	 0.00475663	 0.00299815	 0.00265299	 0.00234637	 0.00207867	 0.00185026	 0.00166153	 0.00151285	 0.00140460	 0.00000000	-0.00140460	-0.00151285	-0.00166153	-0.00185026	-0.00207867	-0.00234637	-0.00265299	-0.00299815	-0.00338147	-0.00380258	-0.00585729	-0.00848631
                        30	 0.02722960	 0.02306192	 0.01923629	 0.01577689	 0.01497210	 0.01419208	 0.01343723	 0.01270791	 0.01200450	 0.01132739	 0.01067694	 0.00000000	-0.01067694	-0.01132739	-0.01200450	-0.01270791	-0.01343723	-0.01419208	-0.01497210	-0.01577689	-0.01660608	-0.01745930	-0.02110484	-0.02510452
                        60	 0.03305707	 0.02800237	 0.02210080	 0.01537655	 0.01356978	 0.01171348	 0.00980804	 0.00785381	 0.00585120	 0.00380057	 0.00170230	 0.00000000	-0.00170230	-0.00380057	-0.00585120	-0.00785381	-0.00980804	-0.01171348	-0.01356978	-0.01537655	-0.01713342	-0.01884000	-0.02515593	-0.03063709
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                    </tableData>
                    <tableData breakPoint="-5">
                        -20	       -16	       -12	        -8	        -7	        -6	        -5	        -4	        -3	        -2	        -1	         0	         1	         2	         3	         4	         5	         6	         7	         8	         9	        10	        14	        18
                        -20	-0.02623346	-0.01945222	-0.01210876	-0.00417890	-0.00210197	 0.00001350	 0.00216788	 0.00436156	 0.00659491	 0.00886832	 0.01118215	 0.00000000	-0.01118215	-0.00886832	-0.00659491	-0.00436156	-0.00216788	-0.00001350	 0.00210197	 0.00417890	 0.00621766	 0.00821864	 0.01585228	 0.02291161
                        -10	-0.02771562	-0.02389624	-0.01938255	-0.01415034	-0.01272719	-0.01125724	-0.00974012	-0.00817544	-0.00656284	-0.00490192	-0.00319233	 0.00000000	 0.00319233	 0.00490192	 0.00656284	 0.00817544	 0.00974012	 0.01125724	 0.01272719	 0.01415034	 0.01552707	 0.01685777	 0.02172770	 0.02589121
                        0	-0.02847008	-0.02717319	-0.02513795	-0.02234016	-0.02151873	-0.02064775	-0.01972685	-0.01875564	-0.01773375	-0.01666080	-0.01553642	 0.00000000	 0.01553642	 0.01666080	 0.01773375	 0.01875564	 0.01972685	 0.02064775	 0.02151873	 0.02234016	 0.02311242	 0.02383588	 0.02624937	 0.02791242
                        10	-0.01371987	-0.01450608	-0.01459797	-0.01397136	-0.01369960	-0.01338105	-0.01301533	-0.01260205	-0.01214084	-0.01163133	-0.01107313	 0.00000000	 0.01107313	 0.01163133	 0.01214084	 0.01260205	 0.01301533	 0.01338105	 0.01369960	 0.01397136	 0.01419669	 0.01437599	 0.01464033	 0.01419825
                        20	 0.00751181	 0.00508187	 0.00321415	 0.00193283	 0.00170696	 0.00151963	 0.00137122	 0.00126211	 0.00119267	 0.00116328	 0.00117432	 0.00000000	-0.00117432	-0.00116328	-0.00119267	-0.00126211	-0.00137122	-0.00151963	-0.00170696	-0.00193283	-0.00219686	-0.00249868	-0.00407622	-0.00622807
                        30	 0.02426292	 0.02062863	 0.01733640	 0.01441039	 0.01373895	 0.01309229	 0.01247079	 0.01187482	 0.01130476	 0.01076099	 0.01024389	 0.00000000	-0.01024389	-0.01076099	-0.01130476	-0.01187482	-0.01247079	-0.01309229	-0.01373895	-0.01441039	-0.01510624	-0.01582610	-0.01893825	-0.02240453
                        60	 0.02933032	 0.02471927	 0.01926135	 0.01298076	 0.01128490	 0.00953951	 0.00774497	 0.00590166	 0.00400996	 0.00207024	 0.00008288	 0.00000000	-0.00008288	-0.00207024	-0.00400996	-0.00590166	-0.00774497	-0.00953951	-0.01128490	-0.01298076	-0.01462671	-0.01622238	-0.02209466	-0.02713217
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                    </tableData>
                    <tableData breakPoint="0">
                        -20	       -16	       -12	        -8	        -7	        -6	        -5	        -4	        -3	        -2	        -1	         0	         1	         2	         3	         4	         5	         6	         7	         8	         9	        10	        14	        18
                        -20	-0.02562541	-0.01902267	-0.01185771	-0.00410635	-0.00207405	-0.00000321	 0.00210655	 0.00425560	 0.00644433	 0.00867311	 0.01094232	 0.00000000	-0.01094232	-0.00867311	-0.00644433	-0.00425560	-0.00210655	 0.00000321	 0.00207405	 0.00410635	 0.00610049	 0.00805685	 0.01551198	 0.02239281
                        -10	-0.02811758	-0.02424818	-0.01968445	-0.01440222	-0.01296656	-0.01148411	-0.00995448	-0.00837730	-0.00675219	-0.00507877	-0.00335666	 0.00000000	 0.00335666	 0.00507877	 0.00675219	 0.00837730	 0.00995448	 0.01148411	 0.01296656	 0.01440222	 0.01579146	 0.01713466	 0.02205462	 0.02626816
                        0	-0.02970239	-0.02817002	-0.02589929	-0.02286602	-0.02198573	-0.02105588	-0.02007611	-0.01904603	-0.01796527	-0.01683345	-0.01565019	 0.00000000	 0.01565019	 0.01683345	 0.01796527	 0.01904603	 0.02007611	 0.02105588	 0.02198573	 0.02286602	 0.02369715	 0.02447949	 0.02712846	 0.02902699
                        10	-0.01560285	-0.01601121	-0.01572524	-0.01472076	-0.01435454	-0.01394153	-0.01348134	-0.01297360	-0.01241792	-0.01181394	-0.01116128	 0.00000000	 0.01116128	 0.01181394	 0.01241792	 0.01297360	 0.01348134	 0.01394153	 0.01435454	 0.01472076	 0.01504056	 0.01531433	 0.01595652	 0.01589231
                        20	 0.00515781	 0.00320503	 0.00181448	 0.00101033	 0.00090375	 0.00083571	 0.00080659	 0.00081677	 0.00086662	 0.00095652	 0.00108685	 0.00000000	-0.00108685	-0.00095652	-0.00086662	-0.00081677	-0.00080659	-0.00083571	-0.00090375	-0.00101033	-0.00115507	-0.00133759	-0.00243797	-0.00411265
                        30	 0.02161757	 0.01851668	 0.01575784	 0.01336524	 0.01282715	 0.01231383	 0.01182568	 0.01136306	 0.01092635	 0.01051593	 0.01013218	 0.00000000	-0.01013218	-0.01051593	-0.01092635	-0.01136306	-0.01182568	-0.01231383	-0.01282715	-0.01336524	-0.01392773	-0.01451425	-0.01709299	-0.02002588
                        60	 0.02688892	 0.02272152	 0.01770725	 0.01187031	 0.01028536	 0.00865088	 0.00696726	 0.00523486	 0.00345407	 0.00162527	-0.00025118	 0.00000000	 0.00025118	-0.00162527	-0.00345407	-0.00523486	-0.00696726	-0.00865088	-0.01028536	-0.01187031	-0.01340535	-0.01489010	-0.02031873	-0.02491259
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                    </tableData>
                    <tableData breakPoint="5">
                        -20	       -16	       -12	        -8	        -7	        -6	        -5	        -4	        -3	        -2	        -1	         0	         1	         2	         3	         4	         5	         6	         7	         8	         9	        10	        14	        18
                        -20	-0.02487454	-0.01845031	-0.01146385	-0.00389099	-0.00190331	 0.00012290	 0.00218804	 0.00429247	 0.00643657	 0.00862072	 0.01084531	 0.00000000	-0.01084531	-0.00862072	-0.00643657	-0.00429247	-0.00218804	-0.00012290	 0.00190331	 0.00389099	 0.00584050	 0.00775223	 0.01502887	 0.02173119
                        -10	-0.02848384	-0.02456441	-0.01995066	-0.01461840	-0.01317023	-0.01167527	-0.01013314	-0.00854345	-0.00690583	-0.00521991	-0.00348529	 0.00000000	 0.00348529	 0.00521991	 0.00690583	 0.00854345	 0.01013314	 0.01167527	 0.01317023	 0.01461840	 0.01602015	 0.01737585	 0.02234583	 0.02660940
                        0	-0.03093470	-0.02916685	-0.02666064	-0.02339189	-0.02245272	-0.02146400	-0.02042536	-0.01933641	-0.01819679	-0.01700610	-0.01576397	 0.00000000	 0.01576397	 0.01700610	 0.01819679	 0.01933641	 0.02042536	 0.02146400	 0.02245272	 0.02339189	 0.02428189	 0.02512309	 0.02800755	 0.03014155
                        10	-0.01745014	-0.01748063	-0.01681680	-0.01543447	-0.01497378	-0.01446630	-0.01391165	-0.01330944	-0.01265930	-0.01196086	-0.01121373	 0.00000000	 0.01121373	 0.01196086	 0.01265930	 0.01330944	 0.01391165	 0.01446630	 0.01497378	 0.01543447	 0.01584873	 0.01621696	 0.01723702	 0.01755066
                        20	 0.00294662	 0.00147101	 0.00055762	 0.00023064	 0.00024336	 0.00029461	 0.00038478	 0.00051425	 0.00068339	 0.00089258	 0.00114221	 0.00000000	-0.00114221	-0.00089258	-0.00068339	-0.00051425	-0.00038478	-0.00029461	-0.00024336	-0.00023064	-0.00025609	-0.00031932	-0.00094253	-0.00214005
                        30	 0.01929356	 0.01672607	 0.01450062	 0.01264142	 0.01223668	 0.01185671	 0.01150191	 0.01117264	 0.01086928	 0.01059221	 0.01034181	 0.00000000	-0.01034181	-0.01059221	-0.01086928	-0.01117264	-0.01150191	-0.01185671	-0.01223668	-0.01264142	-0.01307056	-0.01352373	-0.01556908	-0.01796857
                        60	 0.02573288	 0.02200912	 0.01743850	 0.01204520	 0.01057117	 0.00904761	 0.00747490	 0.00585341	 0.00418353	 0.00246564	 0.00070010	 0.00000000	-0.00070010	-0.00246564	-0.00418353	-0.00585341	-0.00747490	-0.00904761	-0.01057117	-0.01204520	-0.01346933	-0.01484318	-0.01982816	-0.02397837
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                    </tableData>
                    <tableData breakPoint="10">
                        -20	       -16	       -12	        -8	        -7	        -6	        -5	        -4	        -3	        -2	        -1	         0	         1	         2	         3	         4	         5	         6	         7	         8	         9	        10	        14	        18
                        -20	-0.02398086	-0.01773512	-0.01092717	-0.00353281	-0.00158976	 0.00039183	 0.00241234	 0.00447214	 0.00657162	 0.00871115	 0.01089111	 0.00000000	-0.01089111	-0.00871115	-0.00657162	-0.00447214	-0.00241234	-0.00039183	 0.00158976	 0.00353281	 0.00543770	 0.00730480	 0.01440293	 0.02092676
                        -10	-0.02881439	-0.02484493	-0.02018116	-0.01479887	-0.01333820	-0.01183073	-0.01027609	-0.00867390	-0.00702377	-0.00532534	-0.00357822	 0.00000000	 0.00357822	 0.00532534	 0.00702377	 0.00867390	 0.01027609	 0.01183073	 0.01333820	 0.01479887	 0.01621313	 0.01758134	 0.02260135	 0.02691494
                        0	-0.03216700	-0.03016367	-0.02742198	-0.02391776	-0.02291972	-0.02187213	-0.02077462	-0.01962680	-0.01842830	-0.01717874	-0.01587775	 0.00000000	 0.01587775	 0.01717874	 0.01842830	 0.01962680	 0.02077462	 0.02187213	 0.02291972	 0.02391776	 0.02486662	 0.02576670	 0.02888663	 0.03125612
                        10	-0.01926171	-0.01891435	-0.01787266	-0.01611247	-0.01555732	-0.01495537	-0.01430625	-0.01360958	-0.01286498	-0.01207207	-0.01123047	 0.00000000	 0.01123047	 0.01207207	 0.01286498	 0.01360958	 0.01430625	 0.01495537	 0.01555732	 0.01611247	 0.01662120	 0.01708389	 0.01848181	 0.01917331
                        20	 0.00087825	-0.00012019	-0.00055641	-0.00040623	-0.00027422	-0.00010368	 0.00010579	 0.00035454	 0.00064298	 0.00097146	 0.00134038	 0.00000000	-0.00134038	-0.00097146	-0.00064298	-0.00035454	-0.00010579	 0.00010368	 0.00027422	 0.00040623	 0.00050007	 0.00055613	 0.00041009	-0.00031027
                        30	 0.01729088	 0.01525679	 0.01356474	 0.01223894	 0.01196754	 0.01172093	 0.01149947	 0.01130355	 0.01113354	 0.01098982	 0.01087278	 0.00000000	-0.01087278	-0.01098982	-0.01113354	-0.01130355	-0.01149947	-0.01172093	-0.01196754	-0.01223894	-0.01253473	-0.01285455	-0.01436650	-0.01623259
                        60	 0.02586218	 0.02258207	 0.01845510	 0.01350545	 0.01214233	 0.01072968	 0.00926788	 0.00775731	 0.00619834	 0.00459136	 0.00293674	 0.00000000	-0.00293674	-0.00459136	-0.00619834	-0.00775731	-0.00926788	-0.01072968	-0.01214233	-0.01350545	-0.01481867	-0.01608160	-0.02062293	-0.02432949
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                    </tableData>
                    <tableData breakPoint="15">
                        -20	       -16	       -12	        -8	        -7	        -6	        -5	        -4	        -3	        -2	        -1	         0	         1	         2	         3	         4	         5	         6	         7	         8	         9	        10	        14	        18
                        -20	-0.02294435	-0.01687712	-0.01024767	-0.00303181	-0.00113339	 0.00080358	 0.00277946	 0.00479464	 0.00684949	 0.00894439	 0.01107972	 0.00000000	-0.01107972	-0.00894439	-0.00684949	-0.00479464	-0.00277946	-0.00080358	 0.00113339	 0.00303181	 0.00489207	 0.00671455	 0.01363419	 0.01997950
                        -10	-0.02910923	-0.02508975	-0.02037595	-0.01494364	-0.01347046	-0.01195049	-0.01038334	-0.00876864	-0.00710601	-0.00539507	-0.00363545	 0.00000000	 0.00363545	 0.00539507	 0.00710601	 0.00876864	 0.01038334	 0.01195049	 0.01347046	 0.01494364	 0.01637040	 0.01775112	 0.02282116	 0.02718477
                        0	-0.03339931	-0.03116050	-0.02818333	-0.02444362	-0.02338671	-0.02228026	-0.02112387	-0.01991719	-0.01865982	-0.01735139	-0.01599152	 0.00000000	 0.01599152	 0.01735139	 0.01865982	 0.01991719	 0.02112387	 0.02228026	 0.02338671	 0.02444362	 0.02545136	 0.02641031	 0.02976572	 0.03237069
                        10	-0.02103759	-0.02031236	-0.01889281	-0.01675476	-0.01610514	-0.01540873	-0.01466515	-0.01387401	-0.01303494	-0.01214757	-0.01121151	 0.00000000	 0.01121151	 0.01214757	 0.01303494	 0.01387401	 0.01466515	 0.01540873	 0.01610514	 0.01675476	 0.01735796	 0.01791511	 0.01969089	 0.02076025
                        20	-0.00104730	-0.00156858	-0.00152763	-0.00090028	-0.00064899	-0.00035915	-0.00003039	 0.00033766	 0.00074538	 0.00119316	 0.00168136	 0.00000000	-0.00168136	-0.00119316	-0.00074538	-0.00033766	 0.00003039	 0.00035915	 0.00064899	 0.00090028	 0.00111342	 0.00128877	 0.00161989	 0.00137670
                        30	 0.01560954	 0.01410885	 0.01295020	 0.01215779	 0.01201975	 0.01190648	 0.01181838	 0.01175580	 0.01171914	 0.01170878	 0.01172508	 0.00000000	-0.01172508	-0.01170878	-0.01171914	-0.01175580	-0.01181838	-0.01190648	-0.01201975	-0.01215779	-0.01232024	-0.01250671	-0.01348526	-0.01481795
                        60	 0.02727682	 0.02444037	 0.02075705	 0.01625105	 0.01499884	 0.01369710	 0.01234621	 0.01094655	 0.00949850	 0.00800242	 0.00645872	 0.00000000	-0.00645872	-0.00800242	-0.00949850	-0.01094655	-0.01234621	-0.01369710	-0.01499884	-0.01625105	-0.01745335	-0.01860537	-0.02270305	-0.02596597
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                    </tableData>
                    <tableData breakPoint="20">
                        -20	       -16	       -12	        -8	        -7	        -6	        -5	        -4	        -3	        -2	        -1	         0	         1	         2	         3	         4	         5	         6	         7	         8	         9	        10	        14	        18
                        -20	-0.02176504	-0.01587631	-0.00942536	-0.00238800	-0.00053420	 0.00135814	 0.00328940	 0.00525995	 0.00727017	 0.00932045	 0.01141116	 0.00000000	-0.01141116	-0.00932045	-0.00727017	-0.00525995	-0.00328940	-0.00135814	 0.00053420	 0.00238800	 0.00420364	 0.00598149	 0.01272262	 0.01888944
                        -10	-0.02936838	-0.02529887	-0.02053504	-0.01505271	-0.01356702	-0.01203454	-0.01045489	-0.00882768	-0.00715254	-0.00542910	-0.00365697	 0.00000000	 0.00365697	 0.00542910	 0.00715254	 0.00882768	 0.01045489	 0.01203454	 0.01356702	 0.01505271	 0.01649197	 0.01788520	 0.02300526	 0.02741890
                        0	-0.03463162	-0.03215732	-0.02894468	-0.02496949	-0.02385371	-0.02268838	-0.02147313	-0.02020757	-0.01889133	-0.01752404	-0.01610530	 0.00000000	 0.01610530	 0.01752404	 0.01889133	 0.02020757	 0.02147313	 0.02268838	 0.02385371	 0.02496949	 0.02603610	 0.02705391	 0.03064481	 0.03348525
                        10	-0.02277776	-0.02167467	-0.01987727	-0.01736135	-0.01661727	-0.01582639	-0.01498834	-0.01410274	-0.01316921	-0.01218737	-0.01115684	 0.00000000	 0.01115684	 0.01218737	 0.01316921	 0.01410274	 0.01498834	 0.01582639	 0.01661727	 0.01736135	 0.01805901	 0.01871063	 0.02086427	 0.02231149
                        20	-0.00283003	-0.00287414	-0.00235604	-0.00125152	-0.00088093	-0.00047180	-0.00002376	 0.00046358	 0.00099060	 0.00155767	 0.00216516	 0.00000000	-0.00216516	-0.00155767	-0.00099060	-0.00046358	 0.00002376	 0.00047180	 0.00088093	 0.00125152	 0.00158395	 0.00187859	 0.00268688	 0.00292086
                        30	 0.01424954	 0.01328224	 0.01265700	 0.01239798	 0.01239329	 0.01241337	 0.01245862	 0.01252939	 0.01262608	 0.01274906	 0.01289871	 0.00000000	-0.01289871	-0.01274906	-0.01262608	-0.01252939	-0.01245862	-0.01241337	-0.01239329	-0.01239798	-0.01242708	-0.01248020	-0.01292535	-0.01372465
                        60	 0.02997682	 0.02758401	 0.02434434	 0.02028199	 0.01914069	 0.01794986	 0.01670989	 0.01542114	 0.01408400	 0.01269884	 0.01126604	 0.00000000	-0.01126604	-0.01269884	-0.01408400	-0.01542114	-0.01670989	-0.01794986	-0.01914069	-0.02028199	-0.02137338	-0.02241449	-0.02606852	-0.02888779
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                    </tableData>
                    <tableData breakPoint="25">
                        -20	       -16	       -12	        -8	        -7	        -6	        -5	        -4	        -3	        -2	        -1	         0	         1	         2	         3	         4	         5	         6	         7	         8	         9	        10	        14	        18
                        -20	-0.02044290	-0.01473267	-0.00846022	-0.00160137	 0.00020780	 0.00205552	 0.00394215	 0.00586807	 0.00783368	 0.00983933	 0.01188541	 0.00000000	-0.01188541	-0.00983933	-0.00783368	-0.00586807	-0.00394215	-0.00205552	-0.00020780	 0.00160137	 0.00337238	 0.00510561	 0.01166824	 0.01765655
                        -10	-0.02959182	-0.02547229	-0.02065843	-0.01512607	-0.01362788	-0.01208289	-0.01049073	-0.00885101	-0.00716337	-0.00542742	-0.00364278	 0.00000000	 0.00364278	 0.00542742	 0.00716337	 0.00885101	 0.01049073	 0.01208289	 0.01362788	 0.01512607	 0.01657784	 0.01798358	 0.02315366	 0.02761733
                        0	-0.03586392	-0.03315415	-0.02970602	-0.02549536	-0.02432071	-0.02309651	-0.02182239	-0.02049796	-0.01912285	-0.01769668	-0.01621907	 0.00000000	 0.01621907	 0.01769668	 0.01912285	 0.02049796	 0.02182239	 0.02309651	 0.02432071	 0.02549536	 0.02662083	 0.02769752	 0.03152389	 0.03459982
                        10	-0.02448223	-0.02300128	-0.02082601	-0.01793224	-0.01709369	-0.01620835	-0.01527584	-0.01429577	-0.01326777	-0.01219147	-0.01106648	 0.00000000	 0.01106648	 0.01219147	 0.01326777	 0.01429577	 0.01527584	 0.01620835	 0.01709369	 0.01793224	 0.01872436	 0.01947045	 0.02200195	 0.02382703
                        20	-0.00446995	-0.00403690	-0.00304162	-0.00145994	-0.00097006	-0.00044164	 0.00012570	 0.00073233	 0.00137864	 0.00206500	 0.00279178	 0.00000000	-0.00279178	-0.00206500	-0.00137864	-0.00073233	-0.00012570	 0.00044164	 0.00097006	 0.00145994	 0.00191166	 0.00232559	 0.00361105	 0.00432219
                        30	 0.01321088	 0.01277698	 0.01268513	 0.01295951	 0.01308817	 0.01324160	 0.01342019	 0.01362432	 0.01385436	 0.01411069	 0.01439369	 0.00000000	-0.01439369	-0.01411069	-0.01385436	-0.01362432	-0.01342019	-0.01324160	-0.01308817	-0.01295951	-0.01285526	-0.01277503	-0.01268679	-0.01295268
                        60	 0.03396217	 0.03201301	 0.02921698	 0.02559828	 0.02456789	 0.02348798	 0.02235892	 0.02118108	 0.01995485	 0.01868061	 0.01735872	 0.00000000	-0.01735872	-0.01868061	-0.01995485	-0.02118108	-0.02235892	-0.02348798	-0.02456789	-0.02559828	-0.02657876	-0.02750895	-0.03071934	-0.03309496
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                    </tableData>
                    <tableData breakPoint="30">
                        -20	       -16	       -12	        -8	        -7	        -6	        -5	        -4	        -3	        -2	        -1	         0	         1	         2	         3	         4	         5	         6	         7	         8	         9	        10	        14	        18
                        -20	-0.01897795	-0.01344622	-0.00735228	-0.00067193	 0.00109262	 0.00289571	 0.00473772	 0.00661902	 0.00853999	 0.01050102	 0.01250248	 0.00000000	-0.01250248	-0.01050102	-0.00853999	-0.00661902	-0.00473772	-0.00289571	-0.00109262	 0.00067193	 0.00239831	 0.00408691	 0.01047104	 0.01628085
                        -10	-0.02977955	-0.02560999	-0.02074611	-0.01516373	-0.01365303	-0.01209553	-0.01049087	-0.00883865	-0.00713850	-0.00539004	-0.00359289	 0.00000000	 0.00359289	 0.00539004	 0.00713850	 0.00883865	 0.01049087	 0.01209553	 0.01365303	 0.01516373	 0.01662801	 0.01804625	 0.02326636	 0.02778005
                        0	-0.03709623	-0.03415098	-0.03046737	-0.02602122	-0.02478770	-0.02350464	-0.02217164	-0.02078835	-0.01935437	-0.01786933	-0.01633285	 0.00000000	 0.01633285	 0.01786933	 0.01935437	 0.02078835	 0.02217164	 0.02350464	 0.02478770	 0.02602122	 0.02720557	 0.02834113	 0.03240298	 0.03571439
                        10	-0.02615099	-0.02429218	-0.02173905	-0.01846742	-0.01753441	-0.01655460	-0.01552762	-0.01445309	-0.01333063	-0.01215986	-0.01094040	 0.00000000	 0.01094040	 0.01215986	 0.01333063	 0.01445309	 0.01552762	 0.01655460	 0.01753441	 0.01846742	 0.01935401	 0.02019456	 0.02310392	 0.02530686
                        20	-0.00596706	-0.00505683	-0.00358439	-0.00152555	-0.00091638	-0.00026866	 0.00041797	 0.00114389	 0.00190949	 0.00271514	 0.00356122	 0.00000000	-0.00356122	-0.00271514	-0.00190949	-0.00114389	-0.00041797	 0.00026866	 0.00091638	 0.00152555	 0.00209656	 0.00262978	 0.00439240	 0.00558071
                        30	 0.01249355	 0.01259305	 0.01303460	 0.01384238	 0.01410438	 0.01439117	 0.01470311	 0.01504058	 0.01540397	 0.01579365	 0.01621000	 0.00000000	-0.01621000	-0.01579365	-0.01540397	-0.01504058	-0.01470311	-0.01439117	-0.01410438	-0.01384238	-0.01360478	-0.01339120	-0.01276955	-0.01250206
                        60	 0.03923286	 0.03772735	 0.03537497	 0.03219992	 0.03128045	 0.03031144	 0.02929329	 0.02822637	 0.02711105	 0.02594772	 0.02473675	 0.00000000	-0.02473675	-0.02594772	-0.02711105	-0.02822637	-0.02929329	-0.03031144	-0.03128045	-0.03219992	-0.03306949	-0.03388877	-0.03665551	-0.03858747
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                    </tableData>
                </table>
            </product>
        </function>
        <function name="aero/coefficients/CMNDAD">
            <description>YAWING MOMENT DUE TO AILERON DEFLECTION -CNDA</description>
            <product>
                <property>fcs/aileron-pos-deg</property>
                <table>
                    <independentVar lookup="row">aero/alpha-deg</independentVar>
                    <tableData>
                        -20		 0.00007779
                        -19		 0.00006879
                        -9		 0.00007427
                        1		 0.00007943
                        11		 0.00001317
                        21		-0.00007624
                        31		-0.00012077
                        60		 0.00000085
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                    </tableData>
                </table>
            </product>
        </function>
        <function name="aero/coefficients/CMNDRDr">
            <description>YAWING MOMENT DUE TO RUDDER DEFLECTION -CNDR</description>
            <product>
                <property>fcs/rudder-pos-deg</property>
                <value>
                    0.89 <!-- DRFLX3 -->
                </value>
                <property>aero/coefficients/EPA43</property>
                <table>
                    <independentVar lookup="row">aero/alpha-deg</independentVar>
                    <independentVar lookup="column">aero/beta-deg</independentVar>
                    <tableData>
                        -20	        -16	        -12	         -8	         -7	         -6	         -5	         -4	         -3	         -2	         -1	          0	          1	          2	          3	          4	          5	          6	          7	          8	          9	         10	         14	         18
                        -20	-0.00233301	-0.00230436	-0.00227570	-0.00224704	-0.00223988	-0.00223272	-0.00222555	-0.00221839	-0.00221123	-0.00220406	-0.00219690	-0.00218973	-0.00218257	-0.00217541	-0.00216824	-0.00216108	-0.00215392	-0.00214675	-0.00213959	-0.00213242	-0.00212526	-0.00211810	-0.00208944	-0.00206079
                        -10	-0.00220362	-0.00219188	-0.00218014	-0.00216840	-0.00216546	-0.00216253	-0.00215959	-0.00215666	-0.00215372	-0.00215079	-0.00214785	-0.00214492	-0.00214198	-0.00213905	-0.00213611	-0.00213318	-0.00213024	-0.00212731	-0.00212437	-0.00212144	-0.00211850	-0.00211556	-0.00210382	-0.00209208
                        0	-0.00150815	-0.00151332	-0.00151850	-0.00152367	-0.00152497	-0.00152626	-0.00152755	-0.00152885	-0.00153014	-0.00153143	-0.00153273	-0.00153402	-0.00153531	-0.00153661	-0.00153790	-0.00153919	-0.00154049	-0.00154178	-0.00154307	-0.00154437	-0.00154566	-0.00154695	-0.00155213	-0.00155730
                        10	-0.00116009	-0.00118217	-0.00120426	-0.00122635	-0.00123187	-0.00123740	-0.00124292	-0.00124844	-0.00125396	-0.00125948	-0.00126501	-0.00127053	-0.00127605	-0.00128157	-0.00128710	-0.00129262	-0.00129814	-0.00130366	-0.00130918	-0.00131471	-0.00132023	-0.00132575	-0.00134784	-0.00136993
                        20	-0.00070836	-0.00074736	-0.00078636	-0.00082537	-0.00083512	-0.00084487	-0.00085462	-0.00086437	-0.00087412	-0.00088387	-0.00089362	-0.00090337	-0.00091312	-0.00092288	-0.00093263	-0.00094238	-0.00095213	-0.00096188	-0.00097163	-0.00098138	-0.00099113	-0.00100088	-0.00103988	-0.00107889
                        30	-0.00011419	-0.00017011	-0.00022603	-0.00028195	-0.00029593	-0.00030990	-0.00032388	-0.00033786	-0.00035184	-0.00036582	-0.00037980	-0.00039378	-0.00040776	-0.00042174	-0.00043572	-0.00044970	-0.00046368	-0.00047766	-0.00049164	-0.00050562	-0.00051960	-0.00053357	-0.00058949	-0.00064541
                        60	 0.00065481	 0.00054814	 0.00044148	 0.00033482	 0.00030816	 0.00028149	 0.00025483	 0.00022816	 0.00020150	 0.00017483	 0.00014817	 0.00012150	 0.00009484	 0.00006817	 0.00004150	 0.00001484	-0.00001183	-0.00003849	-0.00006516	-0.00009182	-0.00011849	-0.00014515	-0.00025181	-0.00035847
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                    </tableData>
                </table>
            </product>
        </function>
        <function name="aero/coefficients/CMNDTD">
            <description>YAWING MOMENT DUE TO DIFFERENTIAL TAIL DEFLECTION - CNDDT</description>
            <product>
                <value>
                    0.975 <!-- DTFLX3 -->
                </value>
                <value>0.3</value>
                <property>fcs/differential-elevator-pos-deg</property>
                <table>
                    <independentVar lookup="row">aero/alpha-deg</independentVar>
                    <independentVar lookup="column">fcs/elevator-pos-deg</independentVar>
                    <tableData>
                        -30	        -25	        -20	        -15	        -10	         -5	          0	          5	         10	         15	         20	         25	         30
                        -20	 0.00163093	 0.00139340	 0.00116573	 0.00094789	 0.00073989	 0.00054174	 0.00035343	 0.00017496	 0.00000633	-0.00015245	-0.00030139	-0.00044049	-0.00056975
                        -10	 0.00146644	 0.00124727	 0.00103794	 0.00083844	 0.00064880	 0.00046899	 0.00029903	 0.00013890	-0.00001138	-0.00015181	-0.00028241	-0.00040316	-0.00051407
                        0	 0.00164020	 0.00143937	 0.00124838	 0.00106724	 0.00089594	 0.00073448	 0.00058286	 0.00044108	 0.00030915	 0.00018706	 0.00007481	-0.00002760	-0.00012016
                        10	 0.00142063	 0.00123815	 0.00106551	 0.00090271	 0.00074976	 0.00060664	 0.00047337	 0.00034994	 0.00023636	 0.00013261	 0.00003871	-0.00004535	-0.00011957
                        20	 0.00083089	 0.00066675	 0.00051246	 0.00036801	 0.00023340	 0.00010863	-0.00000629	-0.00011137	-0.00020661	-0.00029201	-0.00036757	-0.00043328	-0.00048915
                        30	 0.00018091	 0.00003512	-0.00010083	-0.00022693	-0.00034320	-0.00044962	-0.00054619	-0.00063293	-0.00070982	-0.00077688	-0.00083409	-0.00088145	-0.00091898
                        60	-0.00037910	-0.00046985	-0.00055075	-0.00062182	-0.00068304	-0.00073442	-0.00077596	-0.00080766	-0.00082951	-0.00084153	-0.00084370	-0.00083602	-0.00081851
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                    </tableData>
                </table>
            </product>
        </function>
        <function name="aero/coefficients/CMNP">
            <description>YAWING MOMENT DUE TO ROLL RATE - CNP</description>
            <product>
                <property>aero/pb</property>
                <table>
                    <independentVar lookup="row">aero/alpha-deg</independentVar>
                    <tableData>
                        -20		 0.06927476
                        -19		 0.11136042
                        -9		 0.03387676
                        1		-0.02514282
                        11		 0.00024487
                        21		-0.08378652
                        31		-0.08429094
                        60		-0.06638497
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                    </tableData>
                </table>
            </product>
        </function>
        <function name="aero/coefficients/CMNR">
            <description>YAW DAMPING DERIVATIVE - CMNR</description>
            <product>
                <property>aero/rb</property>
                <table>
                    <independentVar lookup="row">aero/alpha-deg</independentVar>
                    <tableData>
                        -20		-0.28050000
                        -19		-0.28050000
                        -9		-0.28050000
                        1		-0.30660535
                        11		-0.30626834
                        21		-0.44026180
                        31		-0.06432659
                        60		-0.11000000
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                    </tableData>
                </table>
            </product>
        </function>
        <function name="aero/coefficients/CMNRB">
            <description>ASYMMETRIC CN AT HIGH ALPHA</description>
            <product>
                <table>
                    <independentVar lookup="row">aero/alpha-deg</independentVar>
                    <independentVar lookup="column">aero/beta-deg</independentVar>
                    <tableData>
                        -20	        -16	        -12	         -8	         -7	         -6	         -5	         -4	         -3	         -2	         -1	          0	          1	          2	          3	          4	          5	          6	          7	          8	          9	         10	         14	         18
                        -20	 0.00000000	 0.00000000	 0.00000000	 0.00000000	 0.00000000	 0.00000000	 0.00000000	 0.00000000	 0.00000000	 0.00000000	 0.00000000	 0.00000000	 0.00000000	 0.00000000	 0.00000000	 0.00000000	 0.00000000	 0.00000000	 0.00000000	 0.00000000	 0.00000000	 0.00000000	 0.00000000	 0.00000000
                        -10	 0.00000000	 0.00000000	 0.00000000	 0.00000000	 0.00000000	 0.00000000	 0.00000000	 0.00000000	 0.00000000	 0.00000000	 0.00000000	 0.00000000	 0.00000000	 0.00000000	 0.00000000	 0.00000000	 0.00000000	 0.00000000	 0.00000000	 0.00000000	 0.00000000	 0.00000000	 0.00000000	 0.00000000
                        0	 0.00000000	 0.00000000	 0.00000000	 0.00000000	 0.00000000	 0.00000000	 0.00000000	 0.00000000	 0.00000000	 0.00000000	 0.00000000	 0.00000000	 0.00000000	 0.00000000	 0.00000000	 0.00000000	 0.00000000	 0.00000000	 0.00000000	 0.00000000	 0.00000000	 0.00000000	 0.00000000	 0.00000000
                        10	 0.00000000	 0.00000000	 0.00000000	 0.00000000	 0.00000000	 0.00000000	 0.00000000	 0.00000000	 0.00000000	 0.00000000	 0.00000000	 0.00000000	 0.00000000	 0.00000000	 0.00000000	 0.00000000	 0.00000000	 0.00000000	 0.00000000	 0.00000000	 0.00000000	 0.00000000	 0.00000000	 0.00000000
                        20	 0.00000000	 0.00000000	 0.00000000	 0.00000000	 0.00000000	 0.00000000	 0.00000000	 0.00000000	 0.00000000	 0.00000000	 0.00000000	 0.00000000	 0.00000000	 0.00000000	 0.00000000	 0.00000000	 0.00000000	 0.00000000	 0.00000000	 0.00000000	 0.00000000	 0.00000000	 0.00000000	 0.00000000
                        30	 0.00000000	 0.00000000	 0.00000000	 0.00000000	 0.00000000	 0.00000000	 0.00000000	 0.00000000	 0.00000000	 0.00000000	 0.00000000	 0.00000000	 0.00000000	 0.00000000	 0.00000000	 0.00000000	 0.00000000	 0.00000000	 0.00000000	 0.00000000	 0.00000000	 0.00000000	 0.00000000	 0.00000000
                        60	 0.00000000	 0.00000000	 0.00000000	 0.00000000	 0.00000000	 0.00000000	 0.00000000	 0.00000000	 0.00000000	 0.00000000	 0.00000000	 0.00000000	 0.00000000	 0.00000000	 0.00000000	 0.00000000	 0.00000000	 0.00000000	 0.00000000	 0.00000000	 0.00000000	 0.02686392	 0.01392576	 0.00210560
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                    </tableData>
                </table>
            </product>
        </function>
        <function name="aero/coefficients/CNMach">
            <description>Yaw Mach factor (NASA-TM-84643 Figure 3 Clalpha) and values for AOA derived from NASA-aaia-2000-0900 Figure 4</description>
            <product>
                <table>
                    <independentVar lookup="row">velocities/mach</independentVar>
                    <tableData>
                        0.202		 1.25794500
                        0.306		 1.14121500
                        0.705		 0.99095090
                        0.934		 1.07933440
                        1.048		 2.14446970
                        1.797		 2.13606970
                        2.091		 2.03300270
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                    </tableData>
                </table>
            </product>
        </function>
        <function name="aero/coefficients/CLIFT">
            <sum>
                <property>aero/coefficients/CFZB</property>
                <property>aero/coefficients/ClDFM</property>
                <property>aero/coefficients/ClUC</property>
                <property>aero/coefficients/DClRamp</property>
            </sum>
        </function>
        <axis name="LIFT">
            <function name="aero/force/LIFT">
                <product>
                    <property>aero/qbar-psf</property>
                    <property>metrics/Sw-sqft</property>
                    <property>aero/coefficients/CLIFT</property>
                    <property>aero/coefficients/ClMach</property>
                </product>
            </function>
        </axis>
        <function name="aero/coefficients/CDRAG">
            <sum>
                <property>aero/coefficients/CFXB</property>
                <property>aero/coefficients/CdTNK</property>
                <property>aero/coefficients/CdUC</property>
                <property>aero/coefficients/CdDBRK</property>
                <property>aero/coefficients/CdDFM</property>
                <property>aero/coefficients/DCdRamp</property>
            </sum>
        </function>
        <axis name="DRAG">
            <function name="aero/force/DRAG">
                <product>
                    <property>aero/qbar-psf</property>
                    <property>metrics/Sw-sqft</property>
                    <property>aero/coefficients/CDRAG</property>
                    <property>aero/coefficients/CdMach</property>
                </product>
            </function>
        </axis>
        <function name="aero/coefficients/CSIDE">
            <sum>
                <property>aero/coefficients/CFYB</property>
                <property>aero/coefficients/CFYP</property>
                <property>aero/coefficients/CFYR</property>
                <property>aero/coefficients/CYDAD</property>
                <property>aero/coefficients/CYDRD</property>
                <property>aero/coefficients/CYDTD</property>
                <property>aero/coefficients/CYRB</property>
            </sum>
        </function>
        <axis name="SIDE">
            <function name="aero/force/SIDE">
                <product>
                    <property>aero/qbar-psf</property>
                    <property>metrics/Sw-sqft</property>
                    <property>aero/coefficients/CSIDE</property>
                    <property>aero/coefficients/CyMach</property>
                </product>
            </function>
        </axis>
        <function name="aero/coefficients/CROLL">
            <sum>
                <property>aero/coefficients/CML1</property>
                <property>aero/coefficients/CMLP</property>
                <property>aero/coefficients/CMLR</property>
                <property>aero/coefficients/CMLDAD</property>
                <property>aero/coefficients/CMLDRD</property>
                <property>aero/coefficients/CMLDTD</property>
                <property>aero/coefficients/CMLDCLB</property>
            </sum>
        </function>
        <axis name="ROLL">
            <function name="aero/force/ROLL">
                <product>
                    <property>aero/qbar-psf</property>
                    <property>metrics/Sw-sqft</property>
                    <property>metrics/bw-ft</property>
                    <property>aero/coefficients/CROLL</property>
                    <property>aero/coefficients/CLMach</property>
                </product>
            </function>
        </axis>
        <function name="aero/coefficients/CPITCH">
            <sum>
                <property>aero/coefficients/CMM1</property>
                <property>aero/coefficients/CMMQ</property>
                <property>aero/coefficients/DCMAIM</property>
                <property>aero/coefficients/CMUC</property>
                <property>aero/coefficients/CMDFM</property>
                <property>aero/coefficients/DCMRamp</property>
            </sum>
        </function>
        <axis name="PITCH">
            <function name="aero/force/PITCH">
                <product>
                    <property>aero/qbar-psf</property>
                    <property>metrics/Sw-sqft</property>
                    <property>metrics/cbarw-ft</property>
                    <property>aero/coefficients/CPITCH</property>
                    <property>aero/coefficients/CMMach</property>
                </product>
            </function>
        </axis>
        <function name="aero/coefficients/CYAW">
            <sum>
                <property>aero/coefficients/CMN1</property>
                <property>aero/coefficients/CMNDRDr</property>
                <property>aero/coefficients/CMNP</property>
                <property>aero/coefficients/CMNR</property>
                <property>aero/coefficients/CMNDTD</property>
                <property>aero/coefficients/CMNDAD</property>
                <property>aero/coefficients/CMNRB</property>
            </sum>
        </function>
        <axis name="YAW">
            <function name="aero/force/YAW">
                <product>
                    <property>aero/qbar-psf</property>
                    <property>metrics/Sw-sqft</property>
                    <property>metrics/bw-ft</property>
                    <property>aero/coefficients/CYAW</property>
                    <property>aero/coefficients/CNMach</property>
                </product>
            </function>
        </axis>
    </aerodynamics>
    <!--<output name="c:/users/richard/dev/flightgear/aircraft/f-14b/JSBOut.csv" type="CSV" rate="10">
        <simulation> ON </simulation>
        <atmosphere> ON </atmosphere>
        <massprops> ON </massprops>
        <aerosurfaces> ON </aerosurfaces>
        <rates> ON </rates>
        <velocities> ON </velocities>
        <forces> ON </forces>
        <position> ON </position>
        <coefficients> ON </coefficients>
        <ground_reactions> ON </ground_reactions>
        <fcs> ON </fcs>
        <propulsion> ON </propulsion>
    </output>-->
</fdm_config>
